# OpenSim document version 40000
Model GU_lowerlimb_R20_scaled:
  gravity: 0 -9.8066 0
  length_units: meters
  force_units: N
  credits:
    Delp S.L., Loan J.P., Hoy M.G., Zajac F.E., Topp E.L., Rosen J.M., Thelen D.G., Anderson F.C., Seth A.
  publications:
    Notes: 3D, 23 DOF gait model created by D.G. Thelen, Univ. of Wisconsin-Madison, and Ajay Seth, Frank C. Anderson, and Scott L. Delp, Stanford University. Lower extremity joint defintions based on Delp et al. (1990). Low back joint and anthropometry based on Anderson and Pandy (1999, 2001). Planar knee model of Yamaguchi and Zajac (1989). Seth removed the patella to avoid kinematic constraints; insertions of the quadrucepts are handled with moving points in the tibia frame. Delp, S.L., Loan, J.P., Hoy, M.G., Zajac, F.E., Topp E.L., Rosen, J.M.: An interactive graphics-based model of the lower extremity to study orthopaedic surgical procedures, IEEE Transactions on Biomedical Engineering, vol. 37, pp. 757-767, 1990. Yamaguchi G.T., Zajac F.E.: A planar model of the knee joint to characterize the knee extensor mechanism." J . Biomecl7. vol. 21. pp. 1-10. 1989. Anderson F.C., Pandy M.G.: A dynamic optimization solution for vertical jumping in three dimensions. Computer Methods in Biomechanics and Biomedical Engineering 2:201-231, 1999. Anderson F.C., Pandy M.G.: Dynamic optimization of human walking. Journal of Biomechanical Engineering 123:381-390, 2001.
  Ground
  BodySet:
    Body pelvis: mass=13.69686 [kg] mass_center=(-0.0720652 0 0) inertia=(0.111345 0.111345 0.0652071 0 0 0)
        meshes=(sacrum.vtp pelvis.vtp l_pelvis.vtp)
      WrapEllipsoid PS_at_brim_r: translation=(-0.0813409 -0.06213 0.0628113) quadrant=all
          dimensions=(0.0530041 0.04674 0.0679818)
      WrapEllipsoid IL_at_brim_r: translation=(-0.0698227 -0.052915 0.0723862) quadrant=all
          dimensions=(0.0559601 0.063175 0.0679818)
      WrapEllipsoid Gmax_at_pelvis_r: xyz_body_rotation=(-0.637045 0.383623 -0.684867)
          translation=(-0.0810351 -0.078375 0.0636731) quadrant=all dimensions=(0.0394603 0.0391003 0.0578482)
      WrapEllipsoid PS_at_brim_l: translation=(-0.0813409 -0.06213 -0.0628113) quadrant=all
          dimensions=(0.0530041 0.04674 0.0679818)
      WrapEllipsoid IL_at_brim_l: translation=(-0.0698227 -0.052915 -0.0723862) quadrant=all
          dimensions=(0.0559601 0.063175 0.0679818)
      WrapEllipsoid Gmax_at_pelvis_l: xyz_body_rotation=(0.637045 -0.383623 -0.684867)
          translation=(-0.0810351 -0.078375 -0.0636731) quadrant=all dimensions=(0.0394603 0.0391003 0.0578482)
    Body femur_r: mass=10.8177 mass_center=(0 -0.177937 0) inertia=(0.179426 0.0623554 0.179426 0 0 0)
        meshes=femur_r.vtp
    Body origin_tibia_r: mass=4.311889 mass_center=(0 -0.1867 0) inertia=(0.0586161 0.00593139 0.0594302 0 0 0)
    Body medial_tibia_body_r: mass=1.163018e-8 mass_center=(0 0 0) inertia=(1.16302e-8 1.16302e-8 1.16302e-8 0 0 0)
    Body tibia_r: mass=1.163018e-8 mass_center=(0 0 0) inertia=(1.14565e-8 1.09305e-8 1.09305e-8 0 0 0)
        meshes=(tibia_r.vtp fibula.vtp)
    Body talus_r: mass=0.1163018 mass_center=(0 0 0) inertia=(0.00116302 0.00116302 0.00116302 0 0 0) meshes=talus.vtp
    Body calcn_r: mass=1.453772 mass_center=(0.109869 0.03 0) inertia=(0.00164052 0.00531275 0.00531275 0 0 0)
        meshes=foot.vtp
    Body toes_r: mass=0.2519097 mass_center=(0.0346 0.006 -0.0176321)
        inertia=(0.00011718 0.000233043 0.000233043 0 0 0) meshes=bofoot.vtp
    Body femur_l: mass=10.8177 mass_center=(0 -0.176666 0) inertia=(0.175194 0.0581154 0.175194 0 0 0)
        meshes=femur_l.vtp
    Body origin_tibia_l: mass=4.311889 mass_center=(0 -0.1867 0) inertia=(0.0586161 0.00593139 0.0594302 0 0 0)
    Body medial_tibia_body_l: mass=1.163018e-8 mass_center=(0 0 0) inertia=(1.16302e-8 1.16302e-8 1.16302e-8 0 0 0)
    Body tibia_l: mass=1.163018e-8 mass_center=(0 0 0) inertia=(1.14828e-8 1.09413e-8 1.09413e-8 0 0 0)
        meshes=(tibia_l.vtp fibula_l.vtp)
    Body talus_l: mass=0.1163018 mass_center=(0 0 0) inertia=(0.00116302 0.00116302 0.00116302 0 0 0)
        meshes=l_talus.vtp
    Body calcn_l: mass=1.453772 mass_center=(0.107998 0.03 0) inertia=(0.00161218 0.00514687 0.00514687 0 0 0)
        meshes=l_foot.vtp
    Body toes_l: mass=0.2519097 mass_center=(0.0346 0.006 0.0173276)
        inertia=(0.000115156 0.000232031 0.000232031 0 0 0) meshes=l_bofoot.vtp
  JointSet:
    CustomJoint ground_pelvis: socket_parent_frame=ground_offset socket_child_frame=pelvis_offset
      Coordinate pelvis_tilt: default_value=0 range=(-1.570796 1.570796) clamped=true
      Coordinate pelvis_list: default_value=0 range=(-1.570796 1.570796) clamped=true
      Coordinate pelvis_rotation: default_value=0 range=(-1.570796 1.570796) clamped=true
      Coordinate pelvis_tx: default_value=0 range=(-5 5) clamped=true
      Coordinate pelvis_ty: default_value=0.93 range=(-1 2) clamped=true
      Coordinate pelvis_tz: default_value=0 range=(-3 3) clamped=true
      PhysicalOffsetFrame ground_offset: socket_parent=/ground translation=(0 0 0) [meters]
      PhysicalOffsetFrame pelvis_offset: socket_parent=/bodyset/pelvis translation=(0 0 0)
      SpatialTransform:
        TransformAxis rotation1: coordinates=pelvis_tilt axis=(0 0 1) LinearFunction(coefficients=1 0)
        TransformAxis rotation2: coordinates=pelvis_list axis=(1 0 0) LinearFunction(coefficients=1 0)
        TransformAxis rotation3: coordinates=pelvis_rotation axis=(0 1 0) LinearFunction(coefficients=1 0)
        TransformAxis translation1: coordinates=pelvis_tx axis=(1 0 0) LinearFunction(coefficients=1 0)
        TransformAxis translation2: coordinates=pelvis_ty axis=(0 1 0) LinearFunction(coefficients=1 0)
        TransformAxis translation3: coordinates=pelvis_tz axis=(0 0 1) LinearFunction(coefficients=1 0)
    CustomJoint hip_r: socket_parent_frame=pelvis_offset socket_child_frame=femur_r_offset
      Coordinate hip_flexion_r: default_value=0 range=(-2.0944 2.0944) clamped=true
      Coordinate hip_adduction_r: default_value=0 range=(-2.0944 2.0944) clamped=true
      Coordinate hip_rotation_r: default_value=0 range=(-2.0944 2.0944) clamped=true
      PhysicalOffsetFrame pelvis_offset: socket_parent=/bodyset/pelvis translation=(-0.0720652 -0.062795 0.0799504)
      PhysicalOffsetFrame femur_r_offset: socket_parent=/bodyset/femur_r translation=(0 0 0)
      SpatialTransform: axes_held_at_zero=(translation1 translation2 translation3)
        TransformAxis rotation1: coordinates=hip_flexion_r axis=(0 0 1) LinearFunction(coefficients=1 0)
        TransformAxis rotation2: coordinates=hip_adduction_r axis=(1 0 0) LinearFunction(coefficients=1 0)
        TransformAxis rotation3: coordinates=hip_rotation_r axis=(0 1 0) LinearFunction(coefficients=1 0)
    CustomJoint knee_r: socket_parent_frame=femur_r_offset socket_child_frame=origin_tibia_r_offset
      Coordinate knee_flexion_r: default_value=0 default_speed_value=2.7609 range=(-2.0944 1.4) clamped=true
      Coordinate knee_adduction_r: default_value=0 default_speed_value=1.024 range=(-0.2618 0.2618) clamped=true
      Coordinate knee_internal_rotation_r: default_value=0 default_speed_value=-0.016852 range=(-0.2618 0.2618)
          clamped=true
      PhysicalOffsetFrame femur_r_offset: socket_parent=/bodyset/femur_r translation=(0 0 0)
      PhysicalOffsetFrame origin_tibia_r_offset: socket_parent=/bodyset/origin_tibia_r translation=(0 0 0)
      SpatialTransform: axes_held_at_zero=translation3
        TransformAxis rotation1: coordinates=knee_flexion_r axis=(0 0 1) LinearFunction(coefficients=1 0)
        TransformAxis rotation2: coordinates=knee_adduction_r axis=(1 0 0) LinearFunction(coefficients=1 0)
        TransformAxis rotation3: coordinates=knee_internal_rotation_r axis=(0 1 0) LinearFunction(coefficients=1 0)
        TransformAxis translation1: coordinates=knee_flexion_r axis=(1 0 0)
          MultiplierFunction: scale=1.23592
            SimmSpline: x=(-2.0944 -1.7453 -1.3963 -1.0472 -0.69813 -0.34907 -0.17453 0.19734 0.33739 0.49018 1.5215 2.0944)
                y=(-0.0032 0.00179 0.00411 0.0041 0.00212 -0.001 -0.0031 -0.005227 -0.005435 -0.005574 -0.005435 -0.00525)
        TransformAxis translation2: coordinates=knee_flexion_r axis=(0 1 0)
          MultiplierFunction: scale=1.04669
            SimmSpline: x=(-2.0944 -1.2217 -0.5236 -0.34907 -0.17453 0.15915 2.0944)
                y=(-0.4226 -0.4082 -0.399 -0.3976 -0.3966 -0.39526 -0.396)
    CustomJoint medial_tibia_r: socket_parent_frame=origin_tibia_r_offset socket_child_frame=medial_tibia_body_r_offset
      Coordinate medial_tibia_flex_r: default_value=0 range=(-1e-8 1e-8) clamped=false locked=true
      Coordinate medial_tibia_add_r: default_value=0 range=(-1e-8 1e-8) clamped=false locked=true
      Coordinate medial_tibia_int_r: default_value=0 range=(-1e-8 1e-8) clamped=false locked=true
      PhysicalOffsetFrame origin_tibia_r_offset: socket_parent=/bodyset/origin_tibia_r translation=(0 -0.035 -0.02)
      PhysicalOffsetFrame medial_tibia_body_r_offset: socket_parent=/bodyset/medial_tibia_body_r
          translation=(0 -0.035 -0.02)
      SpatialTransform: axes_held_at_zero=(translation1 translation2 translation3)
        TransformAxis rotation1: coordinates=medial_tibia_flex_r axis=(0 0 1) LinearFunction(coefficients=1 0)
        TransformAxis rotation2: coordinates=medial_tibia_add_r axis=(1 0 0) LinearFunction(coefficients=1 0)
        TransformAxis rotation3: coordinates=medial_tibia_int_r axis=(0 1 0) LinearFunction(coefficients=1 0)
    CustomJoint lateral_tibia_r: socket_parent_frame=medial_tibia_body_r_offset socket_child_frame=tibia_r_offset
      Coordinate lateral_tibia_flex_r: default_value=0 range=(0 0) clamped=false locked=true
      Coordinate lateral_tibia_add_r: default_value=0 range=(0 0) clamped=false locked=true
      Coordinate lateral_tibia_int_r: default_value=0 range=(0 0) clamped=false locked=true
      PhysicalOffsetFrame medial_tibia_body_r_offset: socket_parent=/bodyset/medial_tibia_body_r
          translation=(0 -0.035 0.02)
      PhysicalOffsetFrame tibia_r_offset: socket_parent=/bodyset/tibia_r translation=(0 -0.0364518 0.0189167)
      SpatialTransform: axes_held_at_zero=(translation1 translation2 translation3)
        TransformAxis rotation1: coordinates=lateral_tibia_flex_r axis=(0 0 1) LinearFunction(coefficients=1 0)
        TransformAxis rotation2: coordinates=lateral_tibia_add_r axis=(1 0 0) LinearFunction(coefficients=1 0)
        TransformAxis rotation3: coordinates=lateral_tibia_int_r axis=(0 1 0) LinearFunction(coefficients=1 0)
    CustomJoint ankle_r: socket_parent_frame=tibia_r_offset socket_child_frame=talus_r_offset
      Coordinate ankle_angle_r: default_value=0 default_speed_value=2.4312 range=(-1.5708 1.5708) clamped=true
      Coordinate ankle_Y_angle_r: default_value=0 default_speed_value=2.4312 range=(-1.34 1.34) clamped=false
          locked=true
      PhysicalOffsetFrame tibia_r_offset: socket_parent=/bodyset/tibia_r translation=(0 -0.442629 0)
      PhysicalOffsetFrame talus_r_offset: socket_parent=/bodyset/talus_r translation=(0 0 0)
      SpatialTransform: axes_held_at_zero=(rotation3 translation1 translation2 translation3)
        TransformAxis rotation1: coordinates=ankle_angle_r axis=(0 0 1) LinearFunction(coefficients=1 0)
        TransformAxis rotation2: coordinates=ankle_Y_angle_r axis=(0 1 0) LinearFunction(coefficients=1 0)
    CustomJoint subtalar_r: socket_parent_frame=talus_r_offset socket_child_frame=calcn_r_offset
      Coordinate subtalar_angle_r: default_value=0 default_speed_value=1.9105 range=(-1.5708 1.5708) clamped=false
          locked=true
      PhysicalOffsetFrame talus_r_offset: socket_parent=/bodyset/talus_r translation=(-0.04877 -0.04195 0.00792)
      PhysicalOffsetFrame calcn_r_offset: socket_parent=/bodyset/calcn_r translation=(0 0 0)
      SpatialTransform: axes_held_at_zero=(rotation2 rotation3 translation1 translation2 translation3)
        TransformAxis rotation1: coordinates=subtalar_angle_r axis=(0.78718 0.60475 -0.12095)
            LinearFunction(coefficients=1 0)
    CustomJoint mtp_r: socket_parent_frame=calcn_r_offset socket_child_frame=toes_r_offset
      Coordinate mtp_angle_r: default_value=0 range=(-1.5708 1.5708) clamped=false locked=true
      PhysicalOffsetFrame calcn_r_offset: socket_parent=/bodyset/calcn_r translation=(0.196446 -0.002 0.00108815)
      PhysicalOffsetFrame toes_r_offset: socket_parent=/bodyset/toes_r translation=(0 0 0)
      SpatialTransform: axes_held_at_zero=(rotation2 rotation3 translation1 translation2 translation3)
        TransformAxis rotation1: coordinates=mtp_angle_r axis=(-0.58095 0 0.81394) LinearFunction(coefficients=1 0)
    CustomJoint hip_l: socket_parent_frame=pelvis_offset socket_child_frame=femur_l_offset
      Coordinate hip_flexion_l: default_value=0 range=(-2.0944 2.0944) clamped=true
      Coordinate hip_adduction_l: default_value=0 range=(-2.0944 2.0944) clamped=true
      Coordinate hip_rotation_l: default_value=0 range=(-2.0944 2.0944) clamped=true
      PhysicalOffsetFrame pelvis_offset: socket_parent=/bodyset/pelvis translation=(-0.0720652 -0.062795 -0.0799504)
      PhysicalOffsetFrame femur_l_offset: socket_parent=/bodyset/femur_l translation=(0 0 0)
      SpatialTransform: axes_held_at_zero=(translation1 translation2 translation3)
        TransformAxis rotation1: coordinates=hip_flexion_l axis=(0 0 1) LinearFunction(coefficients=1 0)
        TransformAxis rotation2: coordinates=hip_adduction_l axis=(-1 0 0) LinearFunction(coefficients=1 0)
        TransformAxis rotation3: coordinates=hip_rotation_l axis=(0 -1 0) LinearFunction(coefficients=1 0)
    CustomJoint knee_l: socket_parent_frame=femur_l_offset socket_child_frame=origin_tibia_l_offset
      Coordinate knee_flexion_l: default_value=0 default_speed_value=-1.396 range=(-2.0944 1.4) clamped=true
      Coordinate knee_adduction_l: default_value=0 default_speed_value=-0.0041346 range=(-0.2618 0.2618) clamped=true
      Coordinate knee_internal_rotation_l: default_value=0 default_speed_value=0.26356 range=(-0.2618 0.2618)
          clamped=true
      PhysicalOffsetFrame femur_l_offset: socket_parent=/bodyset/femur_l translation=(0 0 0)
      PhysicalOffsetFrame origin_tibia_l_offset: socket_parent=/bodyset/origin_tibia_l translation=(0 0 0)
      SpatialTransform: axes_held_at_zero=translation3
        TransformAxis rotation1: coordinates=knee_flexion_l axis=(0 0 1) LinearFunction(coefficients=1 0)
        TransformAxis rotation2: coordinates=knee_adduction_l axis=(-1 0 0) LinearFunction(coefficients=1 0)
        TransformAxis rotation3: coordinates=knee_internal_rotation_l axis=(0 -1 0) LinearFunction(coefficients=1 0)
        TransformAxis translation1: coordinates=knee_flexion_l axis=(1 0 0)
          MultiplierFunction: scale=1.19316
            SimmSpline: x=(-2.0944 -1.7453 -1.3963 -1.0472 -0.69813 -0.34907 -0.17453 0.19734 0.33739 0.49018 1.5215 2.0944)
                y=(-0.0032 0.00179 0.00411 0.0041 0.00212 -0.001 -0.0031 -0.005227 -0.005435 -0.005574 -0.005435 -0.00525)
        TransformAxis translation2: coordinates=knee_flexion_l axis=(0 1 0)
          MultiplierFunction: scale=1.03921
            SimmSpline: x=(-2.0944 -1.2217 -0.5236 -0.34907 -0.17453 0.15915 2.0944)
                y=(-0.4226 -0.4082 -0.399 -0.3976 -0.3966 -0.39526 -0.396)
    CustomJoint medial_tibia_l: socket_parent_frame=origin_tibia_l_offset socket_child_frame=medial_tibia_body_l_offset
      Coordinate medial_tibia_flex_l: default_value=0 range=(0 0) clamped=false locked=true
      Coordinate medial_tibia_add_l: default_value=0 range=(0 0) clamped=false locked=true
      Coordinate medial_tibia_int_l: default_value=0 range=(0 0) clamped=false locked=true
      PhysicalOffsetFrame origin_tibia_l_offset: socket_parent=/bodyset/origin_tibia_l translation=(0 -0.035 -0.02)
      PhysicalOffsetFrame medial_tibia_body_l_offset: socket_parent=/bodyset/medial_tibia_body_l
          translation=(0 -0.035 -0.02)
      SpatialTransform: axes_held_at_zero=(translation1 translation2 translation3)
        TransformAxis rotation1: coordinates=medial_tibia_flex_l axis=(0 0 1) LinearFunction(coefficients=1 0)
        TransformAxis rotation2: coordinates=medial_tibia_add_l axis=(1 0 0) LinearFunction(coefficients=1 0)
        TransformAxis rotation3: coordinates=medial_tibia_int_l axis=(0 1 0) LinearFunction(coefficients=1 0)
    CustomJoint lateral_tibia_l: socket_parent_frame=medial_tibia_body_l_offset socket_child_frame=tibia_l_offset
      Coordinate lateral_tibia_flex_l: default_value=0 range=(0 0) clamped=false locked=true
      Coordinate lateral_tibia_add_l: default_value=0 range=(0 0) clamped=false locked=true
      Coordinate lateral_tibia_int_l: default_value=0 range=(0 0) clamped=false locked=true
      PhysicalOffsetFrame medial_tibia_body_l_offset: socket_parent=/bodyset/medial_tibia_body_l
          translation=(0 -0.035 0.02)
      PhysicalOffsetFrame tibia_l_offset: socket_parent=/bodyset/tibia_l translation=(0 -0.0365439 0.0189124)
      SpatialTransform: axes_held_at_zero=(translation1 translation2 translation3)
        TransformAxis rotation1: coordinates=lateral_tibia_flex_l axis=(0 0 1) LinearFunction(coefficients=1 0)
        TransformAxis rotation2: coordinates=lateral_tibia_add_l axis=(1 0 0) LinearFunction(coefficients=1 0)
        TransformAxis rotation3: coordinates=lateral_tibia_int_l axis=(0 1 0) LinearFunction(coefficients=1 0)
    CustomJoint ankle_l: socket_parent_frame=tibia_l_offset socket_child_frame=talus_l_offset
      Coordinate ankle_angle_l: default_value=0 default_speed_value=3.0002 range=(-1.0472 1.0472) clamped=true
      Coordinate ankle_Y_angle_l: default_value=0 default_speed_value=2.4312 range=(-1.34 1.34) clamped=true
          locked=true
      PhysicalOffsetFrame tibia_l_offset: socket_parent=/bodyset/tibia_l translation=(0 -0.443747 0)
      PhysicalOffsetFrame talus_l_offset: socket_parent=/bodyset/talus_l translation=(0 0 0)
      SpatialTransform: axes_held_at_zero=(rotation3 translation1 translation2 translation3)
        TransformAxis rotation1: coordinates=ankle_angle_l axis=(0 0 1) LinearFunction(coefficients=1 0)
        TransformAxis rotation2: coordinates=ankle_Y_angle_l axis=(0 -1 0) LinearFunction(coefficients=1 0)
    CustomJoint subtalar_l: socket_parent_frame=talus_l_offset socket_child_frame=calcn_l_offset
      Coordinate subtalar_angle_l: default_value=0 default_speed_value=-1.5971 range=(-1.5708 1.5708) clamped=false
          locked=true
      PhysicalOffsetFrame talus_l_offset: socket_parent=/bodyset/talus_l translation=(-0.04877 -0.04195 -0.00792)
      PhysicalOffsetFrame calcn_l_offset: socket_parent=/bodyset/calcn_l translation=(0 0 0)
      SpatialTransform: axes_held_at_zero=(rotation2 rotation3 translation1 translation2 translation3)
        TransformAxis rotation1: coordinates=subtalar_angle_l axis=(-0.78718 -0.60475 -0.12095)
            LinearFunction(coefficients=1 0)
    CustomJoint mtp_l: socket_parent_frame=calcn_l_offset socket_child_frame=toes_l_offset
      Coordinate mtp_angle_l: default_value=0 range=(-1.0472 1.0472) clamped=false locked=true
      PhysicalOffsetFrame calcn_l_offset: socket_parent=/bodyset/calcn_l translation=(0.1931 -0.002 -0.00106936)
      PhysicalOffsetFrame toes_l_offset: socket_parent=/bodyset/toes_l translation=(0 0 0)
      SpatialTransform: axes_held_at_zero=(rotation2 rotation3 translation1 translation2 translation3)
        TransformAxis rotation1: coordinates=mtp_angle_l axis=(0.58095 0 0.81394) LinearFunction(coefficients=1 0)
  ForceSet:
    Thelen2003Muscle add_long_r: min_control=0.01 optimal_force=1 max_isometric_force=627
        optimal_fiber_length=0.1448179 tendon_slack_length=0.1154345 pennation_angle_at_optimal=0.10472 [radians]
        max_contraction_velocity=10 FmaxTendonStrain=0.033 FmaxMuscleStrain=0.6 KshapeActive=0.5 KshapePassive=4 Af=0.3
        Flen=1.8 activation_time_constant=0.01 [seconds] deactivation_time_constant=0.04 [seconds]
      PathPoint P1: pelvis (-0.0322102 -0.07942 0.0161816)
      PathPoint P2: femur_r (0.0061796 -0.220956 0.0289205)
    Thelen2003Muscle add_brev_r: min_control=0.01 optimal_force=1 max_isometric_force=429
        optimal_fiber_length=0.1405701 tendon_slack_length=0.02113836 pennation_angle_at_optimal=0
        max_contraction_velocity=10 FmaxTendonStrain=0.033 FmaxMuscleStrain=0.6 KshapeActive=0.5 KshapePassive=4 Af=0.3
        Flen=1.8 activation_time_constant=0.01 deactivation_time_constant=0.04
      PathPoint P1: pelvis (-0.0598335 -0.086925 0.0157028)
      PathPoint P2: femur_r (0.00111233 -0.125184 0.036336)
    Thelen2003Muscle add_mag1_r: min_control=0.01 optimal_force=1 max_isometric_force=381
        optimal_fiber_length=0.0941132 tendon_slack_length=0.06490566 pennation_angle_at_optimal=0.087266
        max_contraction_velocity=10 FmaxTendonStrain=0.033 FmaxMuscleStrain=0.6 KshapeActive=0.5 KshapePassive=4 Af=0.3
        Flen=1.8 activation_time_constant=0.01 deactivation_time_constant=0.04
      PathPoint P1: pelvis (-0.0746135 -0.11153 0.024416)
      PathPoint P2: femur_r (-0.00556164 -0.126754 0.0418977)
    Thelen2003Muscle add_mag2_r: min_control=0.01 optimal_force=1 max_isometric_force=343
        optimal_fiber_length=0.1295615 tendon_slack_length=0.1284908 pennation_angle_at_optimal=0.05236
        max_contraction_velocity=10 FmaxTendonStrain=0.033 FmaxMuscleStrain=0.6 KshapeActive=0.5 KshapePassive=4 Af=0.3
        Flen=1.8 activation_time_constant=0.01 deactivation_time_constant=0.04
      PathPoint P1: pelvis (-0.0847047 -0.11324 0.0294907)
      PathPoint P2: femur_r (0.00667397 -0.239169 0.0280554)
    Thelen2003Muscle add_mag3_r: min_control=0.01 optimal_force=1 max_isometric_force=488
        optimal_fiber_length=0.1388659 tendon_slack_length=0.2639513 pennation_angle_at_optimal=0.087266
        max_contraction_velocity=10 FmaxTendonStrain=0.033 FmaxMuscleStrain=0.6 KshapeActive=0.5 KshapePassive=4 Af=0.3
        Flen=1.8 activation_time_constant=0.01 deactivation_time_constant=0.04
      PathPoint P1: pelvis (-0.113225 -0.108423 0.0467447)
      PathPoint P2: femur_r (0.00865144 -0.401615 -0.0328755)
    Thelen2003Muscle bifemlh_r: min_control=0.01 optimal_force=1 max_isometric_force=896 optimal_fiber_length=0.1143946
        tendon_slack_length=0.3421342 pennation_angle_at_optimal=0 max_contraction_velocity=10 FmaxTendonStrain=0.033
        FmaxMuscleStrain=0.6 KshapeActive=0.5 KshapePassive=4 Af=0.3 Flen=1.8 activation_time_constant=0.01
        deactivation_time_constant=0.04
      PathPoint P1: pelvis (-0.128392 -0.0974415 0.0664881)
      PathPoint P2: tibia_r (-0.0284696 -0.0374933 0.0278359)
      PathPoint P3: tibia_r (-0.0221325 -0.0586353 0.0324421)
    Thelen2003Muscle bifemsh_r: min_control=0.01 optimal_force=1 max_isometric_force=804 optimal_fiber_length=0.1794497
        tendon_slack_length=0.09231806 pennation_angle_at_optimal=0.40143 max_contraction_velocity=10
        FmaxTendonStrain=0.033 FmaxMuscleStrain=0.6 KshapeActive=0.5 KshapePassive=4 Af=0.3 Flen=1.8
        activation_time_constant=0.01 deactivation_time_constant=0.04
      PathPoint P1: femur_r (0.0061796 -0.220956 0.0289205)
      PathPoint P2: tibia_r (-0.0284696 -0.0374933 0.0278359)
      PathPoint P3: tibia_r (-0.0221325 -0.0586353 0.0324421)
    Thelen2003Muscle glut_max1_r: min_control=0.01 optimal_force=1 max_isometric_force=819.15
        optimal_fiber_length=0.1504413 tendon_slack_length=0.05106628 pennation_angle_at_optimal=0.087266
        max_contraction_velocity=10 FmaxTendonStrain=0.033 FmaxMuscleStrain=0.6 KshapeActive=0.5 KshapePassive=4 Af=0.3
        Flen=1.8 activation_time_constant=0.01 deactivation_time_constant=0.04
      PathPoint P1: pelvis (-0.125477 0.032775 0.0539067)
      PathPoint P2: pelvis (-0.128127 -0.02299 0.0745885)
      PathPoint P3: femur_r (-0.0548748 -0.0341221 0.0373248)
      PathPoint P4: femur_r (-0.034235 -0.0592427 0.0580882)
      PathWrap: wrap_object=Gmax_at_pelvis_r method=hybrid
    Thelen2003Muscle glut_max2_r: min_control=0.01 optimal_force=1 max_isometric_force=1170.75
        optimal_fiber_length=0.1613115 tendon_slack_length=0.07536093 pennation_angle_at_optimal=0.087266
        max_contraction_velocity=10 FmaxTendonStrain=0.033 FmaxMuscleStrain=0.6 KshapeActive=0.5 KshapePassive=4 Af=0.3
        Flen=1.8 activation_time_constant=0.01 deactivation_time_constant=0.04
      PathPoint P1: pelvis (-0.134243 0.008265 0.044236)
      PathPoint P2: pelvis (-0.136995 -0.057855 0.0778439)
      PathPoint P3: femur_r (-0.0556164 -0.0611267 0.0311452)
      PathPoint P4: femur_r (-0.0192804 -0.106344 0.051785)
      PathWrap: wrap_object=Gmax_at_pelvis_r method=hybrid
    Thelen2003Muscle glut_max3_r: min_control=0.01 optimal_force=1 max_isometric_force=789.15
        optimal_fiber_length=0.1734763 tendon_slack_length=0.07314135 pennation_angle_at_optimal=0.087266
        max_contraction_velocity=10 FmaxTendonStrain=0.033 FmaxMuscleStrain=0.6 KshapeActive=0.5 KshapePassive=4 Af=0.3
        Flen=1.8 activation_time_constant=0.01 deactivation_time_constant=0.04
      PathPoint P1: pelvis (-0.13251 -0.049875 0.00861741)
      PathPoint P2: pelvis (-0.129758 -0.119985 0.0416508)
      PathPoint P3: femur_r (-0.0347294 -0.117753 0.0116176)
      PathPoint P4: femur_r (-0.00741552 -0.148525 0.0507963)
      PathWrap: wrap_object=Gmax_at_pelvis_r method=hybrid
    Thelen2003Muscle glut_med1_r: min_control=0.01 optimal_force=1 max_isometric_force=1321.65
        optimal_fiber_length=0.0749943 tendon_slack_length=0.05780598 pennation_angle_at_optimal=0.087266
        max_contraction_velocity=10 FmaxTendonStrain=0.033 FmaxMuscleStrain=0.6 KshapeActive=0.5 KshapePassive=4 Af=0.3
        Flen=1.8 activation_time_constant=0.01 deactivation_time_constant=0.04
      PathPoint P1: pelvis (-0.0453593 0.023275 0.112218)
      PathPoint P2: femur_r (-0.0269431 -0.0122463 0.0685936)
    Thelen2003Muscle glut_med2_r: min_control=0.01 optimal_force=1 max_isometric_force=924.75
        optimal_fiber_length=0.07558735 tendon_slack_length=0.06805955 pennation_angle_at_optimal=0.087266
        max_contraction_velocity=10 FmaxTendonStrain=0.033 FmaxMuscleStrain=0.6 KshapeActive=0.5 KshapePassive=4 Af=0.3
        Flen=1.8 activation_time_constant=0.01 deactivation_time_constant=0.04
      PathPoint P1: pelvis (-0.0866414 0.03002 0.0646306)
      PathPoint P2: femur_r (-0.0318867 -0.0060708 0.065133)
    Thelen2003Muscle glut_med3_r: min_control=0.01 optimal_force=1 max_isometric_force=1053
        optimal_fiber_length=0.07796256 tendon_slack_length=0.04892603 pennation_angle_at_optimal=0.087266
        max_contraction_velocity=10 FmaxTendonStrain=0.033 FmaxMuscleStrain=0.6 KshapeActive=0.5 KshapePassive=4 Af=0.3
        Flen=1.8 activation_time_constant=0.01 deactivation_time_constant=0.04
      PathPoint P1: pelvis (-0.117425 -0.006935 0.050364)
      PathPoint P2: femur_r (-0.0381899 -0.00491944 0.0640207)
    Thelen2003Muscle glut_min1_r: min_control=0.01 optimal_force=1 max_isometric_force=270
        optimal_fiber_length=0.07385401 tendon_slack_length=0.01737741 pennation_angle_at_optimal=0.087266
        max_contraction_velocity=10 FmaxTendonStrain=0.033 FmaxMuscleStrain=0.6 KshapeActive=0.5 KshapePassive=4 Af=0.3
        Flen=1.8 activation_time_constant=0.01 deactivation_time_constant=0.04
      PathPoint P1: pelvis (-0.047296 -0.014155 0.0997705)
      PathPoint P2: femur_r (-0.00889862 -0.0108856 0.0692115)
    Thelen2003Muscle glut_min2_r: min_control=0.01 optimal_force=1 max_isometric_force=285
        optimal_fiber_length=0.06131362 tendon_slack_length=0.02846704 pennation_angle_at_optimal=0.087266
        max_contraction_velocity=10 FmaxTendonStrain=0.033 FmaxMuscleStrain=0.6 KshapeActive=0.5 KshapePassive=4 Af=0.3
        Flen=1.8 activation_time_constant=0.01 deactivation_time_constant=0.04
      PathPoint P1: pelvis (-0.0627895 -0.01349 0.0929723)
      PathPoint P2: femur_r (-0.0118648 -0.0108856 0.0692115)
    Thelen2003Muscle glut_min3_r: min_control=0.01 optimal_force=1 max_isometric_force=322.5
        optimal_fiber_length=0.04181144 tendon_slack_length=0.05611536 pennation_angle_at_optimal=0.087266
        max_contraction_velocity=10 FmaxTendonStrain=0.033 FmaxMuscleStrain=0.6 KshapeActive=0.5 KshapePassive=4 Af=0.3
        Flen=1.8 activation_time_constant=0.01 deactivation_time_constant=0.04
      PathPoint P1: pelvis (-0.0804236 -0.014725 0.0764077)
      PathPoint P2: femur_r (-0.0166849 -0.00868753 0.0679756)
    Thelen2003Muscle grac_r: min_control=0.01 optimal_force=1 max_isometric_force=162 optimal_fiber_length=0.3692241
        tendon_slack_length=0.1321655 pennation_angle_at_optimal=0.05236 max_contraction_velocity=10
        FmaxTendonStrain=0.033 FmaxMuscleStrain=0.6 KshapeActive=0.5 KshapePassive=4 Af=0.3 Flen=1.8
        activation_time_constant=0.01 deactivation_time_constant=0.04
      PathPoint P1: pelvis (-0.0754391 -0.112765 0.0267523)
      ConditionalPathPoint P2: tibia_r (-0.0251308 -0.0332232 -0.0356958)
          socket_coordinate=/jointset/knee_r/knee_flexion_r range=(-0.43633 0.17453) [radians]
      PathPoint P3: tibia_r (-0.0183776 -0.0536675 -0.0338609)
      PathPoint P4: tibia_r (0.00567501 -0.0870677 -0.021565)
    Thelen2003Muscle iliacus_r: min_control=0.01 optimal_force=1 max_isometric_force=1073
        optimal_fiber_length=0.1013554 tendon_slack_length=0.1013554 pennation_angle_at_optimal=0.12217
        max_contraction_velocity=10 FmaxTendonStrain=0.033 FmaxMuscleStrain=0.6 KshapeActive=0.5 KshapePassive=4 Af=0.3
        Flen=1.8 activation_time_constant=0.01 deactivation_time_constant=0.04
      PathPoint P1: pelvis (-0.0687015 0.034675 0.0817696)
      PathPoint P2: pelvis (-0.0262982 -0.05225 0.0776524)
      ConditionalPathPoint P3: pelvis (-0.0293561 -0.076475 0.0781312) socket_coordinate=/jointset/hip_r/hip_flexion_r
          range=(-1.5708 0.7854)
      PathPoint P4: femur_r (0.00210106 -0.0568353 0.00704474)
      PathPoint P5: femur_r (-0.0238533 -0.0649994 0.0159434)
    Thelen2003Muscle lat_gas_r: min_control=0.01 optimal_force=1 max_isometric_force=683
        optimal_fiber_length=0.06586807 tendon_slack_length=0.3910907 pennation_angle_at_optimal=0.13963
        max_contraction_velocity=10 FmaxTendonStrain=0.033 FmaxMuscleStrain=0.6 KshapeActive=0.5 KshapePassive=4 Af=0.3
        Flen=1.8 activation_time_constant=0.01 deactivation_time_constant=0.04
      PathPoint P1: femur_r (-0.0271902 -0.413024 0.033617)
      ConditionalPathPoint P2: femur_r (-0.0370776 -0.42056 0.0338642)
          socket_coordinate=/jointset/knee_r/knee_flexion_r range=(-0.7854 0.17453)
      PathPoint P3: tibia_r (-0.0228684 -0.0500483 0.0222063)
      PathPoint P4: calcn_r (0 0.031 -0.00534002)
    Thelen2003Muscle med_gas_r: min_control=0.01 optimal_force=1 max_isometric_force=1558
        optimal_fiber_length=0.06172135 tendon_slack_length=0.4011856 pennation_angle_at_optimal=0.29671
        max_contraction_velocity=10 FmaxTendonStrain=0.033 FmaxMuscleStrain=0.6 KshapeActive=0.5 KshapePassive=4 Af=0.3
        Flen=1.8 activation_time_constant=0.01 deactivation_time_constant=0.04
      PathPoint P1: femur_r (-0.0234825 -0.411245 -0.0290441)
      ConditionalPathPoint P2: femur_r (-0.0370776 -0.420979 -0.0318867)
          socket_coordinate=/jointset/knee_r/knee_flexion_r range=(-0.7854 0.17453)
      PathPoint P3: tibia_r (-0.0205057 -0.0506732 -0.0278766)
      PathPoint P4: calcn_r (0 0.031 -0.00534002)
    Thelen2003Muscle per_brev_r: min_control=0.01 optimal_force=1 max_isometric_force=435
        optimal_fiber_length=0.05282194 tendon_slack_length=0.1700866 pennation_angle_at_optimal=0.087266
        max_contraction_velocity=10 FmaxTendonStrain=0.033 FmaxMuscleStrain=0.6 KshapeActive=0.5 KshapePassive=4 Af=0.3
        Flen=1.8 activation_time_constant=0.01 deactivation_time_constant=0.04
      PathPoint P1: tibia_r (-0.00662085 -0.275576 0.0307396)
      PathPoint P2: tibia_r (-0.0187275 -0.435755 0.0267671)
      PathPoint P3: tibia_r (-0.01362 -0.447316 0.0273346)
      PathPoint P4: calcn_r (0.0517483 0.027 0.0234759)
      PathPoint P5: calcn_r (0.0743813 0.0219 0.034559)
    Thelen2003Muscle per_long_r: min_control=0.01 optimal_force=1 max_isometric_force=943
        optimal_fiber_length=0.05148977 tendon_slack_length=0.36253 pennation_angle_at_optimal=0.17453
        max_contraction_velocity=10 FmaxTendonStrain=0.033 FmaxMuscleStrain=0.6 KshapeActive=0.5 KshapePassive=4 Af=0.3
        Flen=1.8 activation_time_constant=0.01 deactivation_time_constant=0.04
      PathPoint P1: tibia_r (0.000472918 -0.163304 0.0342392)
      PathPoint P2: tibia_r (-0.0195788 -0.437942 0.0270509)
      PathPoint P3: tibia_r (-0.0153225 -0.449815 0.0273346)
      PathPoint P4: calcn_r (0.0481226 0.023 0.0222669)
      PathPoint P5: calcn_r (0.0748208 0.0106 0.0286144)
      PathPoint P6: calcn_r (0.0936084 0.0069 0.0118891)
      PathPoint P7: calcn_r (0.132172 0.0085 -0.0185389)
    Thelen2003Muscle per_tert_r: min_control=0.01 optimal_force=1 max_isometric_force=180
        optimal_fiber_length=0.08348403 tendon_slack_length=0.105676 pennation_angle_at_optimal=0.22689
        max_contraction_velocity=10 FmaxTendonStrain=0.033 FmaxMuscleStrain=0.6 KshapeActive=0.5 KshapePassive=4 Af=0.3
        Flen=1.8 activation_time_constant=0.01 deactivation_time_constant=0.04
      PathPoint P1: tibia_r (0.000945835 -0.292031 0.0218488)
      PathPoint P2: tibia_r (0.0216596 -0.423778 0.0150388)
      PathPoint P3: calcn_r (0.0941577 0.0228 0.0301257)
    Thelen2003Muscle psoas_r: min_control=0.01 optimal_force=1 max_isometric_force=1113 optimal_fiber_length=0.09967548
        tendon_slack_length=0.1594808 pennation_angle_at_optimal=0.13963 max_contraction_velocity=10
        FmaxTendonStrain=0.033 FmaxMuscleStrain=0.6 KshapeActive=0.5 KshapePassive=4 Af=0.3 Flen=1.8
        activation_time_constant=0.01 deactivation_time_constant=0.04
      PathPoint P1: pelvis (-0.0659494 0.084265 0.0276715)
      PathPoint P2: pelvis (-0.0242596 -0.05415 0.0726735)
      ConditionalPathPoint P3: pelvis (-0.0293561 -0.076475 0.0781312) socket_coordinate=/jointset/hip_r/hip_flexion_r
          range=(-1.5708 0.7854)
      PathPoint P4: femur_r (0.00197747 -0.0530672 0.0046965)
      PathPoint P5: femur_r (-0.0232353 -0.0624874 0.0128536)
    Thelen2003Muscle rect_fem_r: min_control=0.01 optimal_force=1 max_isometric_force=1169
        optimal_fiber_length=0.1179413 tendon_slack_length=0.3207176 pennation_angle_at_optimal=0.087266
        max_contraction_velocity=10 FmaxTendonStrain=0.033 FmaxMuscleStrain=0.6 KshapeActive=0.5 KshapePassive=4 Af=0.3
        Flen=1.8 activation_time_constant=0.01 deactivation_time_constant=0.04
      PathPoint P1: pelvis (-0.0300696 -0.029545 0.092685)
      ConditionalPathPoint P2: femur_r (0.0412797 -0.421816 0.00234825)
          socket_coordinate=/jointset/knee_r/knee_flexion_r range=(-2.618 -1.46)
      MovingPathPoint P3: tibia_r socket_x_coordinate=/jointset/knee_r/knee_flexion_r
          socket_y_coordinate=/jointset/knee_r/knee_flexion_r socket_z_coordinate=/jointset/knee_r/knee_flexion_r
        x_location: MultiplierFunction: scale=0.945835
          SimmSpline: x=(-2.0944 -2 -1.5708 -1.4575 -1.3963 -1.0472 -0.69813 -0.52639 -0.34907 -0.17453 0 0.00017453 0.00034907 0.027925 0.087266 0.17453 2.0944)
              y=(0.015581 0.017994 0.027508 0.029656 0.030762 0.03657 0.042207 0.04509 0.048391 0.05343 0.061758 0.061767 0.061776 0.063308 0.066994 0.073303 0.057348)
        y_location: MultiplierFunction: scale=1.04148
          SimmSpline: x=(-2.0944 -2 -1.5708 -1.4575 -1.3963 -1.0472 -0.69813 -0.52639 -0.34907 -0.17453 0 0.00017453 0.00034907 0.027925 0.087266 0.17453 2.0944)
              y=(0.023412 0.023761 0.025114 0.025279 0.025315 0.024918 0.024237 0.023845 0.02342 0.022764 0.020984 0.020981 0.020979 0.020522 0.019175 0.015955 -0.067377)
        z_location: MultiplierFunction: scale=0.945835
          SimmSpline: x=(-2.0944 0.1745) y=(0.0014 0.0014)
    Thelen2003Muscle sar_r: min_control=0.01 optimal_force=1 max_isometric_force=156 optimal_fiber_length=0.5369997
        tendon_slack_length=0.1032692 pennation_angle_at_optimal=0 max_contraction_velocity=10 FmaxTendonStrain=0.033
        FmaxMuscleStrain=0.6 KshapeActive=0.5 KshapePassive=4 Af=0.3 Flen=1.8 activation_time_constant=0.01
        deactivation_time_constant=0.04
      PathPoint P1: pelvis (-0.0155954 -0.001235 0.11892)
      PathPoint P2: femur_r (-0.00370776 -0.373459 -0.0520322)
      PathPoint P3: tibia_r (-0.00529668 -0.043638 -0.0377388)
      PathPoint P4: tibia_r (0.00567501 -0.0613432 -0.0362255)
      PathPoint P5: tibia_r (0.0229838 -0.0874843 -0.023835)
    Thelen2003Muscle semimem_r: min_control=0.01 optimal_force=1 max_isometric_force=1288
        optimal_fiber_length=0.08391677 tendon_slack_length=0.3765765 pennation_angle_at_optimal=0.2618
        max_contraction_velocity=10 FmaxTendonStrain=0.033 FmaxMuscleStrain=0.6 KshapeActive=0.5 KshapePassive=4 Af=0.3
        Flen=1.8 activation_time_constant=0.01 deactivation_time_constant=0.04
      PathPoint P1: pelvis (-0.121502 -0.0925965 0.0684701)
      ConditionalPathPoint P2: tibia_r (-0.0329151 -0.0366497 -0.0178857)
          socket_coordinate=/jointset/knee_r/knee_flexion_r range=(-0.55851 0.17453)
      PathPoint P3: tibia_r (-0.0255375 -0.049689 -0.01851)
    Thelen2003Muscle semiten_r: min_control=0.01 optimal_force=1 max_isometric_force=410 optimal_fiber_length=0.199904
        tendon_slack_length=0.2541069 pennation_angle_at_optimal=0.087266 max_contraction_velocity=10
        FmaxTendonStrain=0.033 FmaxMuscleStrain=0.6 KshapeActive=0.5 KshapePassive=4 Af=0.3 Flen=1.8
        activation_time_constant=0.01 deactivation_time_constant=0.04
      PathPoint P1: pelvis (-0.139707 -0.11324 0.0627261)
      ConditionalPathPoint P2: tibia_r (-0.0390337 -0.0292375 -0.021147)
          socket_coordinate=/jointset/knee_r/knee_flexion_r range=(-0.33161 0.17453)
      PathPoint P3: tibia_r (-0.0308522 -0.0540153 -0.0212491)
      PathPoint P4: tibia_r (-0.010494 -0.0762884 -0.022754)
      PathPoint P5: tibia_r (0.0025075 -0.0977637 -0.0179245)
    Thelen2003Muscle soleus_r: min_control=0.01 optimal_force=1 max_isometric_force=3549
        optimal_fiber_length=0.05194458 tendon_slack_length=0.2597229 pennation_angle_at_optimal=0.43633
        max_contraction_velocity=10 FmaxTendonStrain=0.033 FmaxMuscleStrain=0.6 KshapeActive=0.5 KshapePassive=4 Af=0.3
        Flen=1.8 activation_time_constant=0.01 deactivation_time_constant=0.04
      PathPoint P1: tibia_r (-0.00227 -0.159659 0.00671543)
      PathPoint P2: calcn_r (0 0.031 -0.00534002)
    Thelen2003Muscle tfl_r: min_control=0.01 optimal_force=1 max_isometric_force=233 optimal_fiber_length=0.09856976
        tendon_slack_length=0.44097 pennation_angle_at_optimal=0.05236 max_contraction_velocity=10
        FmaxTendonStrain=0.033 FmaxMuscleStrain=0.6 KshapeActive=0.5 KshapePassive=4 Af=0.3 Flen=1.8
        activation_time_constant=0.01 deactivation_time_constant=0.04
      PathPoint P1: pelvis (-0.0317005 0.02033 0.118825)
      PathPoint P2: femur_r (0.036336 -0.104146 0.0737844)
      PathPoint P3: femur_r (0.00667397 -0.423805 0.0441223)
      PathPoint P4: tibia_r (0.00567501 -0.0507201 0.0280913)
    Thelen2003Muscle tib_ant_r: min_control=0.01 optimal_force=1 max_isometric_force=905 optimal_fiber_length=0.1040209
        tendon_slack_length=0.2367007 pennation_angle_at_optimal=0.087266 max_contraction_velocity=10
        FmaxTendonStrain=0.033 FmaxMuscleStrain=0.6 KshapeActive=0.5 KshapePassive=4 Af=0.3 Flen=1.8
        activation_time_constant=0.01 deactivation_time_constant=0.04
      PathPoint P1: tibia_r (0.0169304 -0.169136 0.0108771)
      PathPoint P2: tibia_r (0.031118 -0.411489 -0.0167413)
      PathPoint P3: calcn_r (0.128107 0.0178 -0.0307303)
    Thelen2003Muscle vas_int_r: min_control=0.01 optimal_force=1 max_isometric_force=1365
        optimal_fiber_length=0.09055165 tendon_slack_length=0.141552 pennation_angle_at_optimal=0.05236
        max_contraction_velocity=10 FmaxTendonStrain=0.033 FmaxMuscleStrain=0.6 KshapeActive=0.5 KshapePassive=4 Af=0.3
        Flen=1.8 activation_time_constant=0.01 deactivation_time_constant=0.04
      PathPoint P1: femur_r (0.0358417 -0.201383 0.0383135)
      PathPoint P2: femur_r (0.0414033 -0.21813 0.0352237)
      ConditionalPathPoint P3: femur_r (0.0423921 -0.421816 0.00679756)
          socket_coordinate=/jointset/knee_r/knee_flexion_r range=(-2.618 -1.42)
      MovingPathPoint P4: tibia_r socket_x_coordinate=/jointset/knee_r/knee_flexion_r
          socket_y_coordinate=/jointset/knee_r/knee_flexion_r socket_z_coordinate=/jointset/knee_r/knee_flexion_r
        x_location: MultiplierFunction: scale=0.945835
          SimmSpline: x=(-2.0944 -2 -1.5708 -1.4575 -1.3963 -1.0472 -0.69813 -0.52639 -0.34907 -0.17453 0 0.00017453 0.00034907 0.027925 0.087266 0.17453 2.0944)
              y=(0.0082733 0.010687 0.020204 0.022353 0.023458 0.029272 0.034946 0.037871 0.041257 0.046529 0.055463 0.055473 0.055484 0.057172 0.061272 0.068437 0.064882)
        y_location: MultiplierFunction: scale=1.04148
          SimmSpline: x=(-2.0944 -2 -1.5708 -1.4575 -1.3963 -1.0472 -0.69813 -0.52639 -0.34907 -0.17453 0 0.00017453 0.00034907 0.027925 0.087266 0.17453 2.0944)
              y=(0.025599 0.025949 0.027312 0.02748 0.027515 0.027136 0.026574 0.026307 0.026119 0.026013 0.025292 0.025291 0.02529 0.025053 0.024219 0.021829 -0.068571)
        z_location: MultiplierFunction: scale=0.945835
          SimmSpline: x=(-2.0944 2.0944) y=(0.0018 0.0018)
    Thelen2003Muscle vas_lat_r: min_control=0.01 optimal_force=1 max_isometric_force=1871
        optimal_fiber_length=0.08783648 tendon_slack_length=0.1641706 pennation_angle_at_optimal=0.087266
        max_contraction_velocity=10 FmaxTendonStrain=0.033 FmaxMuscleStrain=0.6 KshapeActive=0.5 KshapePassive=4 Af=0.3
        Flen=1.8 activation_time_constant=0.01 deactivation_time_constant=0.04
      PathPoint P1: femur_r (0.00593242 -0.194056 0.0431336)
      PathPoint P2: femur_r (0.0332462 -0.271197 0.0505491)
      ConditionalPathPoint P3: femur_r (0.0446167 -0.421816 0.0253364)
          socket_coordinate=/jointset/knee_r/knee_flexion_r range=(-2.618 -1.21)
      ConditionalPathPoint P4: femur_r (0.0312688 -0.444111 0.0227409)
          socket_coordinate=/jointset/knee_r/knee_flexion_r range=(-2.618 -1.92)
      MovingPathPoint P5: tibia_r socket_x_coordinate=/jointset/knee_r/knee_flexion_r
          socket_y_coordinate=/jointset/knee_r/knee_flexion_r socket_z_coordinate=/jointset/knee_r/knee_flexion_r
        x_location: MultiplierFunction: scale=0.945835
          SimmSpline: x=(-2.0944 -2 -1.5708 -1.4575 -1.3963 -1.0472 -0.69813 -0.52639 -0.34907 -0.17453 0 0.00017453 0.00034907 0.027925 0.087266 0.17453 2.0944)
              y=(0.01429 0.016703 0.026215 0.028362 0.029467 0.035271 0.040878 0.043729 0.04697 0.051874 0.059956 0.059965 0.059974 0.061458 0.065035 0.071187 0.058377)
        y_location: MultiplierFunction: scale=1.04148
          SimmSpline: x=(-2.0944 -2 -1.5708 -1.4575 -1.3963 -1.0472 -0.69813 -0.52639 -0.34907 -0.17453 0 0.00017453 0.00034907 0.027925 0.087266 0.17453 2.0944)
              y=(0.021532 0.021881 0.023236 0.023402 0.023437 0.023044 0.022384 0.022015 0.021636 0.021097 0.019586 0.019584 0.019582 0.01919 0.018008 0.015107 -0.065342)
        z_location: MultiplierFunction: scale=0.945835
          SimmSpline: x=(-2.0944 2.0944) y=(0.0165 0.0165)
    Thelen2003Muscle vas_med_r: min_control=0.01 optimal_force=1 max_isometric_force=1294
        optimal_fiber_length=0.09277057 tendon_slack_length=0.1313381 pennation_angle_at_optimal=0.087266
        max_contraction_velocity=10 FmaxTendonStrain=0.033 FmaxMuscleStrain=0.6 KshapeActive=0.5 KshapePassive=4 Af=0.3
        Flen=1.8 activation_time_constant=0.01 deactivation_time_constant=0.04
      PathPoint P1: femur_r (0.0173029 -0.2197 0.0232353)
      PathPoint P2: femur_r (0.0439988 -0.289828 0.00111233)
      ConditionalPathPoint P3: femur_r (0.045729 -0.4237 -0.015449) socket_coordinate=/jointset/knee_r/knee_flexion_r
          range=(-2.618 -1.21)
      ConditionalPathPoint P4: femur_r (0.0338642 -0.445367 -0.0161906)
          socket_coordinate=/jointset/knee_r/knee_flexion_r range=(-2.618 -1.7801)
      MovingPathPoint P5: tibia_r socket_x_coordinate=/jointset/knee_r/knee_flexion_r
          socket_y_coordinate=/jointset/knee_r/knee_flexion_r socket_z_coordinate=/jointset/knee_r/knee_flexion_r
        x_location: MultiplierFunction: scale=0.945835
          SimmSpline: x=(-2.0944 -2 -1.5708 -1.4575 -1.3963 -1.0472 -0.69813 -0.52639 -0.34907 -0.17453 0 0.00017453 0.00034907 0.027925 0.087266 0.17453 2.0944)
              y=(0.009811 0.012224 0.021737 0.023885 0.02499 0.030796 0.036419 0.039287 0.042565 0.047576 0.055959 0.055968 0.055978 0.057542 0.061337 0.06795 0.062933)
        y_location: MultiplierFunction: scale=1.04148
          SimmSpline: x=(-2.0944 -2 -1.5708 -1.4575 -1.3963 -1.0472 -0.69813 -0.52639 -0.34907 -0.17453 0 0.00017453 0.00034907 0.027925 0.087266 0.17453 2.0944)
              y=(0.022415 0.022765 0.024126 0.024293 0.024329 0.023946 0.023359 0.023068 0.022834 0.022636 0.021792 0.02179 0.021789 0.021536 0.020684 0.018327 -0.06562)
        z_location: MultiplierFunction: scale=0.945835
          SimmSpline: x=(-2.0944 2.0944) y=(-0.0146 -0.0146)
    Thelen2003Muscle add_long_l: min_control=0.01 optimal_force=1 max_isometric_force=627 optimal_fiber_length=0.14367
        tendon_slack_length=0.1145195 pennation_angle_at_optimal=0.10472 max_contraction_velocity=10
        FmaxTendonStrain=0.033 FmaxMuscleStrain=0.6 KshapeActive=0.5 KshapePassive=4 Af=0.3 Flen=1.8
        activation_time_constant=0.01 deactivation_time_constant=0.04
      PathPoint P1: pelvis (-0.0322102 -0.07942 -0.0161816)
      PathPoint P2: femur_l (0.0059658 -0.219377 -0.0279199)
    Thelen2003Muscle add_brev_l: min_control=0.01 optimal_force=1 max_isometric_force=429
        optimal_fiber_length=0.1390829 tendon_slack_length=0.02091472 pennation_angle_at_optimal=0
        max_contraction_velocity=10 FmaxTendonStrain=0.033 FmaxMuscleStrain=0.6 KshapeActive=0.5 KshapePassive=4 Af=0.3
        Flen=1.8 activation_time_constant=0.01 deactivation_time_constant=0.04
      PathPoint P1: pelvis (-0.0598335 -0.086925 -0.0157028)
      PathPoint P2: femur_l (0.00107384 -0.12429 -0.0350789)
    Thelen2003Muscle add_mag1_l: min_control=0.01 optimal_force=1 max_isometric_force=381
        optimal_fiber_length=0.09283059 tendon_slack_length=0.0640211 pennation_angle_at_optimal=0.087266
        max_contraction_velocity=10 FmaxTendonStrain=0.033 FmaxMuscleStrain=0.6 KshapeActive=0.5 KshapePassive=4 Af=0.3
        Flen=1.8 activation_time_constant=0.01 deactivation_time_constant=0.04
      PathPoint P1: pelvis (-0.0746135 -0.11153 -0.024416)
      PathPoint P2: femur_l (-0.00536922 -0.125848 -0.0404481)
    Thelen2003Muscle add_mag2_l: min_control=0.01 optimal_force=1 max_isometric_force=343
        optimal_fiber_length=0.1283223 tendon_slack_length=0.1272618 pennation_angle_at_optimal=0.05236
        max_contraction_velocity=10 FmaxTendonStrain=0.033 FmaxMuscleStrain=0.6 KshapeActive=0.5 KshapePassive=4 Af=0.3
        Flen=1.8 activation_time_constant=0.01 deactivation_time_constant=0.04
      PathPoint P1: pelvis (-0.0847047 -0.11324 -0.0294907)
      PathPoint P2: femur_l (0.00644306 -0.237459 -0.0270847)
    Thelen2003Muscle add_mag3_l: min_control=0.01 optimal_force=1 max_isometric_force=488
        optimal_fiber_length=0.1377529 tendon_slack_length=0.2618357 pennation_angle_at_optimal=0.087266
        max_contraction_velocity=10 FmaxTendonStrain=0.033 FmaxMuscleStrain=0.6 KshapeActive=0.5 KshapePassive=4 Af=0.3
        Flen=1.8 activation_time_constant=0.01 deactivation_time_constant=0.04
      PathPoint P1: pelvis (-0.113225 -0.108423 -0.0467447)
      PathPoint P2: femur_l (0.00835212 -0.398745 0.0317381)
    Thelen2003Muscle bifemlh_l: min_control=0.01 optimal_force=1 max_isometric_force=896 optimal_fiber_length=0.1135918
        tendon_slack_length=0.3397332 pennation_angle_at_optimal=0 max_contraction_velocity=10 FmaxTendonStrain=0.033
        FmaxMuscleStrain=0.6 KshapeActive=0.5 KshapePassive=4 Af=0.3 Flen=1.8 activation_time_constant=0.01
        deactivation_time_constant=0.04
      PathPoint P1: pelvis (-0.128392 -0.0974415 -0.0664881)
      PathPoint P2: tibia_l (-0.0284632 -0.037588 -0.0278296)
      PathPoint P3: tibia_l (-0.0221275 -0.0587834 -0.0324348)
    Thelen2003Muscle bifemsh_l: min_control=0.01 optimal_force=1 max_isometric_force=804 optimal_fiber_length=0.1784823
        tendon_slack_length=0.09182035 pennation_angle_at_optimal=0.40143 max_contraction_velocity=10
        FmaxTendonStrain=0.033 FmaxMuscleStrain=0.6 KshapeActive=0.5 KshapePassive=4 Af=0.3 Flen=1.8
        activation_time_constant=0.01 deactivation_time_constant=0.04
      PathPoint P1: femur_l (0.0059658 -0.219377 -0.0279199)
      PathPoint P2: tibia_l (-0.0284632 -0.037588 -0.0278296)
      PathPoint P3: tibia_l (-0.0221275 -0.0587834 -0.0324348)
    Thelen2003Muscle glut_max1_l: max_isometric_force=819.15 optimal_fiber_length=0.1490485
        tendon_slack_length=0.05059353 max_contraction_velocity=10
      PathPoint P1: pelvis (-0.125477 0.032775 -0.0536194)
      PathPoint P2: pelvis (-0.128127 -0.02299 -0.0746842)
      PathPoint P3: femur_l (-0.0529763 -0.0338782 -0.0357948)
      PathPoint P4: femur_l (-0.0330505 -0.0588193 -0.0560785)
      PathWrap: wrap_object=Gmax_at_pelvis_l method=hybrid
    Thelen2003Muscle glut_max2_l: max_isometric_force=1170.75 optimal_fiber_length=0.1599321
        tendon_slack_length=0.07471651 max_contraction_velocity=10
      PathPoint P1: pelvis (-0.134243 0.008265 -0.0440445)
      PathPoint P2: pelvis (-0.136995 -0.057855 -0.0775567)
      PathPoint P3: femur_l (-0.0536922 -0.0606899 -0.029829)
      PathPoint P4: femur_l (-0.0186133 -0.105584 -0.0501127)
      PathWrap: wrap_object=Gmax_at_pelvis_l method=hybrid
    Thelen2003Muscle glut_max3_l: max_isometric_force=789.15 optimal_fiber_length=0.1718844
        tendon_slack_length=0.0724702 max_contraction_velocity=10
      PathPoint P1: pelvis (-0.13251 -0.049875 -0.00861741)
      PathPoint P2: pelvis (-0.129758 -0.119985 -0.0421296)
      PathPoint P3: femur_l (-0.0335278 -0.116911 -0.0107384)
      PathPoint P4: femur_l (-0.00715896 -0.147464 -0.0489196)
      PathWrap: wrap_object=Gmax_at_pelvis_l method=hybrid
    Thelen2003Muscle glut_med1_l: max_isometric_force=1321.65 optimal_fiber_length=0.07428544
        tendon_slack_length=0.05725958 max_contraction_velocity=10
      PathPoint P1: pelvis (-0.0453593 0.023275 -0.112026)
      PathPoint P2: femur_l (-0.0260109 -0.0121588 -0.066817)
    Thelen2003Muscle glut_med2_l: max_isometric_force=924.75 optimal_fiber_length=0.07468347
        tendon_slack_length=0.06724569 max_contraction_velocity=10
      PathPoint P1: pelvis (-0.0866414 0.03002 -0.0651093)
      PathPoint P2: femur_l (-0.0307835 -0.00602742 -0.0632375)
    Thelen2003Muscle glut_med3_l: max_isometric_force=1053 optimal_fiber_length=0.07675811
        tendon_slack_length=0.04817017 max_contraction_velocity=10
      PathPoint P1: pelvis (-0.117425 -0.006935 -0.050747)
      PathPoint P2: femur_l (-0.0368686 -0.00488429 -0.0620443)
    Thelen2003Muscle glut_min1_l: max_isometric_force=270 optimal_fiber_length=0.07249887
        tendon_slack_length=0.01705856 max_contraction_velocity=10
      PathPoint P1: pelvis (-0.047296 -0.014155 -0.099579)
      PathPoint P2: femur_l (-0.00859075 -0.0108078 -0.066817)
    Thelen2003Muscle glut_min2_l: max_isometric_force=285 optimal_fiber_length=0.06007359
        tendon_slack_length=0.02789131 max_contraction_velocity=10
      PathPoint P1: pelvis (-0.0627895 -0.01349 -0.0928765)
      PathPoint P2: femur_l (-0.0114543 -0.0108078 -0.066817)
    Thelen2003Muscle glut_min3_l: max_isometric_force=322.5 optimal_fiber_length=0.04094076
        tendon_slack_length=0.05494681 max_contraction_velocity=10
      PathPoint P1: pelvis (-0.0804236 -0.014725 -0.0765992)
      PathPoint P2: femur_l (-0.0161077 -0.00862544 -0.0656238)
    Thelen2003Muscle grac_l: min_control=0.01 optimal_force=1 max_isometric_force=162 optimal_fiber_length=0.3668603
        tendon_slack_length=0.1313193 pennation_angle_at_optimal=0.05236 max_contraction_velocity=10
        FmaxTendonStrain=0.033 FmaxMuscleStrain=0.6 KshapeActive=0.5 KshapePassive=4 Af=0.3 Flen=1.8
        activation_time_constant=0.01 deactivation_time_constant=0.04
      PathPoint P1: pelvis (-0.0754391 -0.112765 -0.0267523)
      ConditionalPathPoint P2: tibia_l (-0.0251251 -0.0333071 0.0356877)
          socket_coordinate=/jointset/knee_l/knee_flexion_l range=(-0.43633 0.17453)
      PathPoint P3: tibia_l (-0.0183734 -0.053803 0.0338532)
      PathPoint P4: tibia_l (0.00567372 -0.0872876 0.0215601)
    Thelen2003Muscle iliacus_l: min_control=0.01 optimal_force=1 max_isometric_force=1073
        optimal_fiber_length=0.1007737 tendon_slack_length=0.1007737 pennation_angle_at_optimal=0.12217
        max_contraction_velocity=10 FmaxTendonStrain=0.033 FmaxMuscleStrain=0.6 KshapeActive=0.5 KshapePassive=4 Af=0.3
        Flen=1.8 activation_time_constant=0.01 deactivation_time_constant=0.04
      PathPoint P1: pelvis (-0.0687015 0.034675 -0.0817696)
      PathPoint P2: pelvis (-0.0262982 -0.05225 -0.0776524)
      ConditionalPathPoint P3: pelvis (-0.0293561 -0.076475 -0.0781312) socket_coordinate=/jointset/hip_l/hip_flexion_l
          range=(-1.5708 0.7854)
      PathPoint P4: femur_l (0.00202837 -0.0564291 -0.00680101)
      PathPoint P5: femur_l (-0.023028 -0.0645349 -0.0153918)
    Thelen2003Muscle lat_gas_l: min_control=0.01 optimal_force=1 max_isometric_force=683
        optimal_fiber_length=0.06598327 tendon_slack_length=0.3917747 pennation_angle_at_optimal=0.13963
        max_contraction_velocity=10 FmaxTendonStrain=0.033 FmaxMuscleStrain=0.6 KshapeActive=0.5 KshapePassive=4 Af=0.3
        Flen=1.8 activation_time_constant=0.01 deactivation_time_constant=0.04
      PathPoint P1: femur_l (-0.0262495 -0.410072 -0.032454)
      ConditionalPathPoint P2: femur_l (-0.0357948 -0.417555 -0.0326926)
          socket_coordinate=/jointset/knee_l/knee_flexion_l range=(-0.7854 0.17453)
      PathPoint P3: tibia_l (-0.0228632 -0.0501747 -0.0222013)
      PathPoint P4: calcn_l (0 0.031 0.00524777)
    Thelen2003Muscle med_gas_l: min_control=0.01 optimal_force=1 max_isometric_force=1558
        optimal_fiber_length=0.06173794 tendon_slack_length=0.4012935 pennation_angle_at_optimal=0.29671
        max_contraction_velocity=10 FmaxTendonStrain=0.033 FmaxMuscleStrain=0.6 KshapeActive=0.5 KshapePassive=4 Af=0.3
        Flen=1.8 activation_time_constant=0.01 deactivation_time_constant=0.04
      PathPoint P1: femur_l (-0.02267 -0.408306 0.0280393)
      ConditionalPathPoint P2: femur_l (-0.0357948 -0.41797 0.0307835)
          socket_coordinate=/jointset/knee_l/knee_flexion_l range=(-0.7854 0.17453)
      PathPoint P3: tibia_l (-0.020501 -0.0508012 0.0278703)
      PathPoint P4: calcn_l (0 0.031 0.00524777)
    Thelen2003Muscle per_brev_l: min_control=0.01 optimal_force=1 max_isometric_force=435
        optimal_fiber_length=0.0526267 tendon_slack_length=0.169458 pennation_angle_at_optimal=0.087266
        max_contraction_velocity=10 FmaxTendonStrain=0.033 FmaxMuscleStrain=0.6 KshapeActive=0.5 KshapePassive=4 Af=0.3
        Flen=1.8 activation_time_constant=0.01 deactivation_time_constant=0.04
      PathPoint P1: tibia_l (-0.00661934 -0.276272 -0.0307327)
      PathPoint P2: tibia_l (-0.0187233 -0.436856 -0.026761)
      PathPoint P3: tibia_l (-0.0136169 -0.448445 -0.0273284)
      PathPoint P4: calcn_l (0.0508671 0.027 -0.0230704)
      PathPoint P5: calcn_l (0.0731146 0.0219 -0.033962)
    Thelen2003Muscle per_long_l: min_control=0.01 optimal_force=1 max_isometric_force=943
        optimal_fiber_length=0.05128125 tendon_slack_length=0.3610619 pennation_angle_at_optimal=0.17453
        max_contraction_velocity=10 FmaxTendonStrain=0.033 FmaxMuscleStrain=0.6 KshapeActive=0.5 KshapePassive=4 Af=0.3
        Flen=1.8 activation_time_constant=0.01 deactivation_time_constant=0.04
      PathPoint P1: tibia_l (0.00047281 -0.163716 -0.0342314)
      PathPoint P2: tibia_l (-0.0195743 -0.439048 -0.0270447)
      PathPoint P3: tibia_l (-0.015319 -0.450951 -0.0273284)
      PathPoint P4: calcn_l (0.0473031 0.023 -0.0218822)
      PathPoint P5: calcn_l (0.0735466 0.0106 -0.0281201)
      PathPoint P6: calcn_l (0.0920143 0.0069 -0.0116837)
      PathPoint P7: calcn_l (0.129922 0.0085 0.0182187)
    Thelen2003Muscle per_tert_l: min_control=0.01 optimal_force=1 max_isometric_force=180
        optimal_fiber_length=0.08320868 tendon_slack_length=0.1053274 pennation_angle_at_optimal=0.22689
        max_contraction_velocity=10 FmaxTendonStrain=0.033 FmaxMuscleStrain=0.6 KshapeActive=0.5 KshapePassive=4 Af=0.3
        Flen=1.8 activation_time_constant=0.01 deactivation_time_constant=0.04
      PathPoint P1: tibia_l (0.00094562 -0.292768 -0.0218438)
      PathPoint P2: tibia_l (0.0216547 -0.424848 -0.0150354)
      PathPoint P3: calcn_l (0.0925543 0.0228 -0.0296054)
    Thelen2003Muscle psoas_l: min_control=0.01 optimal_force=1 max_isometric_force=1113 optimal_fiber_length=0.09924786
        tendon_slack_length=0.1587966 pennation_angle_at_optimal=0.13963 max_contraction_velocity=10
        FmaxTendonStrain=0.033 FmaxMuscleStrain=0.6 KshapeActive=0.5 KshapePassive=4 Af=0.3 Flen=1.8
        activation_time_constant=0.01 deactivation_time_constant=0.04
      PathPoint P1: pelvis (-0.0659494 0.084265 -0.0276715)
      PathPoint P2: pelvis (-0.0242596 -0.05415 -0.0726735)
      ConditionalPathPoint P3: pelvis (-0.0293561 -0.076475 -0.0781312) socket_coordinate=/jointset/hip_l/hip_flexion_l
          range=(-1.5708 0.7854)
      PathPoint P4: femur_l (0.00190906 -0.0526879 -0.00453401)
      PathPoint P5: femur_l (-0.0224314 -0.0620408 -0.0124089)
    Thelen2003Muscle rect_fem_l: min_control=0.01 optimal_force=1 max_isometric_force=1169
        optimal_fiber_length=0.117096 tendon_slack_length=0.3184189 pennation_angle_at_optimal=0.087266
        max_contraction_velocity=10 FmaxTendonStrain=0.033 FmaxMuscleStrain=0.6 KshapeActive=0.5 KshapePassive=4 Af=0.3
        Flen=1.8 activation_time_constant=0.01 deactivation_time_constant=0.04
      PathPoint P1: pelvis (-0.0300696 -0.029545 -0.092685)
      ConditionalPathPoint P2: femur_l (0.0398515 -0.418802 -0.002267)
          socket_coordinate=/jointset/knee_l/knee_flexion_l range=(-2.618 -1.46)
      MovingPathPoint P3: tibia_l socket_x_coordinate=/jointset/knee_l/knee_flexion_l
          socket_y_coordinate=/jointset/knee_l/knee_flexion_l socket_z_coordinate=/jointset/knee_l/knee_flexion_l
        x_location: MultiplierFunction: scale=0.94562
          SimmSpline: x=(-2.0944 -2 -1.5708 -1.4575 -1.3963 -1.0472 -0.69813 -0.52639 -0.34907 -0.17453 0 0.00017453 0.00034907 0.027925 0.087266 0.17453 2.0944)
              y=(0.015581 0.017994 0.027508 0.029656 0.030762 0.03657 0.042207 0.04509 0.048391 0.05343 0.061758 0.061767 0.061776 0.063308 0.066994 0.073303 0.057348)
        y_location: MultiplierFunction: scale=1.04411
          SimmSpline: x=(-2.0944 -2 -1.5708 -1.4575 -1.3963 -1.0472 -0.69813 -0.52639 -0.34907 -0.17453 0 0.00017453 0.00034907 0.027925 0.087266 0.17453 2.0944)
              y=(0.023412 0.023761 0.025114 0.025279 0.025315 0.024918 0.024237 0.023845 0.02342 0.022764 0.020984 0.020981 0.020979 0.020522 0.019175 0.015955 -0.067377)
        z_location: MultiplierFunction: scale=0.94562
          SimmSpline: x=(-2.0944 0.1745) y=(-0.0014 -0.0014)
    Thelen2003Muscle sar_l: min_control=0.01 optimal_force=1 max_isometric_force=156 optimal_fiber_length=0.5335382
        tendon_slack_length=0.1026035 pennation_angle_at_optimal=0 max_contraction_velocity=10 FmaxTendonStrain=0.033
        FmaxMuscleStrain=0.6 KshapeActive=0.5 KshapePassive=4 Af=0.3 Flen=1.8 activation_time_constant=0.01
        deactivation_time_constant=0.04
      PathPoint P1: pelvis (-0.0155954 -0.001235 -0.11892)
      PathPoint P2: femur_l (-0.00357948 -0.37079 0.050232)
      PathPoint P3: tibia_l (-0.00529547 -0.0437482 0.0377302)
      PathPoint P4: tibia_l (0.00567372 -0.0614981 0.0362172)
      PathPoint P5: tibia_l (0.0229786 -0.0877052 0.0238296)
    Thelen2003Muscle semimem_l: min_control=0.01 optimal_force=1 max_isometric_force=1288
        optimal_fiber_length=0.08335859 tendon_slack_length=0.3740717 pennation_angle_at_optimal=0.2618
        max_contraction_velocity=10 FmaxTendonStrain=0.033 FmaxMuscleStrain=0.6 KshapeActive=0.5 KshapePassive=4 Af=0.3
        Flen=1.8 activation_time_constant=0.01 deactivation_time_constant=0.04
      PathPoint P1: pelvis (-0.121502 -0.0925965 -0.0684701)
      ConditionalPathPoint P2: tibia_l (-0.0329076 -0.0367422 0.0178817)
          socket_coordinate=/jointset/knee_l/knee_flexion_l range=(-0.55851 0.17453)
      PathPoint P3: tibia_l (-0.0255317 -0.0498145 0.0185058)
    Thelen2003Muscle semiten_l: min_control=0.01 optimal_force=1 max_isometric_force=410 optimal_fiber_length=0.1987241
        tendon_slack_length=0.2526071 pennation_angle_at_optimal=0.087266 max_contraction_velocity=10
        FmaxTendonStrain=0.033 FmaxMuscleStrain=0.6 KshapeActive=0.5 KshapePassive=4 Af=0.3 Flen=1.8
        activation_time_constant=0.01 deactivation_time_constant=0.04
      PathPoint P1: pelvis (-0.139707 -0.11324 -0.0627261)
      ConditionalPathPoint P2: tibia_l (-0.0390248 -0.0293113 0.0211422)
          socket_coordinate=/jointset/knee_l/knee_flexion_l range=(-0.33161 0.17453)
      PathPoint P3: tibia_l (-0.0308452 -0.0541517 0.0212443)
      PathPoint P4: tibia_l (-0.0104917 -0.0764811 0.0227488)
      PathPoint P5: tibia_l (0.00250693 -0.0980106 0.0179204)
    Thelen2003Muscle soleus_l: min_control=0.01 optimal_force=1 max_isometric_force=3549
        optimal_fiber_length=0.05206755 tendon_slack_length=0.2603378 pennation_angle_at_optimal=0.43633
        max_contraction_velocity=10 FmaxTendonStrain=0.033 FmaxMuscleStrain=0.6 KshapeActive=0.5 KshapePassive=4 Af=0.3
        Flen=1.8 activation_time_constant=0.01 deactivation_time_constant=0.04
      PathPoint P1: tibia_l (-0.00226949 -0.160062 -0.0067139)
      PathPoint P2: calcn_l (0 0.031 0.00524777)
    Thelen2003Muscle tfl_l: min_control=0.01 optimal_force=1 max_isometric_force=233 optimal_fiber_length=0.0979774
        tendon_slack_length=0.4383199 pennation_angle_at_optimal=0.05236 max_contraction_velocity=10
        FmaxTendonStrain=0.033 FmaxMuscleStrain=0.6 KshapeActive=0.5 KshapePassive=4 Af=0.3 Flen=1.8
        activation_time_constant=0.01 deactivation_time_constant=0.04
      PathPoint P1: pelvis (-0.0317005 0.02033 -0.118825)
      PathPoint P2: femur_l (0.0350789 -0.103401 -0.0712317)
      PathPoint P3: femur_l (0.00644306 -0.420776 -0.0425958)
      PathPoint P4: tibia_l (0.00567372 -0.0508482 -0.0280849)
    Thelen2003Muscle tib_ant_l: min_control=0.01 optimal_force=1 max_isometric_force=905 optimal_fiber_length=0.1037652
        tendon_slack_length=0.2361188 pennation_angle_at_optimal=0.087266 max_contraction_velocity=10
        FmaxTendonStrain=0.033 FmaxMuscleStrain=0.6 KshapeActive=0.5 KshapePassive=4 Af=0.3 Flen=1.8
        activation_time_constant=0.01 deactivation_time_constant=0.04
      PathPoint P1: tibia_l (0.0169266 -0.169563 -0.0108746)
      PathPoint P2: tibia_l (0.0311109 -0.412528 0.0167375)
      PathPoint P3: calcn_l (0.125926 0.0178 0.0301995)
    Thelen2003Muscle vas_int_l: min_control=0.01 optimal_force=1 max_isometric_force=1365
        optimal_fiber_length=0.08966158 tendon_slack_length=0.1401606 pennation_angle_at_optimal=0.05236
        max_contraction_velocity=10 FmaxTendonStrain=0.033 FmaxMuscleStrain=0.6 KshapeActive=0.5 KshapePassive=4 Af=0.3
        Flen=1.8 activation_time_constant=0.01 deactivation_time_constant=0.04
      PathPoint P1: femur_l (0.0346016 -0.199944 -0.036988)
      PathPoint P2: femur_l (0.0399709 -0.216571 -0.0340051)
      ConditionalPathPoint P3: femur_l (0.0409254 -0.418802 -0.00656238)
          socket_coordinate=/jointset/knee_l/knee_flexion_l range=(-2.618 -1.42)
      MovingPathPoint P4: tibia_l socket_x_coordinate=/jointset/knee_l/knee_flexion_l
          socket_y_coordinate=/jointset/knee_l/knee_flexion_l socket_z_coordinate=/jointset/knee_l/knee_flexion_l
        x_location: MultiplierFunction: scale=0.94562
          SimmSpline: x=(-2.0944 -2 -1.5708 -1.4575 -1.3963 -1.0472 -0.69813 -0.52639 -0.34907 -0.17453 0 0.00017453 0.00034907 0.027925 0.087266 0.17453 2.0944)
              y=(0.015581 0.017994 0.027508 0.029656 0.030762 0.03657 0.042207 0.04509 0.048391 0.05343 0.061758 0.061767 0.061776 0.063308 0.066994 0.073303 0.057348)
        y_location: MultiplierFunction: scale=1.04411
          SimmSpline: x=(-2.0944 -2 -1.5708 -1.4575 -1.3963 -1.0472 -0.69813 -0.52639 -0.34907 -0.17453 0 0.00017453 0.00034907 0.027925 0.087266 0.17453 2.0944)
              y=(0.023412 0.023761 0.025114 0.025279 0.025315 0.024918 0.024237 0.023845 0.02342 0.022764 0.020984 0.020981 0.020979 0.020522 0.019175 0.015955 -0.067377)
        z_location: MultiplierFunction: scale=0.94562
          SimmSpline: x=(-2.0944 0.1745) y=(-0.0014 -0.0014)
    Thelen2003Muscle vas_lat_l: min_control=0.01 optimal_force=1 max_isometric_force=1871
        optimal_fiber_length=0.08714302 tendon_slack_length=0.1628745 pennation_angle_at_optimal=0.087266
        max_contraction_velocity=10 FmaxTendonStrain=0.033 FmaxMuscleStrain=0.6 KshapeActive=0.5 KshapePassive=4 Af=0.3
        Flen=1.8 activation_time_constant=0.01 deactivation_time_constant=0.04
      PathPoint P1: femur_l (0.00572717 -0.19267 -0.0416413)
      PathPoint P2: femur_l (0.032096 -0.269259 -0.0488002)
      ConditionalPathPoint P3: femur_l (0.0430731 -0.418802 -0.0244598)
          socket_coordinate=/jointset/knee_l/knee_flexion_l range=(-2.618 -1.21)
      ConditionalPathPoint P4: femur_l (0.0301869 -0.440937 -0.0219541)
          socket_coordinate=/jointset/knee_l/knee_flexion_l range=(-2.618 -1.92)
      MovingPathPoint P5: tibia_l socket_x_coordinate=/jointset/knee_l/knee_flexion_l
          socket_y_coordinate=/jointset/knee_l/knee_flexion_l socket_z_coordinate=/jointset/knee_l/knee_flexion_l
        x_location: MultiplierFunction: scale=0.94562
          SimmSpline: x=(-2.0944 -2 -1.5708 -1.4575 -1.3963 -1.0472 -0.69813 -0.52639 -0.34907 -0.17453 0 0.00017453 0.00034907 0.027925 0.087266 0.17453 2.0944)
              y=(0.01429 0.016703 0.026215 0.028362 0.029467 0.035271 0.040878 0.043729 0.04697 0.051874 0.059956 0.059965 0.059974 0.061458 0.065035 0.071187 0.058377)
        y_location: MultiplierFunction: scale=1.04411
          SimmSpline: x=(-2.0944 -2 -1.5708 -1.4575 -1.3963 -1.0472 -0.69813 -0.52639 -0.34907 -0.17453 0 0.00017453 0.00034907 0.027925 0.087266 0.17453 2.0944)
              y=(0.021532 0.021881 0.023236 0.023402 0.023437 0.023044 0.022384 0.022015 0.021636 0.021097 0.019586 0.019584 0.019582 0.01919 0.018008 0.015107 -0.065342)
        z_location: MultiplierFunction: scale=0.94562
          SimmSpline: x=(-2.0944 2.0944) y=(-0.0165 -0.0165)
    Thelen2003Muscle vas_med_l: min_control=0.01 optimal_force=1 max_isometric_force=1294
        optimal_fiber_length=0.09193494 tendon_slack_length=0.1301551 pennation_angle_at_optimal=0.087266
        max_contraction_velocity=10 FmaxTendonStrain=0.033 FmaxMuscleStrain=0.6 KshapeActive=0.5 KshapePassive=4 Af=0.3
        Flen=1.8 activation_time_constant=0.01 deactivation_time_constant=0.04
      PathPoint P1: femur_l (0.0167042 -0.21813 -0.0224314)
      PathPoint P2: femur_l (0.0424765 -0.287757 -0.00107384)
      ConditionalPathPoint P3: femur_l (0.0441469 -0.420672 0.0149145)
          socket_coordinate=/jointset/knee_l/knee_flexion_l range=(-2.618 -1.21)
      ConditionalPathPoint P4: femur_l (0.0326926 -0.442184 0.0156304)
          socket_coordinate=/jointset/knee_l/knee_flexion_l range=(-2.618 -1.7801)
      MovingPathPoint P5: tibia_l socket_x_coordinate=/jointset/knee_l/knee_flexion_l
          socket_y_coordinate=/jointset/knee_l/knee_flexion_l socket_z_coordinate=/jointset/knee_l/knee_flexion_l
        x_location: MultiplierFunction: scale=0.94562
          SimmSpline: x=(-2.0944 -2 -1.5708 -1.4575 -1.3963 -1.0472 -0.69813 -0.52639 -0.34907 -0.17453 0 0.00017453 0.00034907 0.027925 0.087266 0.17453 2.0944)
              y=(0.009811 0.012224 0.021737 0.023885 0.02499 0.030796 0.036419 0.039287 0.042565 0.047576 0.055959 0.055968 0.055978 0.057542 0.061337 0.06795 0.062933)
        y_location: MultiplierFunction: scale=1.04411
          SimmSpline: x=(-2.0944 -2 -1.5708 -1.4575 -1.3963 -1.0472 -0.69813 -0.52639 -0.34907 -0.17453 0 0.00017453 0.00034907 0.027925 0.087266 0.17453 2.0944)
              y=(0.022415 0.022765 0.024126 0.024293 0.024329 0.023946 0.023359 0.023068 0.022834 0.022636 0.021792 0.02179 0.021789 0.021536 0.020684 0.018327 -0.06562)
        z_location: MultiplierFunction: scale=0.94562
          SimmSpline: x=(-2.0944 2.0944) y=(0.0146 0.0146)
  MarkerSet:
    Marker RASI: pelvis (0.0242014 0.0270695 0.123548)
    Marker LASI: pelvis (0.0234271 0.0270206 -0.122252)
    Marker LPSI: pelvis (-0.170658 0.0556323 -0.0430725)
    Marker RPSI: pelvis (-0.167703 0.054792 0.0410456)
    Marker LHJC: femur_l (0 0 0) fixed=true
    Marker RHJC: femur_r (0 0 0) fixed=true
    Marker RLFC: femur_r (0.00100347 -0.405457 0.0601325)
    Marker RMFC: femur_r (-0.001496 -0.421444 -0.0623956)
    Marker RTH1: femur_r (-0.0593575 -0.1648 0.0664715)
    Marker RTH2: femur_r (0.0200064 -0.227748 0.0903072)
    Marker RTH3: femur_r (-0.0459726 -0.304883 0.0711743)
    Marker RTH4: femur_r (-0.0107828 -0.156063 0.0942267)
    Marker RTH5: femur_r (0.0393138 -0.153508 0.101692)
    Marker RTH6: femur_r (0.0957715 -0.157128 0.0571863)
    Marker RTH7: femur_r (0.101959 -0.222785 0.0453277)
    Marker RTH8: femur_r (0.00167712 -0.306743 0.0770172)
    Marker RTH9: femur_r (0.04164 -0.293285 0.075328)
    Marker RTH10: femur_r (0.0867298 -0.301518 0.0312216)
    Marker RKJC: tibia_r (0 0 0) fixed=true
    Marker RTB1: tibia_r (0.0488795 -0.143736 0.0144229)
    Marker RTB2: tibia_r (-0.00322031 -0.21599 0.0754328)
    Marker RTB3: tibia_r (0.0394027 -0.282625 0.0113605)
    Marker RTB4: tibia_r (0.0213406 -0.145135 0.0647305)
    Marker RTB5: tibia_r (-0.0299112 -0.147939 0.0865936)
    Marker RTB6: tibia_r (-0.0908928 -0.155283 0.0500426)
    Marker RTB7: tibia_r (-0.089648 -0.21623 0.0363231)
    Marker RTB8: tibia_r (0.0220501 -0.283436 0.0523608)
    Marker RTB9: tibia_r (-0.0176841 -0.288956 0.0694472)
    Marker RTB10: tibia_r (-0.0674447 -0.290045 0.0414411)
    Marker RAJC: talus_r (0 0 0) fixed=true
    Marker RCAL: calcn_r (-0.0195549 0.0210358 0.000719038)
    Marker RMT1: toes_r (-0.00628779 0.0302569 -0.0512377)
    Marker RMT5: toes_r (-0.0185043 0.00751691 0.0664882)
    Marker LLFC: femur_l (-0.000392424 -0.409666 -0.0613278)
    Marker LMFC: femur_l (-3.52072e-5 -0.413669 0.0579203)
    Marker LTH1: femur_l (-0.0368337 -0.148574 -0.0928635)
    Marker LTH2: femur_l (0.0343396 -0.218917 -0.0904866)
    Marker LTH3: femur_l (-0.0411122 -0.286053 -0.0765683)
    Marker LTH4: femur_l (0.0123737 -0.153479 -0.0980591)
    Marker LTH5: femur_l (0.0627714 -0.153034 -0.0937153)
    Marker LTH6: femur_l (0.111969 -0.137998 -0.0424015)
    Marker LTH7: femur_l (0.108199 -0.219579 -0.0331447)
    Marker LTH8: femur_l (0.00375048 -0.287369 -0.0781054)
    Marker LTH9: femur_l (0.0401496 -0.288963 -0.0737129)
    Marker LTH10: femur_l (0.0923502 -0.292955 -0.0210609)
    Marker LKJC: tibia_l (0 0 0) fixed=true
    Marker LTB1: tibia_l (0.0397975 -0.128815 -0.000310888)
    Marker LTB2: tibia_l (0.0102507 -0.200486 -0.0760967)
    Marker LTB3: tibia_l (0.0381472 -0.271195 -0.0163394)
    Marker LTB4: tibia_l (0.0361726 -0.109776 -0.053971)
    Marker LTB5: tibia_l (-0.000344065 -0.122012 -0.0861906)
    Marker LTB6: tibia_l (-0.0707205 -0.121599 -0.0714835)
    Marker LTB7: tibia_l (-0.0798271 -0.189781 -0.0594723)
    Marker LTB8: tibia_l (0.0273121 -0.256209 -0.0520454)
    Marker LTB9: tibia_l (-0.0174719 -0.26732 -0.0742389)
    Marker LTB10: tibia_l (-0.0695094 -0.25563 -0.0447518)
    Marker LAJC: talus_l (0 0 0) fixed=true
    Marker LCAL: calcn_l (-0.0187493 0.0183355 0.00154343)
    Marker LMT1: toes_l (-0.00550322 0.0237104 0.063144)
    Marker LMT5: toes_l (-0.0175547 0.0142475 -0.0543021)
    Marker LLMAL: tibia_l (-0.0102622 -0.416167 -0.0478825)
    Marker LMMAL: tibia_l (0.007722 -0.402337 0.0381422)
    Marker RLMAL: tibia_r (-0.0135135 -0.412109 0.0486249)
    Marker RMMAL: tibia_r (0.0123429 -0.402418 -0.0359685)
