# OpenSim document version 30000
Model GU_lowlimbs_R29:
  length_units: meters
  force_units: N
  gravity: 0 -9.8066 0
  credits:
    Delp S.L., Loan J.P., Hoy M.G., Zajac F.E., Topp E.L., Rosen J.M., Thelen D.G., Anderson F.C., Seth A.
  publications:
    Notes: 3D, 23 DOF gait model created by D.G. Thelen, Univ. of Wisconsin-Madison, and Ajay Seth, Frank C. Anderson, and Scott L. Delp, Stanford University. Lower extremity joint defintions based on Delp et al. (1990). Low back joint and anthropometry based on Anderson and Pandy (1999, 2001). Planar knee model of Yamaguchi and Zajac (1989). Seth removed the patella to avoid kinematic constraints; insertions of the quadrucepts are handled with moving points in the tibia frame. Delp, S.L., Loan, J.P., Hoy, M.G., Zajac, F.E., Topp E.L., Rosen, J.M.: An interactive graphics-based model of the lower extremity to study orthopaedic surgical procedures, IEEE Transactions on Biomedical Engineering, vol. 37, pp. 757-767, 1990. Yamaguchi G.T., Zajac F.E.: A planar model of the knee joint to characterize the knee extensor mechanism." J . Biomecl7. vol. 21. pp. 1-10. 1989. Anderson F.C., Pandy M.G.: A dynamic optimization solution for vertical jumping in three dimensions. Computer Methods in Biomechanics and Biomedical Engineering 2:201-231, 1999. Anderson F.C., Pandy M.G.: Dynamic optimization of human walking. Journal of Biomechanical Engineering 123:381-390, 2001.
  BodySet:
    Body ground: mass=0 mass_center=(0 0 0) inertia_xx=0 inertia_yy=0 inertia_zz=0
    Body pelvis: mass=9.756177 mass_center=(-0.0650183 0 0) inertia_xx=0.07894067 inertia_yy=0.07894067
        inertia_zz=0.03991978 meshes=(sacrum.vtp pelvis.vtp l_pelvis.vtp)
      CustomJoint ground_pelvis: parent_body=ground location_in_parent=(0 0 0) location=(0 0 0)
        Coordinate pelvis_tilt: motion_type=rotational default_value=0 range=(-1.570796 1.570796) clamped=true
        Coordinate pelvis_list: motion_type=rotational default_value=0 range=(-1.570796 1.570796) clamped=true
        Coordinate pelvis_rotation: motion_type=rotational default_value=0 range=(-1.570796 1.570796) clamped=true
        Coordinate pelvis_tx: motion_type=translational default_value=0 range=(-5 5) clamped=true
        Coordinate pelvis_ty: motion_type=translational default_value=0.93 range=(-1 2) clamped=true
        Coordinate pelvis_tz: motion_type=translational default_value=0 range=(-3 3) clamped=true
        SpatialTransform:
          TransformAxis rotation1: coordinates=pelvis_tilt axis=(0 0 1) LinearFunction(coefficients=1 0)
          TransformAxis rotation2: coordinates=pelvis_list axis=(1 0 0) LinearFunction(coefficients=1 0)
          TransformAxis rotation3: coordinates=pelvis_rotation axis=(0 1 0) LinearFunction(coefficients=1 0)
          TransformAxis translation1: coordinates=pelvis_tx axis=(1 0 0) LinearFunction(coefficients=1 0)
          TransformAxis translation2: coordinates=pelvis_ty axis=(0 1 0) LinearFunction(coefficients=1 0)
          TransformAxis translation3: coordinates=pelvis_tz axis=(0 0 1) LinearFunction(coefficients=1 0)
      WrapEllipsoid PS_at_brim_r: translation=(-0.073387 -0.059187 0.0644112) quadrant=all
          dimensions=(0.0478211 0.044526 0.0697133)
      WrapEllipsoid IL_at_brim_r: translation=(-0.0629951 -0.0504085 0.07423) quadrant=all
          dimensions=(0.050488 0.0601825 0.0697133)
      WrapEllipsoid Gmax_at_pelvis_r: xyz_body_rotation=(-0.637045 0.383623 -0.684867)
          translation=(-0.0731111 -0.0746625 0.0652949) quadrant=all dimensions=(0.0365683 0.0377294 0.0570275)
      WrapEllipsoid PS_at_brim_l: translation=(-0.073387 -0.059187 -0.0644112) quadrant=all
          dimensions=(0.0478211 0.044526 0.0697133)
      WrapEllipsoid IL_at_brim_l: translation=(-0.0629951 -0.0504085 -0.07423) quadrant=all
          dimensions=(0.050488 0.0601825 0.0697133)
      WrapEllipsoid Gmax_at_pelvis_l: xyz_body_rotation=(0.637045 -0.383623 -0.684867)
          translation=(-0.0731111 -0.0746625 -0.0652949) quadrant=all dimensions=(0.0365683 0.0377294 0.0570275)
    Body femur_r: mass=11.27681 mass_center=(0 -0.181553 0) inertia_xx=0.1847119 inertia_yy=0.04765465
        inertia_zz=0.1847119 meshes=femur_r.vtp
      CustomJoint hip_r: parent_body=pelvis location_in_parent=(-0.06501827 -0.0598205 0.08198681) location=(0 0 0)
        Coordinate hip_flexion_r: motion_type=rotational default_value=0 range=(-0.3490659 1.745329) clamped=true
        Coordinate hip_adduction_r: motion_type=rotational default_value=0 range=(-0.6981317 0.1745329) clamped=true
        Coordinate hip_rotation_r: motion_type=rotational default_value=0 range=(-0.6981317 0.6981317) clamped=true
        SpatialTransform: axes_held_at_zero=(translation1 translation2 translation3)
          TransformAxis rotation1: coordinates=hip_flexion_r axis=(0 0 1) LinearFunction(coefficients=1 0)
          TransformAxis rotation2: coordinates=hip_adduction_r axis=(1 0 0) LinearFunction(coefficients=1 0)
          TransformAxis rotation3: coordinates=hip_rotation_r axis=(0 1 0) LinearFunction(coefficients=1 0)
    Body origin_tibia_r: mass=3.758409 mass_center=(0 -0.1867 0) inertia_xx=0.05109206 inertia_yy=0.00517003
        inertia_zz=0.05180168
      CustomJoint knee_r: parent_body=femur_r location_in_parent=(0 0 0) location=(0 0 0)
        Coordinate knee_flexion_r: motion_type=rotational default_value=0 default_speed_value=2.7609
            range=(-1.745329 0) clamped=true
        Coordinate knee_adduction_r: motion_type=rotational default_value=0 default_speed_value=1.024
            range=(-0.2618 0.2618) clamped=true locked=true
        Coordinate knee_internal_rotation_r: motion_type=rotational default_value=0 default_speed_value=-0.016852
            range=(-0.2618 0.2618) clamped=true locked=true
        SpatialTransform: axes_held_at_zero=translation3
          TransformAxis rotation1: coordinates=knee_flexion_r axis=(0 0 1) LinearFunction(coefficients=1 0)
          TransformAxis rotation2: coordinates=knee_adduction_r axis=(1 0 0) LinearFunction(coefficients=1 0)
          TransformAxis rotation3: coordinates=knee_internal_rotation_r axis=(0 1 0) LinearFunction(coefficients=1 0)
          TransformAxis translation1: coordinates=knee_flexion_r axis=(1 0 0)
            MultiplierFunction: scale=1.05823
              SimmSpline: x=(-2.0944 -1.7453 -1.3963 -1.0472 -0.69813 -0.34907 -0.17453 0.19734 0.33739 0.49018 1.5215 2.0944)
                  y=(-0.0032 0.00179 0.00411 0.0041 0.00212 -0.001 -0.0031 -0.005227 -0.005435 -0.005574 -0.005435 -0.00525)
          TransformAxis translation2: coordinates=knee_flexion_r axis=(0 1 0)
            MultiplierFunction: scale=1.06796
              SimmSpline: x=(-2.0944 -1.2217 -0.5236 -0.34907 -0.17453 0.15915 2.0944)
                  y=(-0.4226 -0.4082 -0.399 -0.3976 -0.3966 -0.39526 -0.396)
    Body medial_tibia_body_r: mass=1.013731e-8 mass_center=(0 0 0) inertia_xx=1.013731e-8 inertia_yy=1.013731e-8
        inertia_zz=1.013731e-8
      CustomJoint medial_tibia_r: parent_body=origin_tibia_r location_in_parent=(0 -0.035 -0.02)
          location=(0 -0.035 -0.02)
        Coordinate medial_tibia_flex_r: motion_type=rotational default_value=0 range=(-1e-8 1e-8) clamped=false
            locked=true
        Coordinate medial_tibia_add_r: motion_type=rotational default_value=0 range=(-1e-8 1e-8) clamped=false
            locked=true
        Coordinate medial_tibia_int_r: motion_type=rotational default_value=0 range=(-1e-8 1e-8) clamped=false
            locked=true
        SpatialTransform: axes_held_at_zero=(translation1 translation2 translation3)
          TransformAxis rotation1: coordinates=medial_tibia_flex_r axis=(0 0 1) LinearFunction(coefficients=1 0)
          TransformAxis rotation2: coordinates=medial_tibia_add_r axis=(1 0 0) LinearFunction(coefficients=1 0)
          TransformAxis rotation3: coordinates=medial_tibia_int_r axis=(0 1 0) LinearFunction(coefficients=1 0)
    Body tibia_r: mass=1.111056e-8 mass_center=(0 0 0) inertia_xx=1.194081e-8 inertia_yy=1.174785e-8
        inertia_zz=1.174785e-8 meshes=(tibia_r.vtp fibula.vtp)
      CustomJoint lateral_tibia_r: parent_body=medial_tibia_body_r location_in_parent=(0 -0.035 0.02)
          location=(0 -0.0368851 0.020396)
        Coordinate lateral_tibia_flex_r: motion_type=rotational default_value=0 range=(0 0) clamped=false locked=true
        Coordinate lateral_tibia_add_r: motion_type=rotational default_value=0 range=(0 0) clamped=false locked=true
        Coordinate lateral_tibia_int_r: motion_type=rotational default_value=0 range=(0 0) clamped=false locked=true
        SpatialTransform: axes_held_at_zero=(translation1 translation2 translation3)
          TransformAxis rotation1: coordinates=lateral_tibia_flex_r axis=(0 0 1) LinearFunction(coefficients=1 0)
          TransformAxis rotation2: coordinates=lateral_tibia_add_r axis=(1 0 0) LinearFunction(coefficients=1 0)
          TransformAxis rotation3: coordinates=lateral_tibia_int_r axis=(0 1 0) LinearFunction(coefficients=1 0)
    Body talus_r: mass=0.1013731 mass_center=(0 0 0) inertia_xx=0.001013731 inertia_yy=0.001013731
        inertia_zz=0.001013731 meshes=talus.vtp
      CustomJoint ankle_r: parent_body=tibia_r location_in_parent=(0 -0.4478905 0) location=(0 0 0)
        Coordinate ankle_angle_r: motion_type=rotational default_value=0 default_speed_value=2.4312
            range=(-0.5235988 0.3490659) clamped=true
        Coordinate ankle_Y_angle_r: motion_type=rotational default_value=0 default_speed_value=2.4312
            range=(-1.34 1.34) clamped=false locked=true
        SpatialTransform: axes_held_at_zero=(rotation3 translation1 translation2 translation3)
          TransformAxis rotation1: coordinates=ankle_angle_r axis=(0 0 1) LinearFunction(coefficients=1 0)
          TransformAxis rotation2: coordinates=ankle_Y_angle_r axis=(0 1 0) LinearFunction(coefficients=1 0)
    Body calcn_r: mass=1.540599 mass_center=(0.105864 0.03 0) inertia_xx=0.001981599 inertia_yy=0.005410839
        inertia_zz=0.005410839 meshes=foot.vtp
      CustomJoint subtalar_r: parent_body=talus_r location_in_parent=(-0.04877 -0.04195 0.00792) location=(0 0 0)
        Coordinate subtalar_angle_r: motion_type=rotational default_value=0 default_speed_value=1.9105
            range=(-1.5708 1.5708) clamped=false locked=true
        SpatialTransform: axes_held_at_zero=(rotation2 rotation3 translation1 translation2 translation3)
          TransformAxis rotation1: coordinates=subtalar_angle_r axis=(0.78718 0.60475 -0.12095)
              LinearFunction(coefficients=1 0)
    Body toes_r: mass=0.2521678 mass_center=(0.0346 0.006 -0.0200977) inertia_xx=0.0001337025 inertia_yy=0.0002414827
        inertia_zz=0.0002414827 meshes=bofoot.vtp
      CustomJoint mtp_r: parent_body=calcn_r location_in_parent=(0.1892848 -0.002 0.001240315) location=(0 0 0)
        Coordinate mtp_angle_r: motion_type=rotational default_value=0 range=(-1.5708 1.5708) clamped=false locked=true
        SpatialTransform: axes_held_at_zero=(rotation2 rotation3 translation1 translation2 translation3)
          TransformAxis rotation1: coordinates=mtp_angle_r axis=(-0.58095 0 0.81394) LinearFunction(coefficients=1 0)
    Body femur_l: mass=11.78321 mass_center=(0 -0.18455 0) inertia_xx=0.1992983 inertia_yy=0.05118575
        inertia_zz=0.1992983 meshes=femur_l.vtp
      CustomJoint hip_l: parent_body=pelvis location_in_parent=(-0.06501827 -0.0598205 -0.08198681) location=(0 0 0)
        Coordinate hip_flexion_l: motion_type=rotational default_value=0 range=(-0.3490659 1.745329) clamped=true
        Coordinate hip_adduction_l: motion_type=rotational default_value=0 range=(-0.6981317 0.1745329) clamped=true
        Coordinate hip_rotation_l: motion_type=rotational default_value=0 range=(-0.6981317 0.6981317) clamped=true
        SpatialTransform: axes_held_at_zero=(translation1 translation2 translation3)
          TransformAxis rotation1: coordinates=hip_flexion_l axis=(0 0 1) LinearFunction(coefficients=1 0)
          TransformAxis rotation2: coordinates=hip_adduction_l axis=(-1 0 0) LinearFunction(coefficients=1 0)
          TransformAxis rotation3: coordinates=hip_rotation_l axis=(0 -1 0) LinearFunction(coefficients=1 0)
    Body origin_tibia_l: mass=3.758409 mass_center=(0 -0.1867 0) inertia_xx=0.05109206 inertia_yy=0.00517003
        inertia_zz=0.05180168
      CustomJoint knee_l: parent_body=femur_l location_in_parent=(0 0 0) location=(0 0 0)
        Coordinate knee_flexion_l: motion_type=rotational default_value=0 default_speed_value=-1.396
            range=(-1.745329 0) clamped=true
        Coordinate knee_adduction_l: motion_type=rotational default_value=0 default_speed_value=-0.0041346
            range=(-0.2618 0.2618) clamped=true locked=true
        Coordinate knee_internal_rotation_l: motion_type=rotational default_value=0 default_speed_value=0.26356
            range=(-0.2618 0.2618) clamped=true locked=true
        SpatialTransform: axes_held_at_zero=translation3
          TransformAxis rotation1: coordinates=knee_flexion_l axis=(0 0 1) LinearFunction(coefficients=1 0)
          TransformAxis rotation2: coordinates=knee_adduction_l axis=(-1 0 0) LinearFunction(coefficients=1 0)
          TransformAxis rotation3: coordinates=knee_internal_rotation_l axis=(0 -1 0) LinearFunction(coefficients=1 0)
          TransformAxis translation1: coordinates=knee_flexion_l axis=(1 0 0)
            MultiplierFunction: scale=1.07291
              SimmSpline: x=(-2.0944 -1.7453 -1.3963 -1.0472 -0.69813 -0.34907 -0.17453 0.19734 0.33739 0.49018 1.5215 2.0944)
                  y=(-0.0032 0.00179 0.00411 0.0041 0.00212 -0.001 -0.0031 -0.005227 -0.005435 -0.005574 -0.005435 -0.00525)
          TransformAxis translation2: coordinates=knee_flexion_l axis=(0 1 0)
            MultiplierFunction: scale=1.08559
              SimmSpline: x=(-2.0944 -1.2217 -0.5236 -0.34907 -0.17453 0.15915 2.0944)
                  y=(-0.4226 -0.4082 -0.399 -0.3976 -0.3966 -0.39526 -0.396)
    Body medial_tibia_body_l: mass=1.013731e-8 mass_center=(0 0 0) inertia_xx=1.013731e-8 inertia_yy=1.013731e-8
        inertia_zz=1.013731e-8
      CustomJoint medial_tibia_l: parent_body=origin_tibia_l location_in_parent=(0 -0.035 -0.02)
          location=(0 -0.035 -0.02)
        Coordinate medial_tibia_flex_l: motion_type=rotational default_value=0 range=(0 0) clamped=false locked=true
        Coordinate medial_tibia_add_l: motion_type=rotational default_value=0 range=(0 0) clamped=false locked=true
        Coordinate medial_tibia_int_l: motion_type=rotational default_value=0 range=(0 0) clamped=false locked=true
        SpatialTransform: axes_held_at_zero=(translation1 translation2 translation3)
          TransformAxis rotation1: coordinates=medial_tibia_flex_l axis=(0 0 1) LinearFunction(coefficients=1 0)
          TransformAxis rotation2: coordinates=medial_tibia_add_l axis=(1 0 0) LinearFunction(coefficients=1 0)
          TransformAxis rotation3: coordinates=medial_tibia_int_l axis=(0 1 0) LinearFunction(coefficients=1 0)
    Body tibia_l: mass=9.548646e-9 mass_center=(0 0 0) inertia_xx=9.46427e-9 inertia_yy=9.043937e-9
        inertia_zz=9.043937e-9 meshes=(tibia_l.vtp fibula_l.vtp)
      CustomJoint lateral_tibia_l: parent_body=medial_tibia_body_l location_in_parent=(0 -0.035 0.02)
          location=(0 -0.03650395 0.01900656)
        Coordinate lateral_tibia_flex_l: motion_type=rotational default_value=0 range=(0 0) clamped=false locked=true
        Coordinate lateral_tibia_add_l: motion_type=rotational default_value=0 range=(0 0) clamped=false locked=true
        Coordinate lateral_tibia_int_l: motion_type=rotational default_value=0 range=(0 0) clamped=false locked=true
        SpatialTransform: axes_held_at_zero=(translation1 translation2 translation3)
          TransformAxis rotation1: coordinates=lateral_tibia_flex_l axis=(0 0 1) LinearFunction(coefficients=1 0)
          TransformAxis rotation2: coordinates=lateral_tibia_add_l axis=(1 0 0) LinearFunction(coefficients=1 0)
          TransformAxis rotation3: coordinates=lateral_tibia_int_l axis=(0 1 0) LinearFunction(coefficients=1 0)
    Body talus_l: mass=0.1013731 mass_center=(0 0 0) inertia_xx=0.001013731 inertia_yy=0.001013731
        inertia_zz=0.001013731 meshes=l_talus.vtp
      CustomJoint ankle_l: parent_body=tibia_l location_in_parent=(0 -0.4432623 0) location=(0 0 0)
        Coordinate ankle_angle_l: motion_type=rotational default_value=0 default_speed_value=3.0002
            range=(-0.5235988 0.3490659) clamped=true
        Coordinate ankle_Y_angle_l: motion_type=rotational default_value=0 default_speed_value=2.4312
            range=(-1.34 1.34) clamped=true locked=true
        SpatialTransform: axes_held_at_zero=(rotation3 translation1 translation2 translation3)
          TransformAxis rotation1: coordinates=ankle_angle_l axis=(0 0 1) LinearFunction(coefficients=1 0)
          TransformAxis rotation2: coordinates=ankle_Y_angle_l axis=(0 -1 0) LinearFunction(coefficients=1 0)
    Body calcn_l: mass=1.527706 mass_center=(0.105403 0.03 0) inertia_xx=0.001957094 inertia_yy=0.005323506
        inertia_zz=0.005323506 meshes=l_foot.vtp
      CustomJoint subtalar_l: parent_body=talus_l location_in_parent=(-0.04877 -0.04195 -0.00792) location=(0 0 0)
        Coordinate subtalar_angle_l: motion_type=rotational default_value=0 default_speed_value=-1.5971
            range=(-1.5708 1.5708) clamped=false locked=true
        SpatialTransform: axes_held_at_zero=(rotation2 rotation3 translation1 translation2 translation3)
          TransformAxis rotation1: coordinates=subtalar_angle_l axis=(-0.78718 -0.60475 -0.12095)
              LinearFunction(coefficients=1 0)
    Body toes_l: mass=0.2511512 mass_center=(0.0346 0.006 0.0200167) inertia_xx=0.0001326266 inertia_yy=0.0002402407
        inertia_zz=0.0002402407 meshes=l_bofoot.vtp
      CustomJoint mtp_l: parent_body=calcn_l location_in_parent=(0.1884606 -0.002 -0.001235315) location=(0 0 0)
        Coordinate mtp_angle_l: motion_type=rotational default_value=0 range=(-1.0472 1.0472) clamped=false locked=true
        SpatialTransform: axes_held_at_zero=(rotation2 rotation3 translation1 translation2 translation3)
          TransformAxis rotation1: coordinates=mtp_angle_l axis=(0.58095 0 0.81394) LinearFunction(coefficients=1 0)
  ForceSet:
    Thelen2003Muscle add_long_r: min_control=0.01 max_control=1 optimal_force=1 max_isometric_force=627
        optimal_fiber_length=0.1320875 tendon_slack_length=0.128855 pennation_angle_at_optimal=0.10472 [radians]
        max_contraction_velocity=10 activation_time_constant=0.01 deactivation_time_constant=0.04
        FmaxTendonStrain=0.033 FmaxMuscleStrain=0.6 KshapeActive=0.5 KshapePassive=4 Af=0.3 Flen=1.8
      PathPoint P1: pelvis (-0.0290605 -0.075658 0.0165937)
      PathPoint P2: femur_r (0.00529115 -0.225446 0.0247626)
    Thelen2003Muscle add_brev_r: min_control=0.01 max_control=1 optimal_force=1 max_isometric_force=429
        optimal_fiber_length=0.1307558 tendon_slack_length=0.02927248 pennation_angle_at_optimal=0
        max_contraction_velocity=10 activation_time_constant=0.01 deactivation_time_constant=0.04
        FmaxTendonStrain=0.033 FmaxMuscleStrain=0.6 KshapeActive=0.5 KshapePassive=4 Af=0.3 Flen=1.8
      PathPoint P1: pelvis (-0.0539826 -0.0828075 0.0161028)
      PathPoint P2: femur_r (0.000952407 -0.127728 0.031112)
    Thelen2003Muscle add_mag1_r: min_control=0.01 max_control=1 optimal_force=1 max_isometric_force=381
        optimal_fiber_length=0.08264804 tendon_slack_length=0.07129299 pennation_angle_at_optimal=0.087266
        max_contraction_velocity=10 activation_time_constant=0.01 deactivation_time_constant=0.04
        FmaxTendonStrain=0.033 FmaxMuscleStrain=0.6 KshapeActive=0.5 KshapePassive=4 Af=0.3 Flen=1.8
      PathPoint P1: pelvis (-0.0673174 -0.106247 0.0250379)
      PathPoint P2: femur_r (-0.00476203 -0.12933 0.035874)
    Thelen2003Muscle add_mag2_r: min_control=0.01 max_control=1 optimal_force=1 max_isometric_force=343
        optimal_fiber_length=0.1120291 tendon_slack_length=0.1434311 pennation_angle_at_optimal=0.05236
        max_contraction_velocity=10 activation_time_constant=0.01 deactivation_time_constant=0.04
        FmaxTendonStrain=0.033 FmaxMuscleStrain=0.6 KshapeActive=0.5 KshapePassive=4 Af=0.3 Flen=1.8
      PathPoint P1: pelvis (-0.0764218 -0.107876 0.0302418)
      PathPoint P2: femur_r (0.00571444 -0.244029 0.0240218)
    Thelen2003Muscle add_mag3_r: min_control=0.01 max_control=1 optimal_force=1 max_isometric_force=488
        optimal_fiber_length=0.1196986 tendon_slack_length=0.2855964 pennation_angle_at_optimal=0.087266
        max_contraction_velocity=10 activation_time_constant=0.01 deactivation_time_constant=0.04
        FmaxTendonStrain=0.033 FmaxMuscleStrain=0.6 KshapeActive=0.5 KshapePassive=4 Af=0.3 Flen=1.8
      PathPoint P1: pelvis (-0.102153 -0.103288 0.0479353)
      PathPoint P2: femur_r (0.00740761 -0.409776 -0.0281489)
    Thelen2003Muscle bifemlh_r: min_control=0.01 max_control=1 optimal_force=1 max_isometric_force=896
        optimal_fiber_length=0.1009537 tendon_slack_length=0.3597734 pennation_angle_at_optimal=0
        max_contraction_velocity=10 activation_time_constant=0.01 deactivation_time_constant=0.04
        FmaxTendonStrain=0.033 FmaxMuscleStrain=0.6 KshapeActive=0.5 KshapePassive=4 Af=0.3 Flen=1.8
      PathPoint P1: pelvis (-0.115837 -0.0928259 0.0681816)
      PathPoint P2: tibia_r (-0.030696 -0.037939 0.0300127)
      PathPoint P3: tibia_r (-0.0238633 -0.0593323 0.0349791)
    Thelen2003Muscle bifemsh_r: min_control=0.01 max_control=1 optimal_force=1 max_isometric_force=804
        optimal_fiber_length=0.1659137 tendon_slack_length=0.1109534 pennation_angle_at_optimal=0.40143
        max_contraction_velocity=10 activation_time_constant=0.01 deactivation_time_constant=0.04
        FmaxTendonStrain=0.033 FmaxMuscleStrain=0.6 KshapeActive=0.5 KshapePassive=4 Af=0.3 Flen=1.8
      PathPoint P1: femur_r (0.00529115 -0.225446 0.0247626)
      PathPoint P2: tibia_r (-0.030696 -0.037939 0.0300127)
      PathPoint P3: tibia_r (-0.0238633 -0.0593323 0.0349791)
    Thelen2003Muscle glut_max1_r: min_control=0.01 max_control=1 optimal_force=1 max_isometric_force=819.15
        optimal_fiber_length=0.142057 tendon_slack_length=0.05002959 pennation_angle_at_optimal=0.087266
        max_contraction_velocity=10 activation_time_constant=0.01 deactivation_time_constant=0.04
        FmaxTendonStrain=0.033 FmaxMuscleStrain=0.6 KshapeActive=0.5 KshapePassive=4 Af=0.3 Flen=1.8
      PathPoint P1: pelvis (-0.113207 0.0312225 0.0552797)
      PathPoint P2: pelvis (-0.115598 -0.021901 0.0764883)
      PathPoint P3: femur_r (-0.0469854 -0.0348155 0.0319585)
      PathPoint P4: femur_r (-0.029313 -0.0604465 0.0497368)
      PathWrap: wrap_object=Gmax_at_pelvis_r method=hybrid
    Thelen2003Muscle glut_max2_r: min_control=0.01 max_control=1 optimal_force=1 max_isometric_force=1170.75
        optimal_fiber_length=0.1494717 tendon_slack_length=0.07895531 pennation_angle_at_optimal=0.087266
        max_contraction_velocity=10 activation_time_constant=0.01 deactivation_time_constant=0.04
        FmaxTendonStrain=0.033 FmaxMuscleStrain=0.6 KshapeActive=0.5 KshapePassive=4 Af=0.3 Flen=1.8
      PathPoint P1: pelvis (-0.121116 0.0078735 0.0453628)
      PathPoint P2: pelvis (-0.123599 -0.0551145 0.0798267)
      PathPoint P3: femur_r (-0.0476203 -0.0623689 0.0266674)
      PathPoint P4: femur_r (-0.0165084 -0.108505 0.0443398)
      PathWrap: wrap_object=Gmax_at_pelvis_r method=hybrid
    Thelen2003Muscle glut_max3_r: min_control=0.01 max_control=1 optimal_force=1 max_isometric_force=789.15
        optimal_fiber_length=0.1573216 tendon_slack_length=0.08146887 pennation_angle_at_optimal=0.087266
        max_contraction_velocity=10 activation_time_constant=0.01 deactivation_time_constant=0.04
        FmaxTendonStrain=0.033 FmaxMuscleStrain=0.6 KshapeActive=0.5 KshapePassive=4 Af=0.3 Flen=1.8
      PathPoint P1: pelvis (-0.119553 -0.0475125 0.0088369)
      PathPoint P2: pelvis (-0.11707 -0.114302 0.0427117)
      PathPoint P3: femur_r (-0.0297363 -0.120146 0.00994736)
      PathPoint P4: femur_r (-0.00634938 -0.151544 0.0434933)
      PathWrap: wrap_object=Gmax_at_pelvis_r method=hybrid
    Thelen2003Muscle glut_med1_r: min_control=0.01 max_control=1 optimal_force=1 max_isometric_force=1321.65
        optimal_fiber_length=0.07584451 tendon_slack_length=0.0482119 pennation_angle_at_optimal=0.087266
        max_contraction_velocity=10 activation_time_constant=0.01 deactivation_time_constant=0.04
        FmaxTendonStrain=0.033 FmaxMuscleStrain=0.6 KshapeActive=0.5 KshapePassive=4 Af=0.3 Flen=1.8
      PathPoint P1: pelvis (-0.0409238 0.0221725 0.115076)
      PathPoint P2: femur_r (-0.0230694 -0.0124951 0.0587318)
    Thelen2003Muscle glut_med2_r: min_control=0.01 max_control=1 optimal_force=1 max_isometric_force=924.75
        optimal_fiber_length=0.07353561 tendon_slack_length=0.06047051 pennation_angle_at_optimal=0.087266
        max_contraction_velocity=10 activation_time_constant=0.01 deactivation_time_constant=0.04
        FmaxTendonStrain=0.033 FmaxMuscleStrain=0.6 KshapeActive=0.5 KshapePassive=4 Af=0.3 Flen=1.8
      PathPoint P1: pelvis (-0.0781691 0.028598 0.0662768)
      PathPoint P2: femur_r (-0.0273023 -0.00619417 0.0557687)
    Thelen2003Muscle glut_med3_r: min_control=0.01 max_control=1 optimal_force=1 max_isometric_force=1053
        optimal_fiber_length=0.07229114 tendon_slack_length=0.04500302 pennation_angle_at_optimal=0.087266
        max_contraction_velocity=10 activation_time_constant=0.01 deactivation_time_constant=0.04
        FmaxTendonStrain=0.033 FmaxMuscleStrain=0.6 KshapeActive=0.5 KshapePassive=4 Af=0.3 Flen=1.8
      PathPoint P1: pelvis (-0.105942 -0.0066065 0.0516468)
      PathPoint P2: femur_r (-0.0326993 -0.00501941 0.0548163)
    Thelen2003Muscle glut_min1_r: min_control=0.01 max_control=1 optimal_force=1 max_isometric_force=270
        optimal_fiber_length=0.06744623 tendon_slack_length=0.01454771 pennation_angle_at_optimal=0.087266
        max_contraction_velocity=10 activation_time_constant=0.01 deactivation_time_constant=0.04
        FmaxTendonStrain=0.033 FmaxMuscleStrain=0.6 KshapeActive=0.5 KshapePassive=4 Af=0.3 Flen=1.8
      PathPoint P1: pelvis (-0.0426711 -0.0134845 0.102312)
      PathPoint P2: femur_r (-0.00761926 -0.0111068 0.0592609)
    Thelen2003Muscle glut_min2_r: min_control=0.01 max_control=1 optimal_force=1 max_isometric_force=285
        optimal_fiber_length=0.05457785 tendon_slack_length=0.02604195 pennation_angle_at_optimal=0.087266
        max_contraction_velocity=10 activation_time_constant=0.01 deactivation_time_constant=0.04
        FmaxTendonStrain=0.033 FmaxMuscleStrain=0.6 KshapeActive=0.5 KshapePassive=4 Af=0.3 Flen=1.8
      PathPoint P1: pelvis (-0.0566496 -0.012851 0.0953404)
      PathPoint P2: femur_r (-0.010159 -0.0111068 0.0592609)
    Thelen2003Muscle glut_min3_r: min_control=0.01 max_control=1 optimal_force=1 max_isometric_force=322.5
        optimal_fiber_length=0.03645282 tendon_slack_length=0.05171782 pennation_angle_at_optimal=0.087266
        max_contraction_velocity=10 activation_time_constant=0.01 deactivation_time_constant=0.04
        FmaxTendonStrain=0.033 FmaxMuscleStrain=0.6 KshapeActive=0.5 KshapePassive=4 Af=0.3 Flen=1.8
      PathPoint P1: pelvis (-0.0725593 -0.0140275 0.0783539)
      PathPoint P2: femur_r (-0.0142861 -0.00886407 0.0582027)
    Thelen2003Muscle grac_r: min_control=0.01 max_control=1 optimal_force=1 max_isometric_force=162
        optimal_fiber_length=0.3372389 tendon_slack_length=0.1695026 pennation_angle_at_optimal=0.05236
        max_contraction_velocity=10 activation_time_constant=0.01 deactivation_time_constant=0.04
        FmaxTendonStrain=0.033 FmaxMuscleStrain=0.6 KshapeActive=0.5 KshapePassive=4 Af=0.3 Flen=1.8
      PathPoint P1: pelvis (-0.0680623 -0.107424 0.0274337)
      ConditionalPathPoint P2: tibia_r (-0.0270961 -0.0336181 -0.0384873) range=(-0.43633 0.17453)
          coordinate=knee_flexion_r
      PathPoint P3: tibia_r (-0.0198147 -0.0543054 -0.0365088)
      PathPoint P4: tibia_r (0.0061188 -0.0881027 -0.0232514)
    Thelen2003Muscle iliacus_r: min_control=0.01 max_control=1 optimal_force=1 max_isometric_force=1073
        optimal_fiber_length=0.09278374 tendon_slack_length=0.09870264 pennation_angle_at_optimal=0.12217
        max_contraction_velocity=10 activation_time_constant=0.01 deactivation_time_constant=0.04
        FmaxTendonStrain=0.033 FmaxMuscleStrain=0.6 KshapeActive=0.5 KshapePassive=4 Af=0.3 Flen=1.8
      PathPoint P1: pelvis (-0.0619835 0.0330325 0.0838524)
      PathPoint P2: pelvis (-0.0237266 -0.049775 0.0796303)
      ConditionalPathPoint P3: pelvis (-0.0264855 -0.0728525 0.0801212) range=(-1.5708 0.7854) coordinate=hip_flexion_r
      PathPoint P4: femur_r (0.00179899 -0.0579902 0.00603191)
      PathPoint P5: femur_r (-0.0204238 -0.0663203 0.0136512)
    Thelen2003Muscle lat_gas_r: min_control=0.01 max_control=1 optimal_force=1 max_isometric_force=683
        optimal_fiber_length=0.06407246 tendon_slack_length=0.3940747 pennation_angle_at_optimal=0.13963
        max_contraction_velocity=10 activation_time_constant=0.01 deactivation_time_constant=0.04
        FmaxTendonStrain=0.033 FmaxMuscleStrain=0.6 KshapeActive=0.5 KshapePassive=4 Af=0.3 Flen=1.8
      PathPoint P1: femur_r (-0.0232811 -0.421417 0.0287839)
      ConditionalPathPoint P2: femur_r (-0.0317469 -0.429106 0.0289955) range=(-0.7854 0.17453)
          coordinate=knee_flexion_r
      PathPoint P3: tibia_r (-0.0246567 -0.0506432 0.0239429)
      PathPoint P4: calcn_r (0 0.031 -0.00608673)
    Thelen2003Muscle med_gas_r: min_control=0.01 max_control=1 optimal_force=1 max_isometric_force=1558
        optimal_fiber_length=0.06104278 tendon_slack_length=0.4034747 pennation_angle_at_optimal=0.29671
        max_contraction_velocity=10 activation_time_constant=0.01 deactivation_time_constant=0.04
        FmaxTendonStrain=0.033 FmaxMuscleStrain=0.6 KshapeActive=0.5 KshapePassive=4 Af=0.3 Flen=1.8
      PathPoint P1: femur_r (-0.0201064 -0.419601 -0.0248684)
      ConditionalPathPoint P2: femur_r (-0.0317469 -0.429534 -0.0273023) range=(-0.7854 0.17453)
          coordinate=knee_flexion_r
      PathPoint P3: tibia_r (-0.0221093 -0.0512756 -0.0300566)
      PathPoint P4: calcn_r (0 0.031 -0.00608673)
    Thelen2003Muscle per_brev_r: min_control=0.01 max_control=1 optimal_force=1 max_isometric_force=435
        optimal_fiber_length=0.04556679 tendon_slack_length=0.1775849 pennation_angle_at_optimal=0.087266
        max_contraction_velocity=10 activation_time_constant=0.01 deactivation_time_constant=0.04
        FmaxTendonStrain=0.033 FmaxMuscleStrain=0.6 KshapeActive=0.5 KshapePassive=4 Af=0.3 Flen=1.8
      PathPoint P1: tibia_r (-0.0071386 -0.278851 0.0331435)
      PathPoint P2: tibia_r (-0.020192 -0.440935 0.0288603)
      PathPoint P3: tibia_r (-0.0146851 -0.452633 0.0294722)
      PathPoint P4: calcn_r (0.0498619 0.027 0.0267587)
      PathPoint P5: calcn_r (0.0716699 0.0219 0.0393915)
    Thelen2003Muscle per_long_r: min_control=0.01 max_control=1 optimal_force=1 max_isometric_force=943
        optimal_fiber_length=0.04503959 tendon_slack_length=0.3726589 pennation_angle_at_optimal=0.17453
        max_contraction_velocity=10 activation_time_constant=0.01 deactivation_time_constant=0.04
        FmaxTendonStrain=0.033 FmaxMuscleStrain=0.6 KshapeActive=0.5 KshapePassive=4 Af=0.3 Flen=1.8
      PathPoint P1: tibia_r (0.0005099 -0.165245 0.0369168)
      PathPoint P2: tibia_r (-0.0211099 -0.443148 0.0291663)
      PathPoint P3: tibia_r (-0.0165208 -0.455162 0.0294722)
      PathPoint P4: calcn_r (0.0463684 0.023 0.0253805)
      PathPoint P5: calcn_r (0.0720934 0.0106 0.0326157)
      PathPoint P6: calcn_r (0.0901961 0.0069 0.0135516)
      PathPoint P7: calcn_r (0.127354 0.0085 -0.0211313)
    Thelen2003Muscle per_tert_r: min_control=0.01 max_control=1 optimal_force=1 max_isometric_force=180
        optimal_fiber_length=0.08134947 tendon_slack_length=0.1090527 pennation_angle_at_optimal=0.22689
        max_contraction_velocity=10 activation_time_constant=0.01 deactivation_time_constant=0.04
        FmaxTendonStrain=0.033 FmaxMuscleStrain=0.6 KshapeActive=0.5 KshapePassive=4 Af=0.3 Flen=1.8
      PathPoint P1: tibia_r (0.0010198 -0.295502 0.0235574)
      PathPoint P2: tibia_r (0.0233534 -0.428816 0.0162148)
      PathPoint P3: calcn_r (0.0907254 0.0228 0.0343384)
    Thelen2003Muscle psoas_r: min_control=0.01 max_control=1 optimal_force=1 max_isometric_force=1113
        optimal_fiber_length=0.09423679 tendon_slack_length=0.1521968 pennation_angle_at_optimal=0.13963
        max_contraction_velocity=10 activation_time_constant=0.01 deactivation_time_constant=0.04
        FmaxTendonStrain=0.033 FmaxMuscleStrain=0.6 KshapeActive=0.5 KshapePassive=4 Af=0.3 Flen=1.8
      PathPoint P1: pelvis (-0.0595004 0.0802735 0.0283763)
      PathPoint P2: pelvis (-0.0218873 -0.051585 0.0745245)
      ConditionalPathPoint P3: pelvis (-0.0264855 -0.0728525 0.0801212) range=(-1.5708 0.7854) coordinate=hip_flexion_r
      PathPoint P4: femur_r (0.00169317 -0.0541456 0.00402127)
      PathPoint P5: femur_r (-0.0198947 -0.0637572 0.0110056)
    Thelen2003Muscle rect_fem_r: min_control=0.01 max_control=1 optimal_force=1 max_isometric_force=1169
        optimal_fiber_length=0.1115399 tendon_slack_length=0.3374551 pennation_angle_at_optimal=0.087266
        max_contraction_velocity=10 activation_time_constant=0.01 deactivation_time_constant=0.04
        FmaxTendonStrain=0.033 FmaxMuscleStrain=0.6 KshapeActive=0.5 KshapePassive=4 Af=0.3 Flen=1.8
      PathPoint P1: pelvis (-0.0271293 -0.0281455 0.0950458)
      ConditionalPathPoint P2: femur_r (0.0353449 -0.430388 0.00201064) range=(-2.618 -1.46) coordinate=knee_flexion_r
      MovingPathPoint P3: tibia_r (0.0629808 0.0221142 0.00142772) x_coordinate=knee_flexion_r
          y_coordinate=knee_flexion_r z_coordinate=knee_flexion_r
        x_location: MultiplierFunction: scale=1.0198
          SimmSpline: x=(-2.0944 -2 -1.5708 -1.4575 -1.3963 -1.0472 -0.69813 -0.52639 -0.34907 -0.17453 0 0.00017453 0.00034907 0.027925 0.087266 0.17453 2.0944)
              y=(0.015581 0.017994 0.027508 0.029656 0.030762 0.03657 0.042207 0.04509 0.048391 0.05343 0.061758 0.061767 0.061776 0.063308 0.066994 0.073303 0.057348)
        y_location: MultiplierFunction: scale=1.05386
          SimmSpline: x=(-2.0944 -2 -1.5708 -1.4575 -1.3963 -1.0472 -0.69813 -0.52639 -0.34907 -0.17453 0 0.00017453 0.00034907 0.027925 0.087266 0.17453 2.0944)
              y=(0.023412 0.023761 0.025114 0.025279 0.025315 0.024918 0.024237 0.023845 0.02342 0.022764 0.020984 0.020981 0.020979 0.020522 0.019175 0.015955 -0.067377)
        z_location: MultiplierFunction: scale=1.0198
          SimmSpline: x=(-2.0944 0.1745) y=(0.0014 0.0014)
    Thelen2003Muscle sar_r: min_control=0.01 max_control=1 optimal_force=1 max_isometric_force=156
        optimal_fiber_length=0.4794927 tendon_slack_length=0.1555888 pennation_angle_at_optimal=0
        max_contraction_velocity=10 activation_time_constant=0.01 deactivation_time_constant=0.04
        FmaxTendonStrain=0.033 FmaxMuscleStrain=0.6 KshapeActive=0.5 KshapePassive=4 Af=0.3 Flen=1.8
      PathPoint P1: pelvis (-0.0140704 -0.0011765 0.121949)
      PathPoint P2: femur_r (-0.00317469 -0.381048 -0.0445515)
      PathPoint P3: tibia_r (-0.00571088 -0.0441567 -0.04069)
      PathPoint P4: tibia_r (0.0061188 -0.0620724 -0.0390583)
      PathPoint P5: tibia_r (0.0247811 -0.0885242 -0.025699)
    Thelen2003Muscle semimem_r: min_control=0.01 max_control=1 optimal_force=1 max_isometric_force=1288
        optimal_fiber_length=0.07524378 tendon_slack_length=0.3893909 pennation_angle_at_optimal=0.2618
        max_contraction_velocity=10 activation_time_constant=0.01 deactivation_time_constant=0.04
        FmaxTendonStrain=0.033 FmaxMuscleStrain=0.6 KshapeActive=0.5 KshapePassive=4 Af=0.3 Flen=1.8
      PathPoint P1: pelvis (-0.109621 -0.0882104 0.0702141)
      ConditionalPathPoint P2: tibia_r (-0.035489 -0.0370853 -0.0192844) range=(-0.55851 0.17453)
          coordinate=knee_flexion_r
      PathPoint P3: tibia_r (-0.0275346 -0.0502797 -0.0199575)
    Thelen2003Muscle semiten_r: min_control=0.01 max_control=1 optimal_force=1 max_isometric_force=410
        optimal_fiber_length=0.1779541 tendon_slack_length=0.2854178 pennation_angle_at_optimal=0.087266
        max_contraction_velocity=10 activation_time_constant=0.01 deactivation_time_constant=0.04
        FmaxTendonStrain=0.033 FmaxMuscleStrain=0.6 KshapeActive=0.5 KshapePassive=4 Af=0.3 Flen=1.8
      PathPoint P1: pelvis (-0.126045 -0.107876 0.0643238)
      ConditionalPathPoint P2: tibia_r (-0.0420861 -0.029585 -0.0228007) range=(-0.33161 0.17453)
          coordinate=knee_flexion_r
      PathPoint P3: tibia_r (-0.0332649 -0.0546574 -0.0229108)
      PathPoint P4: tibia_r (-0.0113147 -0.0771952 -0.0245333)
      PathPoint P5: tibia_r (0.00270359 -0.0989258 -0.0193262)
    Thelen2003Muscle soleus_r: min_control=0.01 max_control=1 optimal_force=1 max_isometric_force=3549
        optimal_fiber_length=0.05298992 tendon_slack_length=0.2621303 pennation_angle_at_optimal=0.43633
        max_contraction_velocity=10 activation_time_constant=0.01 deactivation_time_constant=0.04
        FmaxTendonStrain=0.033 FmaxMuscleStrain=0.6 KshapeActive=0.5 KshapePassive=4 Af=0.3 Flen=1.8
      PathPoint P1: tibia_r (-0.00244752 -0.161557 0.00724058)
      PathPoint P2: calcn_r (0 0.031 -0.00608673)
    Thelen2003Muscle tfl_r: min_control=0.01 max_control=1 optimal_force=1 max_isometric_force=233
        optimal_fiber_length=0.09237865 tendon_slack_length=0.4476067 pennation_angle_at_optimal=0.05236
        max_contraction_velocity=10 activation_time_constant=0.01 deactivation_time_constant=0.04
        FmaxTendonStrain=0.033 FmaxMuscleStrain=0.6 KshapeActive=0.5 KshapePassive=4 Af=0.3 Flen=1.8
      PathPoint P1: pelvis (-0.0286007 0.019367 0.121851)
      PathPoint P2: femur_r (0.031112 -0.106262 0.0631763)
      PathPoint P3: femur_r (0.00571444 -0.432417 0.0377788)
      PathPoint P4: tibia_r (0.0061188 -0.051323 0.0302881)
    Thelen2003Muscle tib_ant_r: min_control=0.01 max_control=1 optimal_force=1 max_isometric_force=905
        optimal_fiber_length=0.1017187 tendon_slack_length=0.2377825 pennation_angle_at_optimal=0.087266
        max_contraction_velocity=10 activation_time_constant=0.01 deactivation_time_constant=0.04
        FmaxTendonStrain=0.033 FmaxMuscleStrain=0.6 KshapeActive=0.5 KshapePassive=4 Af=0.3 Flen=1.8
      PathPoint P1: tibia_r (0.0182544 -0.171147 0.0117277)
      PathPoint P2: tibia_r (0.0335514 -0.41638 -0.0180505)
      PathPoint P3: calcn_r (0.123437 0.0178 -0.0350274)
    Thelen2003Muscle vas_int_r: min_control=0.01 max_control=1 optimal_force=1 max_isometric_force=1365
        optimal_fiber_length=0.09423596 tendon_slack_length=0.1423555 pennation_angle_at_optimal=0.05236
        max_contraction_velocity=10 activation_time_constant=0.01 deactivation_time_constant=0.04
        FmaxTendonStrain=0.033 FmaxMuscleStrain=0.6 KshapeActive=0.5 KshapePassive=4 Af=0.3 Flen=1.8
      PathPoint P1: femur_r (0.0306887 -0.205476 0.0328051)
      PathPoint P2: femur_r (0.0354507 -0.222563 0.0301596)
      ConditionalPathPoint P3: femur_r (0.0362973 -0.430388 0.00582026) range=(-2.618 -1.42) coordinate=knee_flexion_r
      MovingPathPoint P4: tibia_r (0.0565612 0.0266542 0.00183564) x_coordinate=knee_flexion_r
          y_coordinate=knee_flexion_r z_coordinate=knee_flexion_r
        x_location: MultiplierFunction: scale=1.0198
          SimmSpline: x=(-2.0944 -2 -1.5708 -1.4575 -1.3963 -1.0472 -0.69813 -0.52639 -0.34907 -0.17453 0 0.00017453 0.00034907 0.027925 0.087266 0.17453 2.0944)
              y=(0.0082733 0.010687 0.020204 0.022353 0.023458 0.029272 0.034946 0.037871 0.041257 0.046529 0.055463 0.055473 0.055484 0.057172 0.061272 0.068437 0.064882)
        y_location: MultiplierFunction: scale=1.05386
          SimmSpline: x=(-2.0944 -2 -1.5708 -1.4575 -1.3963 -1.0472 -0.69813 -0.52639 -0.34907 -0.17453 0 0.00017453 0.00034907 0.027925 0.087266 0.17453 2.0944)
              y=(0.025599 0.025949 0.027312 0.02748 0.027515 0.027136 0.026574 0.026307 0.026119 0.026013 0.025292 0.025291 0.02529 0.025053 0.024219 0.021829 -0.068571)
        z_location: MultiplierFunction: scale=1.0198
          SimmSpline: x=(-2.0944 2.0944) y=(0.0018 0.0018)
    Thelen2003Muscle vas_lat_r: min_control=0.01 max_control=1 optimal_force=1 max_isometric_force=1871
        optimal_fiber_length=0.09069718 tendon_slack_length=0.164803 pennation_angle_at_optimal=0.087266
        max_contraction_velocity=10 activation_time_constant=0.01 deactivation_time_constant=0.04
        FmaxTendonStrain=0.033 FmaxMuscleStrain=0.6 KshapeActive=0.5 KshapePassive=4 Af=0.3 Flen=1.8
      PathPoint P1: femur_r (0.0050795 -0.198 0.0369322)
      PathPoint P2: femur_r (0.0284664 -0.276708 0.0432816)
      ConditionalPathPoint P3: femur_r (0.0382021 -0.430388 0.0216937) range=(-2.618 -1.21) coordinate=knee_flexion_r
      ConditionalPathPoint P4: femur_r (0.0267732 -0.453135 0.0194714) range=(-2.618 -1.92) coordinate=knee_flexion_r
      MovingPathPoint P5: tibia_r (0.0611431 0.0206409 0.0168267) x_coordinate=knee_flexion_r
          y_coordinate=knee_flexion_r z_coordinate=knee_flexion_r
        x_location: MultiplierFunction: scale=1.0198
          SimmSpline: x=(-2.0944 -2 -1.5708 -1.4575 -1.3963 -1.0472 -0.69813 -0.52639 -0.34907 -0.17453 0 0.00017453 0.00034907 0.027925 0.087266 0.17453 2.0944)
              y=(0.01429 0.016703 0.026215 0.028362 0.029467 0.035271 0.040878 0.043729 0.04697 0.051874 0.059956 0.059965 0.059974 0.061458 0.065035 0.071187 0.058377)
        y_location: MultiplierFunction: scale=1.05386
          SimmSpline: x=(-2.0944 -2 -1.5708 -1.4575 -1.3963 -1.0472 -0.69813 -0.52639 -0.34907 -0.17453 0 0.00017453 0.00034907 0.027925 0.087266 0.17453 2.0944)
              y=(0.021532 0.021881 0.023236 0.023402 0.023437 0.023044 0.022384 0.022015 0.021636 0.021097 0.019586 0.019584 0.019582 0.01919 0.018008 0.015107 -0.065342)
        z_location: MultiplierFunction: scale=1.0198
          SimmSpline: x=(-2.0944 2.0944) y=(0.0165 0.0165)
    Thelen2003Muscle vas_med_r: min_control=0.01 max_control=1 optimal_force=1 max_isometric_force=1294
        optimal_fiber_length=0.0961246 tendon_slack_length=0.1315864 pennation_angle_at_optimal=0.087266
        max_contraction_velocity=10 activation_time_constant=0.01 deactivation_time_constant=0.04
        FmaxTendonStrain=0.033 FmaxMuscleStrain=0.6 KshapeActive=0.5 KshapePassive=4 Af=0.3 Flen=1.8
      PathPoint P1: femur_r (0.0148152 -0.224165 0.0198947)
      PathPoint P2: femur_r (0.037673 -0.295718 0.000952407)
      ConditionalPathPoint P3: femur_r (0.0391545 -0.43231 -0.0132279) range=(-2.618 -1.21) coordinate=knee_flexion_r
      ConditionalPathPoint P4: femur_r (0.0289955 -0.454417 -0.0138628) range=(-2.618 -1.7801)
          coordinate=knee_flexion_r
      MovingPathPoint P5: tibia_r (0.057067 0.0229657 -0.0148891) x_coordinate=knee_flexion_r
          y_coordinate=knee_flexion_r z_coordinate=knee_flexion_r
        x_location: MultiplierFunction: scale=1.0198
          SimmSpline: x=(-2.0944 -2 -1.5708 -1.4575 -1.3963 -1.0472 -0.69813 -0.52639 -0.34907 -0.17453 0 0.00017453 0.00034907 0.027925 0.087266 0.17453 2.0944)
              y=(0.009811 0.012224 0.021737 0.023885 0.02499 0.030796 0.036419 0.039287 0.042565 0.047576 0.055959 0.055968 0.055978 0.057542 0.061337 0.06795 0.062933)
        y_location: MultiplierFunction: scale=1.05386
          SimmSpline: x=(-2.0944 -2 -1.5708 -1.4575 -1.3963 -1.0472 -0.69813 -0.52639 -0.34907 -0.17453 0 0.00017453 0.00034907 0.027925 0.087266 0.17453 2.0944)
              y=(0.022415 0.022765 0.024126 0.024293 0.024329 0.023946 0.023359 0.023068 0.022834 0.022636 0.021792 0.02179 0.021789 0.021536 0.020684 0.018327 -0.06562)
        z_location: MultiplierFunction: scale=1.0198
          SimmSpline: x=(-2.0944 2.0944) y=(-0.0146 -0.0146)
    Thelen2003Muscle add_long_l: min_control=0.01 max_control=1 optimal_force=1 max_isometric_force=627
        optimal_fiber_length=0.1321985 tendon_slack_length=0.1322365 pennation_angle_at_optimal=0.10472
        max_contraction_velocity=10 activation_time_constant=0.01 deactivation_time_constant=0.04
        FmaxTendonStrain=0.033 FmaxMuscleStrain=0.6 KshapeActive=0.5 KshapePassive=4 Af=0.3 Flen=1.8
      PathPoint P1: pelvis (-0.0290605 -0.075658 -0.0165937)
      PathPoint P2: femur_l (0.00536455 -0.229168 -0.0251061)
    Thelen2003Muscle add_brev_l: min_control=0.01 max_control=1 optimal_force=1 max_isometric_force=429
        optimal_fiber_length=0.1313298 tendon_slack_length=0.03057688 pennation_angle_at_optimal=0
        max_contraction_velocity=10 activation_time_constant=0.01 deactivation_time_constant=0.04
        FmaxTendonStrain=0.033 FmaxMuscleStrain=0.6 KshapeActive=0.5 KshapePassive=4 Af=0.3 Flen=1.8
      PathPoint P1: pelvis (-0.0539826 -0.0828075 -0.0161028)
      PathPoint P2: femur_l (0.000965619 -0.129837 -0.0315436)
    Thelen2003Muscle add_mag1_l: min_control=0.01 max_control=1 optimal_force=1 max_isometric_force=381
        optimal_fiber_length=0.08295221 tendon_slack_length=0.07286541 pennation_angle_at_optimal=0.087266
        max_contraction_velocity=10 activation_time_constant=0.01 deactivation_time_constant=0.04
        FmaxTendonStrain=0.033 FmaxMuscleStrain=0.6 KshapeActive=0.5 KshapePassive=4 Af=0.3 Flen=1.8
      PathPoint P1: pelvis (-0.0673174 -0.106247 -0.0250379)
      PathPoint P2: femur_l (-0.0048281 -0.131465 -0.0363716)
    Thelen2003Muscle add_mag2_l: min_control=0.01 max_control=1 optimal_force=1 max_isometric_force=343
        optimal_fiber_length=0.1120958 tendon_slack_length=0.1471431 pennation_angle_at_optimal=0.05236
        max_contraction_velocity=10 activation_time_constant=0.01 deactivation_time_constant=0.04
        FmaxTendonStrain=0.033 FmaxMuscleStrain=0.6 KshapeActive=0.5 KshapePassive=4 Af=0.3 Flen=1.8
      PathPoint P1: pelvis (-0.0764218 -0.107876 -0.0302418)
      PathPoint P2: femur_l (0.00579371 -0.248057 -0.0243551)
    Thelen2003Muscle add_mag3_l: min_control=0.01 max_control=1 optimal_force=1 max_isometric_force=488
        optimal_fiber_length=0.1196653 tendon_slack_length=0.29216 pennation_angle_at_optimal=0.087266
        max_contraction_velocity=10 activation_time_constant=0.01 deactivation_time_constant=0.04
        FmaxTendonStrain=0.033 FmaxMuscleStrain=0.6 KshapeActive=0.5 KshapePassive=4 Af=0.3 Flen=1.8
      PathPoint P1: pelvis (-0.102153 -0.103288 -0.0479353)
      PathPoint P2: femur_l (0.00751037 -0.416541 0.0285394)
    Thelen2003Muscle bifemlh_l: min_control=0.01 max_control=1 optimal_force=1 max_isometric_force=896
        optimal_fiber_length=0.1001976 tendon_slack_length=0.3685191 pennation_angle_at_optimal=0
        max_contraction_velocity=10 activation_time_constant=0.01 deactivation_time_constant=0.04
        FmaxTendonStrain=0.033 FmaxMuscleStrain=0.6 KshapeActive=0.5 KshapePassive=4 Af=0.3 Flen=1.8
      PathPoint P1: pelvis (-0.115837 -0.0928259 -0.0681816)
      PathPoint P2: tibia_l (-0.0286049 -0.0375469 -0.0279682)
      PathPoint P3: tibia_l (-0.0222377 -0.0587192 -0.0325963)
    Thelen2003Muscle bifemsh_l: min_control=0.01 max_control=1 optimal_force=1 max_isometric_force=804
        optimal_fiber_length=0.1490323 tendon_slack_length=0.1319711 pennation_angle_at_optimal=0.40143
        max_contraction_velocity=10 activation_time_constant=0.01 deactivation_time_constant=0.04
        FmaxTendonStrain=0.033 FmaxMuscleStrain=0.6 KshapeActive=0.5 KshapePassive=4 Af=0.3 Flen=1.8
      PathPoint P1: femur_l (0.00536455 -0.229168 -0.0251061)
      PathPoint P2: tibia_l (-0.0286049 -0.0375469 -0.0279682)
      PathPoint P3: tibia_l (-0.0222377 -0.0587192 -0.0325963)
    Thelen2003Muscle glut_max1_l: max_isometric_force=819.15 optimal_fiber_length=0.142671
        tendon_slack_length=0.05068971 max_contraction_velocity=10
      PathPoint P1: pelvis (-0.113207 0.0312225 -0.0549852)
      PathPoint P2: pelvis (-0.115598 -0.021901 -0.0765865)
      PathPoint P3: femur_l (-0.0476372 -0.0353902 -0.0321873)
      PathPoint P4: femur_l (-0.0297196 -0.0614444 -0.0504268)
      PathWrap: wrap_object=Gmax_at_pelvis_l method=hybrid
    Thelen2003Muscle glut_max2_l: max_isometric_force=1170.75 optimal_fiber_length=0.1499898
        tendon_slack_length=0.08026492 max_contraction_velocity=10
      PathPoint P1: pelvis (-0.121116 0.0078735 -0.0451664)
      PathPoint P2: pelvis (-0.123599 -0.0551145 -0.0795321)
      PathPoint P3: femur_l (-0.048281 -0.0633985 -0.0268228)
      PathPoint P4: femur_l (-0.0167374 -0.110296 -0.0450622)
      PathWrap: wrap_object=Gmax_at_pelvis_l method=hybrid
    Thelen2003Muscle glut_max3_l: max_isometric_force=789.15 optimal_fiber_length=0.1579509
        tendon_slack_length=0.08297926 max_contraction_velocity=10
      PathPoint P1: pelvis (-0.119553 -0.0475125 -0.0088369)
      PathPoint P2: pelvis (-0.11707 -0.114302 -0.0432026)
      PathPoint P3: femur_l (-0.0301488 -0.122129 -0.00965619)
      PathPoint P4: femur_l (-0.00643746 -0.154045 -0.0439893)
      PathWrap: wrap_object=Gmax_at_pelvis_l method=hybrid
    Thelen2003Muscle glut_med1_l: max_isometric_force=1321.65 optimal_fiber_length=0.0764786
        tendon_slack_length=0.04837545 max_contraction_velocity=10
      PathPoint P1: pelvis (-0.0409238 0.0221725 -0.11488)
      PathPoint P2: femur_l (-0.0233894 -0.0127014 -0.060083)
    Thelen2003Muscle glut_med2_l: max_isometric_force=924.75 optimal_fiber_length=0.07418227
        tendon_slack_length=0.06062745 max_contraction_velocity=10
      PathPoint P1: pelvis (-0.0781691 0.028598 -0.0667677)
      PathPoint P2: femur_l (-0.0276811 -0.00629642 -0.0568642)
    Thelen2003Muscle glut_med3_l: max_isometric_force=1053 optimal_fiber_length=0.07285709
        tendon_slack_length=0.04520004 max_contraction_velocity=10
      PathPoint P1: pelvis (-0.105942 -0.0066065 -0.0520395)
      PathPoint P2: femur_l (-0.0331529 -0.00510227 -0.0557913)
    Thelen2003Muscle glut_min1_l: max_isometric_force=270 optimal_fiber_length=0.06777521
        tendon_slack_length=0.01486925 max_contraction_velocity=10
      PathPoint P1: pelvis (-0.0426711 -0.0134845 -0.102115)
      PathPoint P2: femur_l (-0.00772495 -0.0112901 -0.060083)
    Thelen2003Muscle glut_min2_l: max_isometric_force=285 optimal_fiber_length=0.05481225
        tendon_slack_length=0.02647551 max_contraction_velocity=10
      PathPoint P1: pelvis (-0.0566496 -0.012851 -0.0952422)
      PathPoint P2: femur_l (-0.0102999 -0.0112901 -0.060083)
    Thelen2003Muscle glut_min3_l: max_isometric_force=322.5 optimal_fiber_length=0.03664168
        tendon_slack_length=0.05222223 max_contraction_velocity=10
      PathPoint P1: pelvis (-0.0725593 -0.0140275 -0.0785502)
      PathPoint P2: femur_l (-0.0144843 -0.0090104 -0.0590101)
    Thelen2003Muscle grac_l: min_control=0.01 max_control=1 optimal_force=1 max_isometric_force=162
        optimal_fiber_length=0.332349 tendon_slack_length=0.1802747 pennation_angle_at_optimal=0.05236
        max_contraction_velocity=10 activation_time_constant=0.01 deactivation_time_constant=0.04
        FmaxTendonStrain=0.033 FmaxMuscleStrain=0.6 KshapeActive=0.5 KshapePassive=4 Af=0.3 Flen=1.8
      PathPoint P1: pelvis (-0.0680623 -0.107424 -0.0274337)
      ConditionalPathPoint P2: tibia_l (-0.0252502 -0.0332707 0.0358654) range=(-0.43633 0.17453)
          coordinate=knee_flexion_l
      PathPoint P3: tibia_l (-0.0184649 -0.0537442 0.0340217)
      PathPoint P4: tibia_l (0.00570197 -0.0871923 0.0216675)
    Thelen2003Muscle iliacus_l: min_control=0.01 max_control=1 optimal_force=1 max_isometric_force=1073
        optimal_fiber_length=0.09285081 tendon_slack_length=0.09969495 pennation_angle_at_optimal=0.12217
        max_contraction_velocity=10 activation_time_constant=0.01 deactivation_time_constant=0.04
        FmaxTendonStrain=0.033 FmaxMuscleStrain=0.6 KshapeActive=0.5 KshapePassive=4 Af=0.3 Flen=1.8
      PathPoint P1: pelvis (-0.0619835 0.0330325 -0.0838524)
      PathPoint P2: pelvis (-0.0237266 -0.049775 -0.0796303)
      ConditionalPathPoint P3: pelvis (-0.0264855 -0.0728525 -0.0801212) range=(-1.5708 0.7854)
          coordinate=hip_flexion_l
      PathPoint P4: femur_l (0.00182395 -0.0589475 -0.00611559)
      PathPoint P5: femur_l (-0.0207072 -0.0674151 -0.0138405)
    Thelen2003Muscle lat_gas_l: min_control=0.01 max_control=1 optimal_force=1 max_isometric_force=683
        optimal_fiber_length=0.06502031 tendon_slack_length=0.3899112 pennation_angle_at_optimal=0.13963
        max_contraction_velocity=10 activation_time_constant=0.01 deactivation_time_constant=0.04
        FmaxTendonStrain=0.033 FmaxMuscleStrain=0.6 KshapeActive=0.5 KshapePassive=4 Af=0.3 Flen=1.8
      PathPoint P1: femur_l (-0.023604 -0.428374 -0.0291832)
      ConditionalPathPoint P2: femur_l (-0.0321873 -0.43619 -0.0293977) range=(-0.7854 0.17453)
          coordinate=knee_flexion_l
      PathPoint P3: tibia_l (-0.022977 -0.0501199 -0.0223118)
      PathPoint P4: calcn_l (0 0.031 0.00606219)
    Thelen2003Muscle med_gas_l: min_control=0.01 max_control=1 optimal_force=1 max_isometric_force=1558
        optimal_fiber_length=0.06172686 tendon_slack_length=0.3986996 pennation_angle_at_optimal=0.29671
        max_contraction_velocity=10 activation_time_constant=0.01 deactivation_time_constant=0.04
        FmaxTendonStrain=0.033 FmaxMuscleStrain=0.6 KshapeActive=0.5 KshapePassive=4 Af=0.3 Flen=1.8
      PathPoint P1: femur_l (-0.0203853 -0.426528 0.0252134)
      ConditionalPathPoint P2: femur_l (-0.0321873 -0.436624 0.0276811) range=(-0.7854 0.17453)
          coordinate=knee_flexion_l
      PathPoint P3: tibia_l (-0.0206031 -0.0507457 0.028009)
      PathPoint P4: calcn_l (0 0.031 0.00606219)
    Thelen2003Muscle per_brev_l: min_control=0.01 max_control=1 optimal_force=1 max_isometric_force=435
        optimal_fiber_length=0.04217779 tendon_slack_length=0.1778939 pennation_angle_at_optimal=0.087266
        max_contraction_velocity=10 activation_time_constant=0.01 deactivation_time_constant=0.04
        FmaxTendonStrain=0.033 FmaxMuscleStrain=0.6 KshapeActive=0.5 KshapePassive=4 Af=0.3 Flen=1.8
      PathPoint P1: tibia_l (-0.0066523 -0.27597 -0.0308857)
      PathPoint P2: tibia_l (-0.0188165 -0.436379 -0.0268943)
      PathPoint P3: tibia_l (-0.0136847 -0.447956 -0.0274645)
      PathPoint P4: calcn_l (0.0496448 0.027 -0.0266508)
      PathPoint P5: calcn_l (0.0713578 0.0219 -0.0392327)
    Thelen2003Muscle per_long_l: min_control=0.01 max_control=1 optimal_force=1 max_isometric_force=943
        optimal_fiber_length=0.04027978 tendon_slack_length=0.3722692 pennation_angle_at_optimal=0.17453
        max_contraction_velocity=10 activation_time_constant=0.01 deactivation_time_constant=0.04
        FmaxTendonStrain=0.033 FmaxMuscleStrain=0.6 KshapeActive=0.5 KshapePassive=4 Af=0.3 Flen=1.8
      PathPoint P1: tibia_l (0.000475164 -0.163538 -0.0344019)
      PathPoint P2: tibia_l (-0.0196718 -0.438569 -0.0271794)
      PathPoint P3: tibia_l (-0.0153953 -0.450459 -0.0274645)
      PathPoint P4: calcn_l (0.0461665 0.023 -0.0252782)
      PathPoint P5: calcn_l (0.0717794 0.0106 -0.0324842)
      PathPoint P6: calcn_l (0.0898034 0.0069 -0.013497)
      PathPoint P7: calcn_l (0.1268 0.0085 0.0210461)
    Thelen2003Muscle per_tert_l: min_control=0.01 max_control=1 optimal_force=1 max_isometric_force=180
        optimal_fiber_length=0.07670169 tendon_slack_length=0.112603 pennation_angle_at_optimal=0.22689
        max_contraction_velocity=10 activation_time_constant=0.01 deactivation_time_constant=0.04
        FmaxTendonStrain=0.033 FmaxMuscleStrain=0.6 KshapeActive=0.5 KshapePassive=4 Af=0.3 Flen=1.8
      PathPoint P1: tibia_l (0.000950328 -0.292449 -0.0219526)
      PathPoint P2: tibia_l (0.0217625 -0.424384 -0.0151102)
      PathPoint P3: calcn_l (0.0903304 0.0228 -0.0341999)
    Thelen2003Muscle psoas_l: min_control=0.01 max_control=1 optimal_force=1 max_isometric_force=1113
        optimal_fiber_length=0.0944601 tendon_slack_length=0.1529705 pennation_angle_at_optimal=0.13963
        max_contraction_velocity=10 activation_time_constant=0.01 deactivation_time_constant=0.04
        FmaxTendonStrain=0.033 FmaxMuscleStrain=0.6 KshapeActive=0.5 KshapePassive=4 Af=0.3 Flen=1.8
      PathPoint P1: pelvis (-0.0595004 0.0802735 -0.0283763)
      PathPoint P2: pelvis (-0.0218873 -0.051585 -0.0745245)
      ConditionalPathPoint P3: pelvis (-0.0264855 -0.0728525 -0.0801212) range=(-1.5708 0.7854)
          coordinate=hip_flexion_l
      PathPoint P4: femur_l (0.00171666 -0.0550394 -0.00407706)
      PathPoint P5: femur_l (-0.0201707 -0.0648097 -0.0111583)
    Thelen2003Muscle rect_fem_l: min_control=0.01 max_control=1 optimal_force=1 max_isometric_force=1169
        optimal_fiber_length=0.1099776 tendon_slack_length=0.3439759 pennation_angle_at_optimal=0.087266
        max_contraction_velocity=10 activation_time_constant=0.01 deactivation_time_constant=0.04
        FmaxTendonStrain=0.033 FmaxMuscleStrain=0.6 KshapeActive=0.5 KshapePassive=4 Af=0.3 Flen=1.8
      PathPoint P1: pelvis (-0.0271293 -0.0281455 -0.0950458)
      ConditionalPathPoint P2: femur_l (0.0358352 -0.437493 -0.00203853) range=(-2.618 -1.46) coordinate=knee_flexion_l
      MovingPathPoint P3: tibia_l (0.0586904 0.0218857 -0.00133046) x_coordinate=knee_flexion_l
          y_coordinate=knee_flexion_l z_coordinate=knee_flexion_l
        x_location: MultiplierFunction: scale=0.950328
          SimmSpline: x=(-2.0944 -2 -1.5708 -1.4575 -1.3963 -1.0472 -0.69813 -0.52639 -0.34907 -0.17453 0 0.00017453 0.00034907 0.027925 0.087266 0.17453 2.0944)
              y=(0.015581 0.017994 0.027508 0.029656 0.030762 0.03657 0.042207 0.04509 0.048391 0.05343 0.061758 0.061767 0.061776 0.063308 0.066994 0.073303 0.057348)
        y_location: MultiplierFunction: scale=1.04297
          SimmSpline: x=(-2.0944 -2 -1.5708 -1.4575 -1.3963 -1.0472 -0.69813 -0.52639 -0.34907 -0.17453 0 0.00017453 0.00034907 0.027925 0.087266 0.17453 2.0944)
              y=(0.023412 0.023761 0.025114 0.025279 0.025315 0.024918 0.024237 0.023845 0.02342 0.022764 0.020984 0.020981 0.020979 0.020522 0.019175 0.015955 -0.067377)
        z_location: MultiplierFunction: scale=0.950328
          SimmSpline: x=(-2.0944 0.1745) y=(-0.0014 -0.0014)
    Thelen2003Muscle sar_l: min_control=0.01 max_control=1 optimal_force=1 max_isometric_force=156
        optimal_fiber_length=0.4842819 tendon_slack_length=0.1573371 pennation_angle_at_optimal=0
        max_contraction_velocity=10 activation_time_constant=0.01 deactivation_time_constant=0.04
        FmaxTendonStrain=0.033 FmaxMuscleStrain=0.6 KshapeActive=0.5 KshapePassive=4 Af=0.3 Flen=1.8
      PathPoint P1: pelvis (-0.0140704 -0.0011765 -0.121949)
      PathPoint P2: femur_l (-0.00321873 -0.387339 0.0451695)
      PathPoint P3: tibia_l (-0.00532184 -0.0437004 0.0379181)
      PathPoint P4: tibia_l (0.00570197 -0.0614309 0.0363976)
      PathPoint P5: tibia_l (0.023093 -0.0876095 0.0239483)
    Thelen2003Muscle semimem_l: min_control=0.01 max_control=1 optimal_force=1 max_isometric_force=1288
        optimal_fiber_length=0.07402925 tendon_slack_length=0.3989179 pennation_angle_at_optimal=0.2618
        max_contraction_velocity=10 activation_time_constant=0.01 deactivation_time_constant=0.04
        FmaxTendonStrain=0.033 FmaxMuscleStrain=0.6 KshapeActive=0.5 KshapePassive=4 Af=0.3 Flen=1.8
      PathPoint P1: pelvis (-0.109621 -0.0882104 -0.0702141)
      ConditionalPathPoint P2: tibia_l (-0.0330714 -0.0367021 0.0179707) range=(-0.55851 0.17453)
          coordinate=knee_flexion_l
      PathPoint P3: tibia_l (-0.0256589 -0.0497601 0.0185979)
    Thelen2003Muscle semiten_l: min_control=0.01 max_control=1 optimal_force=1 max_isometric_force=410
        optimal_fiber_length=0.1757263 tendon_slack_length=0.2947404 pennation_angle_at_optimal=0.087266
        max_contraction_velocity=10 activation_time_constant=0.01 deactivation_time_constant=0.04
        FmaxTendonStrain=0.033 FmaxMuscleStrain=0.6 KshapeActive=0.5 KshapePassive=4 Af=0.3 Flen=1.8
      PathPoint P1: pelvis (-0.126045 -0.107876 -0.0643238)
      ConditionalPathPoint P2: tibia_l (-0.0392191 -0.0292793 0.0212474) range=(-0.33161 0.17453)
          coordinate=knee_flexion_l
      PathPoint P3: tibia_l (-0.0309987 -0.0540926 0.0213501)
      PathPoint P4: tibia_l (-0.0105439 -0.0763976 0.022862)
      PathPoint P5: tibia_l (0.00251941 -0.0979036 0.0180097)
    Thelen2003Muscle soleus_l: min_control=0.01 max_control=1 optimal_force=1 max_isometric_force=3549
        optimal_fiber_length=0.05246891 tendon_slack_length=0.2596101 pennation_angle_at_optimal=0.43633
        max_contraction_velocity=10 activation_time_constant=0.01 deactivation_time_constant=0.04
        FmaxTendonStrain=0.033 FmaxMuscleStrain=0.6 KshapeActive=0.5 KshapePassive=4 Af=0.3 Flen=1.8
      PathPoint P1: tibia_l (-0.00228079 -0.159887 -0.00674733)
      PathPoint P2: calcn_l (0 0.031 0.00606219)
    Thelen2003Muscle tfl_l: min_control=0.01 max_control=1 optimal_force=1 max_isometric_force=233
        optimal_fiber_length=0.09261641 tendon_slack_length=0.4545528 pennation_angle_at_optimal=0.05236
        max_contraction_velocity=10 activation_time_constant=0.01 deactivation_time_constant=0.04
        FmaxTendonStrain=0.033 FmaxMuscleStrain=0.6 KshapeActive=0.5 KshapePassive=4 Af=0.3 Flen=1.8
      PathPoint P1: pelvis (-0.0286007 0.019367 -0.121851)
      PathPoint P2: femur_l (0.0315436 -0.108016 -0.0640527)
      PathPoint P3: femur_l (0.00579371 -0.439555 -0.0383029)
      PathPoint P4: tibia_l (0.00570197 -0.0507926 -0.0282247)
    Thelen2003Muscle tib_ant_l: min_control=0.01 max_control=1 optimal_force=1 max_isometric_force=905
        optimal_fiber_length=0.09707025 tendon_slack_length=0.2392923 pennation_angle_at_optimal=0.087266
        max_contraction_velocity=10 activation_time_constant=0.01 deactivation_time_constant=0.04
        FmaxTendonStrain=0.033 FmaxMuscleStrain=0.6 KshapeActive=0.5 KshapePassive=4 Af=0.3 Flen=1.8
      PathPoint P1: tibia_l (0.0170109 -0.169378 -0.0109288)
      PathPoint P2: tibia_l (0.0312658 -0.412077 0.0168208)
      PathPoint P3: calcn_l (0.1229 0.0178 0.0348862)
    Thelen2003Muscle vas_int_l: min_control=0.01 max_control=1 optimal_force=1 max_isometric_force=1365
        optimal_fiber_length=0.09209004 tendon_slack_length=0.1464386 pennation_angle_at_optimal=0.05236
        max_contraction_velocity=10 activation_time_constant=0.01 deactivation_time_constant=0.04
        FmaxTendonStrain=0.033 FmaxMuscleStrain=0.6 KshapeActive=0.5 KshapePassive=4 Af=0.3 Flen=1.8
      PathPoint P1: femur_l (0.0311144 -0.208868 -0.0332602)
      PathPoint P2: femur_l (0.0359425 -0.226237 -0.0305779)
      ConditionalPathPoint P3: femur_l (0.0368008 -0.437493 -0.00590101) range=(-2.618 -1.42) coordinate=knee_flexion_l
      MovingPathPoint P4: tibia_l (0.0586904 0.0218857 -0.00133046) x_coordinate=knee_flexion_l
          y_coordinate=knee_flexion_l z_coordinate=knee_flexion_l
        x_location: MultiplierFunction: scale=0.950328
          SimmSpline: x=(-2.0944 -2 -1.5708 -1.4575 -1.3963 -1.0472 -0.69813 -0.52639 -0.34907 -0.17453 0 0.00017453 0.00034907 0.027925 0.087266 0.17453 2.0944)
              y=(0.015581 0.017994 0.027508 0.029656 0.030762 0.03657 0.042207 0.04509 0.048391 0.05343 0.061758 0.061767 0.061776 0.063308 0.066994 0.073303 0.057348)
        y_location: MultiplierFunction: scale=1.04297
          SimmSpline: x=(-2.0944 -2 -1.5708 -1.4575 -1.3963 -1.0472 -0.69813 -0.52639 -0.34907 -0.17453 0 0.00017453 0.00034907 0.027925 0.087266 0.17453 2.0944)
              y=(0.023412 0.023761 0.025114 0.025279 0.025315 0.024918 0.024237 0.023845 0.02342 0.022764 0.020984 0.020981 0.020979 0.020522 0.019175 0.015955 -0.067377)
        z_location: MultiplierFunction: scale=0.950328
          SimmSpline: x=(-2.0944 0.1745) y=(-0.0014 -0.0014)
    Thelen2003Muscle vas_lat_l: min_control=0.01 max_control=1 optimal_force=1 max_isometric_force=1871
        optimal_fiber_length=0.08968309 tendon_slack_length=0.1684899 pennation_angle_at_optimal=0.087266
        max_contraction_velocity=10 activation_time_constant=0.01 deactivation_time_constant=0.04
        FmaxTendonStrain=0.033 FmaxMuscleStrain=0.6 KshapeActive=0.5 KshapePassive=4 Af=0.3 Flen=1.8
      PathPoint P1: femur_l (0.00514997 -0.201268 -0.0374446)
      PathPoint P2: femur_l (0.0288613 -0.281276 -0.043882)
      ConditionalPathPoint P3: femur_l (0.0387321 -0.437493 -0.0219947) range=(-2.618 -1.21) coordinate=knee_flexion_l
      ConditionalPathPoint P4: femur_l (0.0271446 -0.460616 -0.0197415) range=(-2.618 -1.92) coordinate=knee_flexion_l
      MovingPathPoint P5: tibia_l (0.0569779 0.0204276 -0.0156804) x_coordinate=knee_flexion_l
          y_coordinate=knee_flexion_l z_coordinate=knee_flexion_l
        x_location: MultiplierFunction: scale=0.950328
          SimmSpline: x=(-2.0944 -2 -1.5708 -1.4575 -1.3963 -1.0472 -0.69813 -0.52639 -0.34907 -0.17453 0 0.00017453 0.00034907 0.027925 0.087266 0.17453 2.0944)
              y=(0.01429 0.016703 0.026215 0.028362 0.029467 0.035271 0.040878 0.043729 0.04697 0.051874 0.059956 0.059965 0.059974 0.061458 0.065035 0.071187 0.058377)
        y_location: MultiplierFunction: scale=1.04297
          SimmSpline: x=(-2.0944 -2 -1.5708 -1.4575 -1.3963 -1.0472 -0.69813 -0.52639 -0.34907 -0.17453 0 0.00017453 0.00034907 0.027925 0.087266 0.17453 2.0944)
              y=(0.021532 0.021881 0.023236 0.023402 0.023437 0.023044 0.022384 0.022015 0.021636 0.021097 0.019586 0.019584 0.019582 0.01919 0.018008 0.015107 -0.065342)
        z_location: MultiplierFunction: scale=0.950328
          SimmSpline: x=(-2.0944 2.0944) y=(-0.0165 -0.0165)
    Thelen2003Muscle vas_med_l: min_control=0.01 max_control=1 optimal_force=1 max_isometric_force=1294
        optimal_fiber_length=0.09514678 tendon_slack_length=0.1348099 pennation_angle_at_optimal=0.087266
        max_contraction_velocity=10 activation_time_constant=0.01 deactivation_time_constant=0.04
        FmaxTendonStrain=0.033 FmaxMuscleStrain=0.6 KshapeActive=0.5 KshapePassive=4 Af=0.3 Flen=1.8
      PathPoint P1: femur_l (0.0150207 -0.227865 -0.0201707)
      PathPoint P2: femur_l (0.0381956 -0.3006 -0.000965619)
      ConditionalPathPoint P3: femur_l (0.0396977 -0.439447 0.0134114) range=(-2.618 -1.21) coordinate=knee_flexion_l
      ConditionalPathPoint P4: femur_l (0.0293977 -0.461919 0.0140551) range=(-2.618 -1.7801) coordinate=knee_flexion_l
      MovingPathPoint P5: tibia_l (0.0531794 0.0227284 0.0138748) x_coordinate=knee_flexion_l
          y_coordinate=knee_flexion_l z_coordinate=knee_flexion_l
        x_location: MultiplierFunction: scale=0.950328
          SimmSpline: x=(-2.0944 -2 -1.5708 -1.4575 -1.3963 -1.0472 -0.69813 -0.52639 -0.34907 -0.17453 0 0.00017453 0.00034907 0.027925 0.087266 0.17453 2.0944)
              y=(0.009811 0.012224 0.021737 0.023885 0.02499 0.030796 0.036419 0.039287 0.042565 0.047576 0.055959 0.055968 0.055978 0.057542 0.061337 0.06795 0.062933)
        y_location: MultiplierFunction: scale=1.04297
          SimmSpline: x=(-2.0944 -2 -1.5708 -1.4575 -1.3963 -1.0472 -0.69813 -0.52639 -0.34907 -0.17453 0 0.00017453 0.00034907 0.027925 0.087266 0.17453 2.0944)
              y=(0.022415 0.022765 0.024126 0.024293 0.024329 0.023946 0.023359 0.023068 0.022834 0.022636 0.021792 0.02179 0.021789 0.021536 0.020684 0.018327 -0.06562)
        z_location: MultiplierFunction: scale=0.950328
          SimmSpline: x=(-2.0944 2.0944) y=(0.0146 0.0146)
  MarkerSet:
    Marker RASI: pelvis (0.0196501 0.0265055 0.124881)
    Marker LASI: pelvis (0.0210739 0.026224 -0.126614)
    Marker LPSI: pelvis (-0.149214 0.0553876 -0.046574)
    Marker RPSI: pelvis (-0.153385 0.0556384 0.0499113)
    Marker LHJC: femur_l (0 0 0) fixed=true
    Marker RHJC: femur_r (0 0 0) fixed=true
    Marker RLFC: femur_r (0.0109902 -0.422796 0.0577908)
    Marker RMFC: femur_r (-0.00636203 -0.423775 -0.0465954)
    Marker RTH1: femur_r (-0.077076 -0.124802 0.0684259)
    Marker RTH2: femur_r (-0.000807203 -0.18629 0.101705)
    Marker RTH3: femur_r (-0.0625293 -0.264247 0.0696236)
    Marker RTH4: femur_r (-0.0341847 -0.104132 0.0960462)
    Marker RTH5: femur_r (0.0166864 -0.108858 0.100863)
    Marker RTH6: femur_r (0.0845078 -0.10112 0.0666453)
    Marker RTH7: femur_r (0.090399 -0.17585 0.0619918)
    Marker RTH8: femur_r (-0.00945979 -0.25619 0.0981765)
    Marker RTH9: femur_r (0.0327419 -0.251819 0.0907788)
    Marker RTH10: femur_r (0.0852244 -0.264528 0.0539182)
    Marker RKJC: tibia_r (0 0 0) fixed=true
    Marker RTB1: tibia_r (0.0392251 -0.139147 0.0145967)
    Marker RTB2: tibia_r (0.000154384 -0.209894 0.0755798)
    Marker RTB3: tibia_r (0.0333153 -0.276993 0.000811997)
    Marker RTB4: tibia_r (0.0204633 -0.121422 0.0621911)
    Marker RTB5: tibia_r (-0.0282176 -0.135727 0.0902732)
    Marker RTB6: tibia_r (-0.0926826 -0.124152 0.05641)
    Marker RTB7: tibia_r (-0.0917282 -0.196058 0.053477)
    Marker RTB8: tibia_r (0.0238097 -0.288995 0.045709)
    Marker RTB9: tibia_r (-0.0136467 -0.274804 0.0671324)
    Marker RTB10: tibia_r (-0.0633246 -0.294715 0.0365619)
    Marker RAJC: talus_r (0 0 0) fixed=true
    Marker RCAL: calcn_r (-0.0144662 0.0246269 -0.0249573)
    Marker RMT1: toes_r (0.00215338 0.0304696 -0.0552756)
    Marker RMT5: toes_r (-0.0191254 0.0079938 0.0566655)
    Marker LLFC: femur_l (0.0106743 -0.427157 -0.0528415)
    Marker LMFC: femur_l (0.0184121 -0.43538 0.0538537)
    Marker LTH1: femur_l (-0.0712801 -0.104787 -0.0643689)
    Marker LTH2: femur_l (0.00516675 -0.162688 -0.0911181)
    Marker LTH3: femur_l (-0.0559171 -0.24257 -0.0613288)
    Marker LTH4: femur_l (-0.0324451 -0.0908421 -0.0843562)
    Marker LTH5: femur_l (0.0225417 -0.0839941 -0.0963406)
    Marker LTH6: femur_l (0.0881922 -0.07503 -0.0616629)
    Marker LTH7: femur_l (0.0923934 -0.15207 -0.0621957)
    Marker LTH8: femur_l (-0.0144632 -0.236213 -0.0758053)
    Marker LTH9: femur_l (0.0238695 -0.226403 -0.0860406)
    Marker LTH10: femur_l (0.0859218 -0.226683 -0.0594902)
    Marker LKJC: tibia_l (0 0 0) fixed=true
    Marker LTB1: tibia_l (0.0369006 -0.169263 -0.0213047)
    Marker LTB2: tibia_l (-0.0251998 -0.236621 -0.0706993)
    Marker LTB3: tibia_l (0.0279442 -0.305805 -0.0144731)
    Marker LTB4: tibia_l (0.00588835 -0.174928 -0.0671518)
    Marker LTB5: tibia_l (-0.0548022 -0.167109 -0.0800108)
    Marker LTB6: tibia_l (-0.100318 -0.173668 -0.0312787)
    Marker LTB7: tibia_l (-0.0963523 -0.224312 -0.00878252)
    Marker LTB8: tibia_l (-0.00366011 -0.297526 -0.0548427)
    Marker LTB9: tibia_l (-0.0471689 -0.307437 -0.0527191)
    Marker LTB10: tibia_l (-0.0753255 -0.309145 0.000271909)
    Marker LAJC: talus_l (0 0 0) fixed=true
    Marker LCAL: calcn_l (-0.0267104 0.0163055 0.0224263)
    Marker LMT1: toes_l (-0.00521214 0.0231482 0.0312569)
    Marker LMT5: toes_l (-0.0435311 0.00772977 -0.0767905)
    Marker LLMAL: tibia_l (-0.0354446 -0.416025 -0.0435311)
    Marker LMMAL: tibia_l (0.00439636 -0.4037 0.0355558)
    Marker RLMAL: tibia_r (-0.0103419 -0.42472 0.041898)
    Marker RMMAL: tibia_r (0.0156625 -0.405337 -0.048399)
