# OpenSim document version 30000
Model gait2392_Rleg-scaled:
  length_units: meters
  force_units: N
  gravity: 0 -9.80665 0
  credits:
    Delp S.L., Loan J.P., Hoy M.G., Zajac F.E., Topp E.L., Rosen J.M., Thelen D.G., Anderson F.C., Seth A. Notes: 3D, 23 DOF gait model created by D.G. Thelen, Univ. of Wisconsin-Madison, and Ajay Seth, Frank C. Anderson, and Scott L. Delp, Stanford University. Lower extremity joint defintions based on Delp et al. (1990). Low back joint and anthropometry based on Anderson and Pandy (1999, 2001). Planar knee model of Yamaguchi and Zajac (1989). Seth replaced tibia translation constraints with a CustomJoint for the knee and removed the patella to eliminate all kinematic constraints; insertions of the quadrucepts are handled with moving points in the tibia frame as defined by Delp 1990. License: Creative Commons (CCBY 3.0). You are free to distribute, remix, tweak, and build upon this work, even commercially, as long as you credit us for the original creation. http://creativecommons.org/licenses/by/3.0/ More Information: http://simtk-confluence.stanford.edu:8080/display/OpenSim/Gait+2392+and+2354+Models
  publications:
    Delp, S.L., Loan, J.P., Hoy, M.G., Zajac, F.E., Topp E.L., Rosen, J.M.: An interactive graphics-based model of the lower extremity to study orthopaedic surgical procedures, IEEE Transactions on Biomedical Engineering, vol. 37, pp. 757-767, 1990. Yamaguchi G.T., Zajac F.E.: A planar model of the knee joint to characterize the knee extensor mechanism." J . Biomecl7. vol. 21. pp. 1-10. 1989. Anderson F.C., Pandy M.G.: A dynamic optimization solution for vertical jumping in three dimensions. Computer Methods in Biomechanics and Biomedical Engineering 2:201-231, 1999. Anderson F.C., Pandy M.G.: Dynamic optimization of human walking. Journal of Biomechanical Engineering 123:381-390, 2001.
  BodySet:
    Body ground: mass=0 mass_center=(0 0 0) inertia_xx=0 inertia_yy=0 inertia_zz=0 meshes=treadmill.vtp
    Body pelvis: mass=31.28294 mass_center=(-0.0676969 0 0) inertia_xx=0.2716112 inertia_yy=0.2716112
        inertia_zz=0.155258 meshes=(sacrum.vtp pelvis.vtp l_pelvis.vtp)
      CustomJoint ground_pelvis: parent_body=ground location_in_parent=(0 0 0) location=(0 0 0)
        Coordinate pelvis_tilt: motion_type=rotational default_value=0.08066532 range=(-1.570796 1.570796)
            clamped=false
        Coordinate pelvis_list: motion_type=rotational default_value=-0.09895836 range=(-1.570796 1.570796)
            clamped=false
        Coordinate pelvis_rotation: motion_type=rotational default_value=0.07769929 range=(-1.570796 1.570796)
            clamped=false
        Coordinate pelvis_tx: motion_type=translational default_value=0.6185085 range=(-5 5) clamped=false
        Coordinate pelvis_ty: motion_type=translational default_value=1.027022 range=(-1 2) clamped=false
        Coordinate pelvis_tz: motion_type=translational default_value=-0.5092788 range=(-3 3) clamped=false
        SpatialTransform:
          TransformAxis rotation1: coordinates=pelvis_tilt axis=(0 0 1) LinearFunction(coefficients=1 0)
          TransformAxis rotation2: coordinates=pelvis_list axis=(1 0 0) LinearFunction(coefficients=1 0)
          TransformAxis rotation3: coordinates=pelvis_rotation axis=(0 1 0) LinearFunction(coefficients=1 0)
          TransformAxis translation1: coordinates=pelvis_tx axis=(1 0 0) LinearFunction(coefficients=1 0)
          TransformAxis translation2: coordinates=pelvis_ty axis=(0 1 0) LinearFunction(coefficients=1 0)
          TransformAxis translation3: coordinates=pelvis_tz axis=(0 0 1) LinearFunction(coefficients=1 0)
    Body femur_r: mass=24.70707 mass_center=(0 -0.168259 0) inertia_xx=0.3484279 inertia_yy=0.09133546
        inertia_zz=0.3674236 meshes=femur.vtp
      CustomJoint hip_r: parent_body=pelvis location_in_parent=(-0.06769693 -0.06968742 0.08303396) location=(0 0 0)
        Coordinate hip_flexion_r: motion_type=rotational default_value=-0.07886872 range=(-2.094395 2.094395)
            clamped=false
        Coordinate hip_adduction_r: motion_type=rotational default_value=0.03722224 range=(-2.094395 2.094395)
            clamped=false
        Coordinate hip_rotation_r: motion_type=rotational default_value=-0.09132165 range=(-2.094395 2.094395)
            clamped=false
        SpatialTransform: axes_held_at_zero=(translation1 translation2 translation3)
          TransformAxis rotation1: coordinates=hip_flexion_r axis=(0 0 1) LinearFunction(coefficients=1 0)
          TransformAxis rotation2: coordinates=hip_adduction_r axis=(1 0 0) LinearFunction(coefficients=1 0)
          TransformAxis rotation3: coordinates=hip_rotation_r axis=(0 1 0) LinearFunction(coefficients=1 0)
    Body sagittal_knee_body_r: mass=0.0002656274 mass_center=(0 0 0) inertia_xx=0.000260215 inertia_yy=0.000260215
        inertia_zz=0.000260215 meshes=
      CustomJoint knee_r: parent_body=femur_r location_in_parent=(0 0 0) location=(0 0 0)
        Coordinate knee_angle_r: motion_type=rotational default_value=-0.1445457 range=(-2.094395 0.1745329)
            clamped=false
        SpatialTransform: axes_held_at_zero=(rotation2 rotation3 translation3)
          TransformAxis rotation1: coordinates=knee_angle_r axis=(0 0 1) LinearFunction(coefficients=1 0)
          TransformAxis translation1: coordinates=knee_angle_r axis=(1 0 0)
            MultiplierFunction: scale=0.9897595
              SimmSpline: x=(-2.0944 -1.74533 -1.39626 -1.0472 -0.698132 -0.349066 -0.174533 0.197344 0.337395 0.490178 1.52146 2.0944)
                  y=(-0.0032 0.00179 0.00411 0.0041 0.00212 -0.001 -0.0031 -0.005227 -0.005435 -0.005574 -0.005435 -0.00525)
          TransformAxis translation2: coordinates=knee_angle_r axis=(0 1 0)
            MultiplierFunction: scale=0.9897595
              SimmSpline: x=(-2.0944 -1.22173 -0.523599 -0.349066 -0.174533 0.159149 2.0944)
                  y=(-0.4226 -0.4082 -0.399 -0.3976 -0.3966 -0.395264 -0.396)
    Body aux_intercond_body_r: mass=0.0002656274 mass_center=(0 0 0) inertia_xx=0.000260215 inertia_yy=0.000260215
        inertia_zz=0.000260215 meshes=
      CustomJoint knee_hinge_med_r: parent_body=sagittal_knee_body_r location_in_parent=(0 -0.01979519 -0.01682591)
          location=(0 -0.01979519 -0.01682591)
        Coordinate knee_varus_med_r: motion_type=rotational default_value=0 range=(-0.08726646 0.1745329) clamped=false
        SpatialTransform: axes_held_at_zero=(rotation1 rotation2 translation1 translation2 translation3)
          TransformAxis rotation3: coordinates=knee_varus_med_r axis=(1 0 0) LinearFunction(coefficients=1 0)
    Body tibia_r: mass=9.848137 mass_center=(0 -0.20537 0) inertia_xx=0.1619902 inertia_yy=0.01639187
        inertia_zz=0.1642401 meshes=(tibia.vtp fibula.vtp)
      CustomJoint knee_hinge_lat_r: parent_body=aux_intercond_body_r location_in_parent=(0 -0.01979519 0.01682591)
          location=(0 -0.022 0.0187)
        Coordinate knee_valgus_lat_r: motion_type=rotational default_value=0.005020818 range=(-0.1745329 0.08726646)
            clamped=false
        SpatialTransform: axes_held_at_zero=(rotation1 rotation2 translation1 translation2 translation3)
          TransformAxis rotation3: coordinates=knee_valgus_lat_r axis=(1 0 0) LinearFunction(coefficients=1 0)
    Body talus_r: mass=0.2656274 mass_center=(0 0 0) inertia_xx=0.002760817 inertia_yy=0.002760817
        inertia_zz=0.002760817 meshes=talus.vtp
      CustomJoint ankle_r: parent_body=tibia_r location_in_parent=(0 -0.473 0) location=(0 0 0)
        Coordinate ankle_angle_r: motion_type=rotational default_value=0.03626071 range=(-1.570796 1.570796)
            clamped=false
        SpatialTransform: axes_held_at_zero=(rotation2 rotation3 translation1 translation2 translation3)
          TransformAxis rotation1: coordinates=ankle_angle_r axis=(-0.1050135 -0.1740224 0.9791263)
              LinearFunction(coefficients=1 0)
    Body calcn_r: mass=3.320343 mass_center=(0.101949 0.0305847 0) inertia_xx=0.003865144 inertia_yy=0.01076719
        inertia_zz=0.01131935 meshes=foot.vtp
      CustomJoint subtalar_r: parent_body=talus_r location_in_parent=(-0.04972046 -0.04276755 0.00807435)
          location=(0 0 0)
        Coordinate subtalar_angle_r: motion_type=rotational default_value=-0.03511003 range=(-1.570796 1.570796)
            clamped=false locked=true
        SpatialTransform: axes_held_at_zero=(rotation2 rotation3 translation1 translation2 translation3)
          TransformAxis rotation1: coordinates=subtalar_angle_r axis=(0.7871796 0.6047475 -0.1209495)
              LinearFunction(coefficients=1 0)
    Body toes_r: mass=0.575349 mass_center=(0.0352743 0.00611693 -0.0178411) inertia_xx=0.0002760817
        inertia_yy=0.0005521635 inertia_zz=0.0002760817 meshes=bofoot.vtp
      CustomJoint mtp_r: parent_body=calcn_r location_in_parent=(0.1822846 -0.002038977 0.001101048) location=(0 0 0)
        Coordinate mtp_angle_r: motion_type=rotational default_value=0 range=(-1.570796 1.570796) clamped=false
            locked=true
        SpatialTransform: axes_held_at_zero=(rotation2 rotation3 translation1 translation2 translation3)
          TransformAxis rotation1: coordinates=mtp_angle_r axis=(-0.5809544 0 0.8139361)
              LinearFunction(coefficients=1 0)
  ForceSet:
    Thelen2003Muscle [values shared by the 40 below unless stated]: min_control=0 max_control=1 optimal_force=1
        max_contraction_velocity=10 activation_time_constant=0.01 deactivation_time_constant=0.04
        FmaxTendonStrain=0.033 FmaxMuscleStrain=0.6 KshapeActive=0.5 KshapePassive=4 Af=0.3 Flen=1.8
    Thelen2003Muscle glut_med1_r: max_isometric_force=819 optimal_fiber_length=0.05523349
        tendon_slack_length=0.08052733 pennation_angle_at_optimal=0.1396263 [radians]
      PathPoint P1: pelvis (-0.039067 0.0320499 0.120225)
      PathPoint P2: femur_r (-0.0215768 -0.0115802 0.0549317)
    Thelen2003Muscle glut_med2_r: max_isometric_force=573 optimal_fiber_length=0.08776937
        tendon_slack_length=0.05505061 pennation_angle_at_optimal=0
      PathPoint P1: pelvis (-0.0818683 0.0469151 0.0761725)
      PathPoint P2: femur_r (-0.0255358 -0.00574061 0.0521603)
    Thelen2003Muscle glut_med3_r: max_isometric_force=653 optimal_fiber_length=0.06598861
        tendon_slack_length=0.05413926 pennation_angle_at_optimal=0.3316126
      PathPoint P1: pelvis (-0.117105 0.0110699 0.0644383)
      PathPoint P2: femur_r (-0.0305836 -0.00465187 0.0512695)
    Thelen2003Muscle glut_min1_r: max_isometric_force=270 optimal_fiber_length=0.06962378
        tendon_slack_length=0.01638206 pennation_angle_at_optimal=0.1745329
      PathPoint P1: pelvis (-0.0447164 -0.00843418 0.105011)
      PathPoint P2: femur_r (-0.00712627 -0.0102935 0.0554265)
    Thelen2003Muscle glut_min2_r: max_isometric_force=285 optimal_fiber_length=0.05759782
        tendon_slack_length=0.02674185 pennation_angle_at_optimal=0
      PathPoint P1: pelvis (-0.0606113 -0.00685277 0.0985469)
      PathPoint P2: femur_r (-0.00950169 -0.0102935 0.0554265)
    Thelen2003Muscle glut_min3_r: max_isometric_force=323 optimal_fiber_length=0.03896676 tendon_slack_length=0.0522975
        pennation_angle_at_optimal=0.01745329
      PathPoint P1: pelvis (-0.0798575 -0.00664192 0.0851222)
      PathPoint P2: femur_r (-0.0133618 -0.008215 0.0544368)
    Thelen2003Muscle semimem_r: max_isometric_force=1288 optimal_fiber_length=0.07942739 tendon_slack_length=0.3564304
        pennation_angle_at_optimal=0.2617994
      PathPoint P1: pelvis (-0.114137 -0.10276 0.0711109)
      ConditionalPathPoint P2: tibia_r (-0.03828 -0.038709 -0.020801) range=(-0.558505 0.174533)
          coordinate=knee_angle_r
      PathPoint P3: tibia_r (-0.0297 -0.052481 -0.021527)
    Thelen2003Muscle semiten_r: max_isometric_force=410 optimal_fiber_length=0.202039 tendon_slack_length=0.2568207
        pennation_angle_at_optimal=0.08726646
      PathPoint P1: pelvis (-0.120983 -0.115843 0.0600529)
      ConditionalPathPoint P2: tibia_r (-0.046233 -0.031449 -0.025047) range=(-0.331613 0.174533)
          coordinate=knee_angle_r
      PathPoint P3: tibia_r (-0.036542 -0.058102 -0.025168)
      PathPoint P4: tibia_r (-0.01243 -0.08206 -0.02695)
      PathPoint P5: tibia_r (0.00297 -0.10516 -0.02123)
    Thelen2003Muscle bifemlh_r: max_isometric_force=896 optimal_fiber_length=0.1083404 tendon_slack_length=0.3240272
        pennation_angle_at_optimal=0
      PathPoint P1: pelvis (-0.12061 -0.108137 0.0690524)
      PathPoint P2: tibia_r (-0.03311 -0.0396 0.032373)
      PathPoint P3: tibia_r (-0.02574 -0.06193 0.03773)
    Thelen2003Muscle bifemsh_r: max_isometric_force=804 optimal_fiber_length=0.1745994 tendon_slack_length=0.08982282
        pennation_angle_at_optimal=0.4014257
      PathPoint P1: femur_r (0.0049488 -0.208938 0.0231604)
      PathPoint P2: tibia_r (-0.03311 -0.0396 0.032373)
      PathPoint P3: tibia_r (-0.02574 -0.06193 0.03773)
    Thelen2003Muscle sar_r: max_isometric_force=156 optimal_fiber_length=0.5259943 tendon_slack_length=0.1011528
        pennation_angle_at_optimal=0
      PathPoint P1: pelvis (-0.0146501 -0.00137055 0.123507)
      PathPoint P2: femur_r (-0.00296928 -0.353146 -0.0416689)
      PathPoint P3: tibia_r (-0.00616 -0.04609 -0.04389)
      PathPoint P4: tibia_r (0.0066 -0.06479 -0.04213)
      PathPoint P5: tibia_r (0.02673 -0.0924 -0.02772)
    Thelen2003Muscle add_long_r: max_isometric_force=627 optimal_fiber_length=0.1358998 tendon_slack_length=0.1083259
        pennation_angle_at_optimal=0.1047198
      PathPoint P1: pelvis (-0.0302578 -0.0881372 0.0168057)
      PathPoint P2: femur_r (0.0049488 -0.208938 0.0231604)
    Thelen2003Muscle add_brev_r: max_isometric_force=429 optimal_fiber_length=0.1307122 tendon_slack_length=0.01965597
        pennation_angle_at_optimal=0
      PathPoint P1: pelvis (-0.0562066 -0.096466 0.0163085)
      PathPoint P2: femur_r (0.000890784 -0.118375 0.0290989)
    Thelen2003Muscle add_mag1_r: max_isometric_force=381 optimal_fiber_length=0.08478998 tendon_slack_length=0.05847585
        pennation_angle_at_optimal=0.08726646
      PathPoint P1: pelvis (-0.0700907 -0.123772 0.0253577)
      PathPoint P2: femur_r (-0.00445392 -0.11986 0.0335528)
    Thelen2003Muscle add_mag2_r: max_isometric_force=343 optimal_fiber_length=0.1178252 tendon_slack_length=0.1168515
        pennation_angle_at_optimal=0.05235988
      PathPoint P1: pelvis (-0.0795702 -0.125669 0.0306281)
      PathPoint P2: femur_r (0.0053447 -0.22616 0.0224675)
    Thelen2003Muscle add_mag3_r: max_isometric_force=488 optimal_fiber_length=0.1284052 tendon_slack_length=0.2440679
        pennation_angle_at_optimal=0.08726646
      PathPoint P1: pelvis (-0.106362 -0.120324 0.0485475)
      PathPoint P2: femur_r (0.00692832 -0.379771 -0.0263276)
    Thelen2003Muscle tfl_r: max_isometric_force=233 optimal_fiber_length=0.09551985 tendon_slack_length=0.4273256
        pennation_angle_at_optimal=0.05235988
      PathPoint P1: pelvis (-0.029779 0.0225614 0.123407)
      PathPoint P2: femur_r (0.0290989 -0.0984811 0.0590886)
      PathPoint P3: femur_r (0.0053447 -0.400754 0.0353344)
      PathPoint P4: tibia_r (0.0066 -0.05357 0.03267)
    Thelen2003Muscle grac_r: max_isometric_force=162 optimal_fiber_length=0.3523757 tendon_slack_length=0.1261345
        pennation_angle_at_optimal=0.05235988
      PathPoint P1: pelvis (-0.0708663 -0.125142 0.0277841)
      ConditionalPathPoint P2: tibia_r (-0.029227 -0.03509 -0.041514) range=(-0.436332 0.174533)
          coordinate=knee_angle_r
      PathPoint P3: tibia_r (-0.021373 -0.056683 -0.03938)
      PathPoint P4: tibia_r (0.0066 -0.09196 -0.02508)
    Thelen2003Muscle glut_max1_r: max_isometric_force=573 optimal_fiber_length=0.1458551 tendon_slack_length=0.1283935
        pennation_angle_at_optimal=0.08726646
      PathPoint P1: pelvis (-0.114424 0.0645215 0.0696093)
      PathPoint P2: pelvis (-0.123616 0.00126513 0.0881055)
      PathPoint P3: femur_r (-0.045232 -0.024546 0.0387986)
      PathPoint P4: femur_r (-0.0274163 -0.0560204 0.0465187)
    Thelen2003Muscle glut_max2_r: max_isometric_force=819 optimal_fiber_length=0.1484708 tendon_slack_length=0.1282707
        pennation_angle_at_optimal=0
      PathPoint P1: pelvis (-0.12917 0.0185552 0.0559858)
      PathPoint P2: pelvis (-0.131755 -0.0548222 0.0908899)
      PathPoint P3: femur_r (-0.0421638 -0.0524573 0.029)
      PathPoint P4: femur_r (-0.0154402 -0.10056 0.0414709)
    Thelen2003Muscle glut_max3_r: max_isometric_force=552 optimal_fiber_length=0.1434674 tendon_slack_length=0.1444637
        pennation_angle_at_optimal=0.08726646
      PathPoint P1: pelvis (-0.148991 -0.0331042 0.00576763)
      PathPoint P2: pelvis (-0.146405 -0.110909 0.0400751)
      PathPoint P3: femur_r (-0.0295938 -0.103034 0.0133618)
      PathPoint P4: femur_r (-0.00593856 -0.140447 0.0406791)
    Thelen2003Muscle iliacus_r: max_isometric_force=1073 optimal_fiber_length=0.1013469 tendon_slack_length=0.1013469
        pennation_angle_at_optimal=0.1221731
      PathPoint P1: pelvis (-0.0645371 0.038481 0.0849234)
      PathPoint P2: pelvis (-0.0247041 -0.057985 0.0806474)
      ConditionalPathPoint P3: pelvis (-0.0275767 -0.084869 0.0811446) range=(-1.5708 0.785398)
          coordinate=hip_flexion_r
      PathPoint P4: femur_r (0.00168259 -0.0537439 0.00564163)
      PathPoint P5: femur_r (-0.0191024 -0.0614641 0.0127679)
    Thelen2003Muscle psoas_r: max_isometric_force=1113 optimal_fiber_length=0.1021321 tendon_slack_length=0.1634114
        pennation_angle_at_optimal=0.1396263
      PathPoint P1: pelvis (-0.0619518 0.093514 0.0287387)
      PathPoint P2: pelvis (-0.0227891 -0.0600935 0.0754764)
      ConditionalPathPoint P3: pelvis (-0.0275767 -0.084869 0.0811446) range=(-1.5708 0.785398)
          coordinate=hip_flexion_r
      PathPoint P4: femur_r (0.00158362 -0.0501808 0.00376109)
      PathPoint P5: femur_r (-0.0186075 -0.0590886 0.0102935)
    Thelen2003Muscle quad_fem_r: max_isometric_force=381 optimal_fiber_length=0.05399909 tendon_slack_length=0.02399959
        pennation_angle_at_optimal=0
      PathPoint P1: pelvis (-0.109445 -0.121347 0.0517098)
      PathPoint P2: femur_r (-0.0377098 -0.0355324 0.0362252)
    Thelen2003Muscle gem_r: max_isometric_force=164 optimal_fiber_length=0.02362997 tendon_slack_length=0.03839871
        pennation_angle_at_optimal=0
      PathPoint P1: pelvis (-0.108487 -0.0864504 0.0710015)
      PathPoint P2: femur_r (-0.0140546 -0.00326621 0.0438463)
    Thelen2003Muscle peri_r: max_isometric_force=444 optimal_fiber_length=0.02603889 tendon_slack_length=0.115172
        pennation_angle_at_optimal=0.1745329
      PathPoint P1: pelvis (-0.13367 0.000316282 0.0233688)
      PathPoint P2: pelvis (-0.114233 -0.0290979 0.0653333)
      PathPoint P3: femur_r (-0.0146484 -0.00356313 0.0432525)
    Thelen2003Muscle rect_fem_r: max_isometric_force=1169 optimal_fiber_length=0.1123326 tendon_slack_length=0.3054658
        pennation_angle_at_optimal=0.08726646
      PathPoint P1: pelvis (-0.028247 -0.0327879 0.0962597)
      ConditionalPathPoint P2: femur_r (0.033058 -0.398873 0.00188054) range=(-2.61799 -1.45997)
          coordinate=knee_angle_r
      MovingPathPoint P3: tibia_r (0.0525962 0.0258363 0.00154) x_coordinate=knee_angle_r y_coordinate=knee_angle_r
          z_coordinate=knee_angle_r
        x_location: MultiplierFunction: scale=1.1
          SimmSpline: x=(-2.0944 -1.99997 -1.5708 -1.45752 -1.39626 -1.0472 -0.698132 -0.526391 -0.349066 -0.174533 0 0.00017453 0.00034907 0.0279253 0.0872665 0.174533 2.0944)
              y=(0.0155805 0.0179938 0.0275081 0.0296564 0.0307615 0.0365695 0.0422074 0.0450902 0.048391 0.0534299 0.0617576 0.0617669 0.0617762 0.0633083 0.066994 0.0733035 0.0573481)
        y_location: MultiplierFunction: scale=1.1
          SimmSpline: x=(-2.0944 -1.99997 -1.5708 -1.45752 -1.39626 -1.0472 -0.698132 -0.526391 -0.349066 -0.174533 0 0.00017453 0.00034907 0.0279253 0.0872665 0.174533 2.0944)
              y=(0.0234116 0.0237613 0.0251141 0.0252795 0.0253146 0.0249184 0.0242373 0.0238447 0.0234197 0.0227644 0.020984 0.0209814 0.0209788 0.0205225 0.0191754 0.0159554 -0.0673774)
        z_location: MultiplierFunction: scale=1.1
          SimmSpline: x=(-2.0944 0.1745) y=(0.0014 0.0014)
    Thelen2003Muscle vas_med_r: max_isometric_force=1294 optimal_fiber_length=0.0867242 tendon_slack_length=0.1227781
        pennation_angle_at_optimal=0.08726646
      PathPoint P1: femur_r (0.0138566 -0.207751 0.0186075)
      PathPoint P2: femur_r (0.0352354 -0.274064 0.000890784)
      ConditionalPathPoint P3: femur_r (0.0366211 -0.400655 -0.012372) range=(-2.61799 -1.21004)
          coordinate=knee_angle_r
      ConditionalPathPoint P4: femur_r (0.0271194 -0.421143 -0.0129659) range=(-2.61799 -1.78006)
          coordinate=knee_angle_r
      MovingPathPoint P5: tibia_r (0.0461926 0.0251464 -0.01606) x_coordinate=knee_angle_r y_coordinate=knee_angle_r
          z_coordinate=knee_angle_r
        x_location: MultiplierFunction: scale=1.1
          SimmSpline: x=(-2.0944 -1.99997 -1.5708 -1.45752 -1.39626 -1.0472 -0.698132 -0.526391 -0.349066 -0.174533 0 0.00017453 0.00034907 0.0279253 0.0872665 0.174533 2.0944)
              y=(0.00981097 0.0122243 0.0217371 0.0238851 0.0249902 0.0307959 0.0364187 0.0392871 0.0425654 0.0475764 0.0559586 0.0559681 0.0559776 0.0575419 0.0613368 0.0679503 0.0629332)
        y_location: MultiplierFunction: scale=1.1
          SimmSpline: x=(-2.0944 -1.99997 -1.5708 -1.45752 -1.39626 -1.0472 -0.698132 -0.526391 -0.349066 -0.174533 0 0.00017453 0.00034907 0.0279253 0.0872665 0.174533 2.0944)
              y=(0.0224154 0.0227651 0.0241265 0.0242933 0.0243287 0.0239462 0.0233593 0.0230677 0.0228342 0.0226362 0.0217917 0.0217903 0.0217889 0.0215365 0.0206842 0.0183269 -0.0656205)
        z_location: MultiplierFunction: scale=1.1
          SimmSpline: x=(-2.0944 2.0944) y=(-0.0146 -0.0146)
    Thelen2003Muscle vas_int_r: max_isometric_force=1365 optimal_fiber_length=0.08427975 tendon_slack_length=0.1317477
        pennation_angle_at_optimal=0.05235988
      PathPoint P1: femur_r (0.028703 -0.19043 0.0306825)
      PathPoint P2: femur_r (0.0331569 -0.206266 0.0282081)
      ConditionalPathPoint P3: femur_r (0.0339488 -0.398873 0.00544368) range=(-2.61799 -1.42) coordinate=knee_angle_r
      MovingPathPoint P4: tibia_r (0.0447265 0.0287478 0.00198) x_coordinate=knee_angle_r y_coordinate=knee_angle_r
          z_coordinate=knee_angle_r
        x_location: MultiplierFunction: scale=1.1
          SimmSpline: x=(-2.0944 -1.99997 -1.5708 -1.45752 -1.39626 -1.0472 -0.698132 -0.526391 -0.349066 -0.174533 0 0.00017453 0.00034907 0.0279253 0.0872665 0.174533 2.0944)
              y=(0.0082733 0.0106866 0.0202042 0.022353 0.0234583 0.0292715 0.0349465 0.037871 0.0412569 0.0465287 0.0554632 0.0554735 0.0554837 0.0571717 0.061272 0.0684368 0.0648818)
        y_location: MultiplierFunction: scale=1.1
          SimmSpline: x=(-2.0944 -1.99997 -1.5708 -1.45752 -1.39626 -1.0472 -0.698132 -0.526391 -0.349066 -0.174533 0 0.00017453 0.00034907 0.0279253 0.0872665 0.174533 2.0944)
              y=(0.025599 0.0259487 0.0273124 0.0274796 0.0275151 0.0271363 0.0265737 0.0263073 0.0261187 0.0260129 0.0252923 0.0252911 0.0252898 0.0250526 0.0242191 0.0218288 -0.0685706)
        z_location: MultiplierFunction: scale=1.1
          SimmSpline: x=(-2.0944 2.0944) y=(0.0018 0.0018)
    Thelen2003Muscle vas_lat_r: max_isometric_force=1871 optimal_fiber_length=0.08214287 tendon_slack_length=0.1535289
        pennation_angle_at_optimal=0.08726646
      PathPoint P1: femur_r (0.00475085 -0.183501 0.0345426)
      PathPoint P2: femur_r (0.0266245 -0.256447 0.0404812)
      ConditionalPathPoint P3: femur_r (0.0357303 -0.398873 0.0202901) range=(-2.61799 -1.21004)
          coordinate=knee_angle_r
      ConditionalPathPoint P4: femur_r (0.0250409 -0.419955 0.0182116) range=(-2.61799 -1.92004)
          coordinate=knee_angle_r
      MovingPathPoint P5: tibia_r (0.051048 0.0238628 0.01815) x_coordinate=knee_angle_r y_coordinate=knee_angle_r
          z_coordinate=knee_angle_r
        x_location: MultiplierFunction: scale=1.1
          SimmSpline: x=(-2.0944 -1.99997 -1.5708 -1.45752 -1.39626 -1.0472 -0.698132 -0.526391 -0.349066 -0.174533 0 0.00017453 0.00034907 0.0279253 0.0872665 0.174533 2.0944)
              y=(0.0142897 0.016703 0.0262145 0.0283623 0.0294674 0.0352709 0.0408785 0.0437291 0.0469704 0.0518742 0.0599557 0.0599647 0.0599738 0.0614577 0.0650351 0.0711867 0.0583766)
        y_location: MultiplierFunction: scale=1.1
          SimmSpline: x=(-2.0944 -1.99997 -1.5708 -1.45752 -1.39626 -1.0472 -0.698132 -0.526391 -0.349066 -0.174533 0 0.00017453 0.00034907 0.0279253 0.0872665 0.174533 2.0944)
              y=(0.0215318 0.0218815 0.0232362 0.0234019 0.0234371 0.0230439 0.0223842 0.0220151 0.0216359 0.0210971 0.0195864 0.0195842 0.019582 0.01919 0.018008 0.0151073 -0.0653421)
        z_location: MultiplierFunction: scale=1.1
          SimmSpline: x=(-2.0944 2.0944) y=(0.0165 0.0165)
    Thelen2003Muscle med_gas_r: max_isometric_force=1558 optimal_fiber_length=0.06542241 tendon_slack_length=0.4252457
        pennation_angle_at_optimal=0.296706
      PathPoint P1: femur_r (-0.0188054 -0.388877 -0.0232593)
      ConditionalPathPoint P2: femur_r (-0.0296928 -0.398081 -0.0255358) range=(-0.785398 0.174533)
          coordinate=knee_angle_r
      PathPoint P3: calcn_r (0 0.0316041 -0.00540329)
    Thelen2003Muscle lat_gas_r: max_isometric_force=683 optimal_fiber_length=0.06986781 tendon_slack_length=0.4148401
        pennation_angle_at_optimal=0.1396263
      PathPoint P1: femur_r (-0.0217747 -0.390559 0.0269215)
      ConditionalPathPoint P2: femur_r (-0.0296928 -0.397685 0.0271194) range=(-0.785398 0.174533)
          coordinate=knee_angle_r
      PathPoint P3: calcn_r (0 0.0316041 -0.00540329)
    Thelen2003Muscle soleus_r: max_isometric_force=3549 optimal_fiber_length=0.05474779 tendon_slack_length=0.2737389
        pennation_angle_at_optimal=0.4363323
      PathPoint P1: tibia_r (-0.00264 -0.16863 0.00781)
      PathPoint P2: calcn_r (0 0.0316041 -0.00540329)
    Thelen2003Muscle tib_post_r: max_isometric_force=1588 optimal_fiber_length=0.03377837 tendon_slack_length=0.3377837
        pennation_angle_at_optimal=0.2094395
      PathPoint P1: tibia_r (-0.01034 -0.14828 0.00209)
      PathPoint P2: tibia_r (-0.01584 -0.44561 -0.02519)
      PathPoint P3: calcn_r (0.0425127 0.0340509 -0.0291574)
      PathPoint P4: calcn_r (0.0787045 0.0162099 -0.0286476)
    Thelen2003Muscle flex_dig_r: max_isometric_force=310 optimal_fiber_length=0.03611458 tendon_slack_length=0.4248774
        pennation_angle_at_optimal=0.1221731
      PathPoint P1: tibia_r (-0.00913 -0.22506 -0.00198)
      PathPoint P2: tibia_r (-0.01694 -0.44561 -0.02156)
      PathPoint P3: calcn_r (0.0444497 0.0321139 -0.0285457)
      PathPoint P4: calcn_r (0.0721798 0.017943 -0.0268126)
      PathPoint P5: calcn_r (0.169031 -0.00825786 0.0118261)
      PathPoint P6: toes_r (-0.00193703 -0.00795201 0.0149865)
      PathPoint P7: toes_r (0.0290554 -0.00723837 0.021919)
      PathPoint P8: toes_r (0.0449594 -0.00611693 0.0246716)
    Thelen2003Muscle flex_hal_r: max_isometric_force=322 optimal_fiber_length=0.04553629 tendon_slack_length=0.4024137
        pennation_angle_at_optimal=0.1745329
      PathPoint P1: tibia_r (-0.00869 -0.25674 0.02684)
      PathPoint P2: tibia_r (-0.02046 -0.44869 -0.01914)
      PathPoint P3: calcn_r (0.0381289 0.0281379 -0.0245697)
      PathPoint P4: calcn_r (0.105823 0.00693252 -0.0260989)
      PathPoint P5: calcn_r (0.175964 -0.00540329 -0.0274242)
      PathPoint P6: toes_r (0.0158021 -0.00652473 -0.0270164)
      PathPoint P7: toes_r (0.0572953 -0.0103988 -0.0184527)
    Thelen2003Muscle tib_ant_r: max_isometric_force=905 optimal_fiber_length=0.1063615 tendon_slack_length=0.2420267
        pennation_angle_at_optimal=0.08726646
      PathPoint P1: tibia_r (0.01969 -0.17864 0.01265)
      PathPoint P2: tibia_r (0.03619 -0.43461 -0.01947)
      PathPoint P3: calcn_r (0.118872 0.0181469 -0.0310944)
    Thelen2003Muscle per_brev_r: max_isometric_force=435 optimal_fiber_length=0.05431276 tendon_slack_length=0.1748871
        pennation_angle_at_optimal=0.08726646
      PathPoint P1: tibia_r (-0.0077 -0.29106 0.03575)
      PathPoint P2: tibia_r (-0.02178 -0.46024 0.03113)
      PathPoint P3: tibia_r (-0.01584 -0.47245 0.03179)
      PathPoint P4: calcn_r (0.0480179 0.0275262 0.0237541)
      PathPoint P5: calcn_r (0.0690194 0.0223268 0.0349685)
    Thelen2003Muscle per_long_r: max_isometric_force=943 optimal_fiber_length=0.05279214 tendon_slack_length=0.3716998
        pennation_angle_at_optimal=0.1745329
      PathPoint P1: tibia_r (0.00055 -0.17248 0.03982)
      PathPoint P2: tibia_r (-0.02277 -0.46255 0.03146)
      PathPoint P3: tibia_r (-0.01782 -0.47509 0.03179)
      PathPoint P4: calcn_r (0.0446536 0.0234482 0.0225307)
      PathPoint P5: calcn_r (0.0694272 0.0108066 0.0289535)
      PathPoint P6: calcn_r (0.0868604 0.00703447 0.01203)
      PathPoint P7: calcn_r (0.122644 0.00866565 -0.0187586)
    Thelen2003Muscle per_tert_r: max_isometric_force=180 optimal_fiber_length=0.08538489 tendon_slack_length=0.1080821
        pennation_angle_at_optimal=0.2268928
      PathPoint P1: tibia_r (0.0011 -0.30844 0.02541)
      PathPoint P2: tibia_r (0.02519 -0.44759 0.01749)
      PathPoint P3: calcn_r (0.0873702 0.0232443 0.0304827)
    ObjectGroup R_hip_abd: members=(glut_max1_r glut_med1_r glut_med2_r glut_med3_r glut_min1_r glut_min2_r glut_min3_r peri_r sar_r tfl_r)
    ObjectGroup R_hip_flex: members=(add_brev_r add_long_r glut_med1_r glut_min1_r grac_r iliacus_r psoas_r rect_fem_r sar_r tfl_r)
    ObjectGroup R_hip_inrot: members=(glut_med1_r glut_min1_r iliacus_r psoas_r tfl_r)
    ObjectGroup R_hip_exrot: members=(gem_r glut_med3_r glut_min3_r peri_r quad_fem_r)
    ObjectGroup R_hip_ext: members=(add_long_r add_mag1_r add_mag2_r add_mag3_r bifemlh_r glut_max1_r glut_max2_r glut_max3_r glut_med3_r glut_min3_r semimem_r semiten_r)
    ObjectGroup R_hip_add: members=(add_brev_r add_long_r add_mag1_r add_mag2_r add_mag3_r bifemlh_r grac_r semimem_r semiten_r)
    ObjectGroup R_knee_bend: members=(bifemlh_r bifemsh_r grac_r lat_gas_r med_gas_r sar_r semimem_r semiten_r)
    ObjectGroup R_knee_ext: members=(rect_fem_r vas_int_r vas_lat_r vas_med_r)
    ObjectGroup R_ankle_pf: members=(flex_dig_r flex_hal_r lat_gas_r med_gas_r per_brev_r per_long_r soleus_r tib_post_r)
    ObjectGroup R_inverter: members=(flex_dig_r flex_hal_r tib_ant_r tib_post_r)
    ObjectGroup R_ankle_df: members=(per_tert_r tib_ant_r)
    ObjectGroup R_everter: members=(per_brev_r per_long_r per_tert_r)
    ObjectGroup L_hip_abd
    ObjectGroup L_hip_flex
    ObjectGroup L_hip_inrot
    ObjectGroup L_hip_exrot
    ObjectGroup L_hip_ext
    ObjectGroup L_hip_add
    ObjectGroup L_knee_bend
    ObjectGroup L_knee_ext
    ObjectGroup L_ankle_pf
    ObjectGroup L_inverter
    ObjectGroup L_ankle_df
    ObjectGroup L_everter
    ObjectGroup back_ext
    ObjectGroup back_rlb
    ObjectGroup back_introt
    ObjectGroup back_llb
    ObjectGroup back_extrot
    ObjectGroup back_flex
  MarkerSet:
    Marker RAsis: pelvis (0.00629858 -0.0251152 0.138163)
    Marker LAsis: pelvis (0.0180958 -0.00829689 -0.132393)
    Marker RPsis: pelvis (-0.191258 0.0354053 0.0281895)
    Marker LPsis: pelvis (-0.184942 0.0420519 -0.0482572)
    Marker RThighSuperior: femur_r (-0.0234715 -0.137703 0.0783214)
    Marker RThighLateral: femur_r (0.0699841 -0.286501 -0.00439405)
    Marker RThighInferior: femur_r (-0.00201672 -0.347315 0.0462816)
    Marker RKneeLateral: femur_r (0.00607241 -0.415563 0.0434851)
    Marker RShankSuperior: tibia_r (-0.031295 -0.160714 0.0665106)
    Marker RShankLateral: tibia_r (0.0370474 -0.241967 -0.0146667)
    Marker RShankInferior: tibia_r (-0.0081325 -0.365407 0.0576576)
    Marker RAnkleLateral: tibia_r (-0.0063005 -0.466085 0.0626805)
    Marker RHeel: calcn_r (-0.0256668 0.00305931 0.00645207)
    Marker RToeLateral: calcn_r (0.235387 0.00494422 0.0555569)
    Marker RToeMedial: calcn_r (0.240487 0.0158414 -0.0366153)
    Marker RToe: calcn_r (0.273925 0.0263041 0.00854034)
